# OpenSim document version 40600
Model P2_PointCloud_scaled:
  gravity: 0 -9.8066 0
  length_units: meters
  force_units: N
  credits:
    This model was created by Mohammadhossein Akhavanfar, Alexandre Mir-Orefice, Thomas K. Uchida, Ryan B. Graham
  publications:
    An Enhanced Spine Model Validated for Simulating Dynamic Lifting Tasks in OpenSim
  Ground: meshes=
  BodySet:
    Body pelvis: mass=12.41403 [kg] mass_center=(-0.029475 -0.0713832 -0.0204058)
        inertia=(0.0002247208 0.0001847028 0.0001847028 0 0 0) meshes=(pelvis_rvBruno.vtp pelvis_lvBruno.vtp)
    Body sacrum: mass=0.0001487976 mass_center=(-3.53295e-7 0 -2.44589e-7)
        inertia=(0.0001718663 0.0001665038 0.0001665038 0 0 0) meshes=sacrumBruno.vtp
    Body femur_r: mass=13.84026 mass_center=(-0.0328614 -0.177144 -0.0227502)
        inertia=(0.2146959 0.05627964 0.2264012 0 0 0) meshes=femur_r.vtp
    Body patella_r: mass=0.1282635 mass_center=(0.00157111 0.0275095 -0.000210835)
        inertia=(4.601779e-6 2.102067e-5 2.102067e-5 0 0 0) meshes=r_patella.vtp
    Body tibia_r: mass=5.516669 mass_center=(-0.0130984 -0.207335 -0.00906813)
        inertia=(0.09178526 0.009287805 0.09306004 0 0 0) meshes=(tibia_r.vtp fibula_r.vtp)
    Body talus_r: mass=0.1487976 mass_center=(-0.000353295 0 -0.000244589)
        inertia=(0.002146282 0.002146282 0.002146282 0 0 0) meshes=talus_rv.vtp
    Body calcn_r: mass=1.859969 mass_center=(0.116143 0.0361677 -0.00305736)
        inertia=(0.00300479 0.008370475 0.008799728 0 0 0) meshes=foot.vtp
    Body toes_r: mass=0.3222955 mass_center=(0.0409482 0.00723353 -0.0216276)
        inertia=(0.0002146282 0.0004292551 0.002146282 0 0 0) meshes=bofoot.vtp
    Body femur_l: mass=13.84026 mass_center=(-0.0328614 -0.177144 -0.0227502)
        inertia=(0.2146959 0.05627964 0.2264012 0 0 0) meshes=femur_l.vtp
    Body patella_l: mass=0.1282635 mass_center=(0.00157111 0.0275095 -0.000210835)
        inertia=(4.601779e-6 2.102067e-5 2.102067e-5 0 0 0) meshes=l_patella.vtp
    Body tibia_l: mass=5.516669 mass_center=(-0.0130984 -0.207335 -0.00906813)
        inertia=(0.09178526 0.009287805 0.09306004 0 0 0) meshes=(tibia_l.vtp fibula_l.vtp)
    Body talus_l: mass=0.1487976 mass_center=(-0.000353295 0 -0.000244589)
        inertia=(0.002146282 0.002146282 0.002146282 0 0 0) meshes=talus_lv.vtp
    Body calcn_l: mass=1.859969 mass_center=(0.116143 0.0361677 -0.00305736)
        inertia=(0.00300479 0.008370475 0.008799728 0 0 0) meshes=l_foot.vtp
    Body toes_l: mass=0.3222955 mass_center=(0.0409482 0.00723353 0.020568)
        inertia=(0.0002146282 0.0004292551 0.002146282 0 0 0) meshes=l_bofoot.vtp
    Body Abdomen: mass=0.0001487976 mass_center=(-3.53295e-7 0 -2.44589e-7)
        inertia=(0.0001718663 0.0001582748 0.0001582748 0 0 0)
      WrapEllipsoid Abdomen: translation=(0 0 0) quadrant=x dimensions=(0.00989842 0.0891326 0.0522309)
    Body lumbar5: mass=3.268487 mass_center=(0.00632288 0.0271155 -0.00537264)
        inertia=(0.0001840942 0.0001643895 0.0001643895 0 0 0) meshes=lumbar5Bruno.vtp
    Body lumbar4: mass=3.101685 mass_center=(0.00971987 0.0211645 -0.00509845)
        inertia=(0.0001720818 0.0001583833 0.0001583833 0 0 0) meshes=lumbar4Bruno.vtp
    Body lumbar3: mass=3.017317 mass_center=(0.0198558 0.0169904 -0.00495977)
        inertia=(0.0001740087 0.0001593467 0.0001593467 0 0 0) meshes=lumbar3Bruno.vtp
    Body lumbar2: mass=2.939942 mass_center=(0.0274397 0.0101976 -0.00483258)
        inertia=(0.0001788317 0.0001617568 0.0001617568 0 0 0) meshes=lumbar2Bruno.vtp
    Body lumbar1: mass=2.994997 mass_center=(0.0341569 0.00400312 -0.00492308)
        inertia=(0.0001853634 0.0001650233 0.0001650233 0 0 0) meshes=lumbar1Bruno.vtp
    Body thoracic12: mass=2.955715 mass_center=(0.0450541 -5.15056e-5 -0.00485851)
        inertia=(0.0001829589 0.0001638218 0.0001638218 0 0 0) meshes=thoracic12_sBruno.vtp
    Body thoracic11: mass=2.388052 mass_center=(0.0504568 -8.08058e-5 -0.0039254)
        inertia=(0.0001788317 0.0001617568 0.0001617568 0 0 0) meshes=thoracic11_sBruno.vtp
    Body thoracic10: mass=2.304874 mass_center=(0.0544325 0.00416389 -0.00378868)
        inertia=(0.0001750159 0.0001598496 0.0001598496 0 0 0) meshes=thoracic10_sBruno.vtp
    Body thoracic9: mass=1.936749 mass_center=(0.0591166 0.00579038 -0.00318357)
        inertia=(0.0001731115 0.0001588974 0.0001588974 0 0 0) meshes=thoracic9_sBruno.vtp
    Body thoracic8: mass=1.824109 mass_center=(0.0550007 0.0115359 -0.00299841)
        inertia=(0.0001719719 0.0001583283 0.0001583283 0 0 0) meshes=thoracic8_sBruno.vtp
    Body thoracic7: mass=1.883777 mass_center=(0.0505899 0.0185101 -0.00309649)
        inertia=(0.0001722888 0.0001584861 0.0001584861 0 0 0) meshes=thoracic7_sBruno.vtp
    Body thoracic6: mass=1.689745 mass_center=(0.046707 0.024034 -0.00277755)
        inertia=(0.0001743806 0.0001595313 0.0001595313 0 0 0) meshes=thoracic6_sBruno.vtp
    Body thoracic5: mass=1.737955 mass_center=(0.0399163 0.0288283 -0.0028568)
        inertia=(0.0001788317 0.0001617568 0.0001617568 0 0 0) meshes=thoracic5_sBruno.vtp
    Body thoracic4: mass=1.557762 mass_center=(0.0325877 0.0309549 -0.0025606)
        inertia=(0.000185069 0.0001648754 0.0001648754 0 0 0) meshes=thoracic4_sBruno.vtp
    Body thoracic3: mass=1.683496 mass_center=(0.0205947 0.0267541 -0.00276728)
        inertia=(0.0001908681 0.0001677757 0.0001677757 0 0 0) meshes=thoracic3_sBruno.vtp
    Body thoracic2: mass=1.412386 mass_center=(0.0156515 0.024542 -0.00232164)
        inertia=(0.0001964884 0.0001705859 0.0001705859 0 0 0) meshes=thoracic2_sBruno.vtp
    Body thoracic1: mass=1.329462 mass_center=(0.00166046 0.0172708 -0.00218533)
        inertia=(0.0001980449 0.0001713634 0.0001713634 0 0 0) meshes=thoracic1_sBruno.vtp
    Body head_neck: mass=8.054709 mass_center=(-0.0191246 0.135961 -0.0132401)
        inertia=(0.0001718663 0.0001582748 0.0001582748 0 0 0)
        meshes=(cerv6Bruno.vtp cerv5Bruno.vtp cerv4Bruno.vtp cerv3Bruno.vtp cerv2Bruno.vtp cerv1Bruno.vtp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)
    Body rib12_R: mass=0.0001487976 mass_center=(-3.53295e-7 0 -2.44589e-7)
        inertia=(0.0001718663 0.0001582748 0.0001582748 0 0 0) meshes=Rib12RBruno.vtp
    Body rib11_R: mass=0.0001487976 mass_center=(-3.53295e-7 0 -2.44589e-7)
        inertia=(0.0001718663 0.0001582748 0.0001582748 0 0 0) meshes=Rib11RBruno.vtp
    Body rib10_R: mass=0.0001487976 mass_center=(-3.53295e-7 0 -2.44589e-7)
        inertia=(0.0001718663 0.0001582748 0.0001582748 0 0 0) meshes=Rib10RBruno.vtp
    Body rib9_R: mass=0.0001487976 mass_center=(-3.53295e-7 0 -2.44589e-7)
        inertia=(0.0001718663 0.0001582748 0.0001582748 0 0 0) meshes=Rib9RBruno.vtp
    Body rib8_R: mass=0.0001487976 mass_center=(-3.53295e-7 0 -2.44589e-7)
        inertia=(0.0001718663 0.0001582748 0.0001582748 0 0 0) meshes=Rib8RBruno.vtp
    Body rib7_R: mass=0.0001487976 mass_center=(-3.53295e-7 0 -2.44589e-7)
        inertia=(0.0001718663 0.0001582748 0.0001582748 0 0 0) meshes=Rib7RBruno.vtp
    Body rib6_R: mass=0.0001487976 mass_center=(-3.53295e-7 0 -2.44589e-7)
        inertia=(0.0001718663 0.0001582748 0.0001582748 0 0 0) meshes=Rib6RBruno.vtp
    Body rib5_R: mass=0.0001487976 mass_center=(-3.53295e-7 0 -2.44589e-7)
        inertia=(0.0001718663 0.0001582748 0.0001582748 0 0 0) meshes=Rib5RBruno.vtp
    Body rib4_R: mass=0.0001487976 mass_center=(-3.53295e-7 0 -2.44589e-7)
        inertia=(0.0001718663 0.0001582748 0.0001582748 0 0 0) meshes=Rib4RBruno.vtp
    Body rib3_R: mass=0.0001487976 mass_center=(-3.53295e-7 0 -2.44589e-7)
        inertia=(0.0001718663 0.0001582748 0.0001582748 0 0 0) meshes=Rib3RBruno.vtp
    Body rib2_R: mass=0.0001487976 mass_center=(-3.53295e-7 0 -2.44589e-7)
        inertia=(0.0001718663 0.0001582748 0.0001582748 0 0 0) meshes=Rib2RBruno.vtp
    Body rib1_R: mass=0.0001487976 mass_center=(-3.53295e-7 0 -2.44589e-7)
        inertia=(0.0001718663 0.0001582748 0.0001582748 0 0 0) meshes=Rib1RBruno.vtp
    Body rib12_L: mass=0.0001487976 mass_center=(-3.53295e-7 0 -2.44589e-7)
        inertia=(0.0001718663 0.0001582748 0.0001582748 0 0 0) meshes=Rib12LBruno.vtp
    Body rib11_L: mass=0.0001487976 mass_center=(-3.53295e-7 0 -2.44589e-7)
        inertia=(0.0001718663 0.0001582748 0.0001582748 0 0 0) meshes=Rib11LBruno.vtp
    Body rib10_L: mass=0.0001487976 mass_center=(-3.53295e-7 0 -2.44589e-7)
        inertia=(0.0001718663 0.0001582748 0.0001582748 0 0 0) meshes=Rib10LBruno.vtp
    Body rib9_L: mass=0.0001487976 mass_center=(-3.53295e-7 0 -2.44589e-7)
        inertia=(0.0001718663 0.0001582748 0.0001582748 0 0 0) meshes=Rib9LBruno.vtp
    Body rib8_L: mass=0.0001487976 mass_center=(-3.53295e-7 0 -2.44589e-7)
        inertia=(0.0001718663 0.0001582748 0.0001582748 0 0 0) meshes=Rib8LBruno.vtp
    Body rib7_L: mass=0.0001487976 mass_center=(-3.53295e-7 0 -2.44589e-7)
        inertia=(0.0001718663 0.0001582748 0.0001582748 0 0 0) meshes=Rib7LBruno.vtp
    Body rib6_L: mass=0.0001487976 mass_center=(-3.53295e-7 0 -2.44589e-7)
        inertia=(0.0001718663 0.0001582748 0.0001582748 0 0 0) meshes=Rib6LBruno.vtp
    Body rib5_L: mass=0.0001487976 mass_center=(-3.53295e-7 0 -2.44589e-7)
        inertia=(0.0001718663 0.0001582748 0.0001582748 0 0 0) meshes=Rib5LBruno.vtp
    Body rib4_L: mass=0.0001487976 mass_center=(-3.53295e-7 0 -2.44589e-7)
        inertia=(0.0001718663 0.0001582748 0.0001582748 0 0 0) meshes=Rib4LBruno.vtp
    Body rib3_L: mass=0.0001487976 mass_center=(-3.53295e-7 0 -2.44589e-7)
        inertia=(0.0001718663 0.0001582748 0.0001582748 0 0 0) meshes=Rib3LBruno.vtp
    Body rib2_L: mass=0.0001487976 mass_center=(-3.53295e-7 0 -2.44589e-7)
        inertia=(0.0001718663 0.0001582748 0.0001582748 0 0 0) meshes=Rib2LBruno.vtp
    Body rib1_L: mass=0.0001487976 mass_center=(-3.53295e-7 0 -2.44589e-7)
        inertia=(0.0001718663 0.0001582748 0.0001582748 0 0 0) meshes=Rib1LBruno.vtp
    Body sternum: mass=0.0001487976 mass_center=(-3.53295e-7 0 -2.44589e-7)
        inertia=(0.0001718663 0.0001582748 0.0001582748 0 0 0) meshes=SternumBruno.vtp
    Body clavicle_R: mass=0.0001487976 mass_center=(-3.53295e-7 0 -2.44589e-7)
        inertia=(0.0001718663 0.0001582748 0.0001582748 0 0 0) meshes=clavicleBruno.vtp
    Body scapula_R: mass=0.0001487976 mass_center=(-3.53295e-7 0 -2.44589e-7)
        inertia=(0.0001718663 0.0001582748 0.0001582748 0 0 0) meshes=scapulaBruno.vtp
    Body humerus_R: mass=3.145283 mass_center=(-0.00746794 -0.133073 -0.00517012)
        inertia=(0.0001824448 0.0001824448 0.0001824448 0 0 0) meshes=humerusBruno.vtp
    Body ulna_R: mass=0.9039452 mass_center=(-0.00214627 -0.124943 -0.00148588)
        inertia=(0.0001587044 0.0001587044 0.0001587044 0 0 0) meshes=ulnaBruno.vtp
    Body radius_R: mass=0.9039452 mass_center=(-0.00214627 -0.124943 -0.00148588)
        inertia=(0.0001587044 0.0001587044 0.0001587044 0 0 0) meshes=radiusBruno.vtp
      WrapTorus ECU: xyz_body_rotation=(-0.98664 -0.14888 0.2227) translation=(-0.0168982 -0.25057 0.0361807)
          quadrant=all inner_radius=0.006220181 outer_radius=0.009330271
    Body hand_R: mass=0.6807488 mass_center=(-0.00161632 -0.0543748 -0.00111899)
        inertia=(9.415677e-5 9.415677e-5 9.415677e-5 0 0 0)
        meshes=(pisiformBruno.vtp scaphoidBruno.vtp triquetrumBruno.vtp hamateBruno.vtp capitateBruno.vtp trapezoidBruno.vtp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)
      WrapTorus ECRL: xyz_body_rotation=(1.5383 0.2344 0.73112) translation=(0.017727 -0.00766573 0.0166091)
          quadrant=all inner_radius=0.006388106 outer_radius=0.01277621
      WrapTorus ECRB: xyz_body_rotation=(1.3127 -0.11781 -0.11624) translation=(0.0100613 -0.00758588 0.0148523)
          quadrant=all inner_radius=0.006388106 outer_radius=0.007985133
      WrapTorus FCR: xyz_body_rotation=(-1.556 -0.15324 -0.10001) translation=(0.00255524 -0.00359331 -0.0151718)
          quadrant=all inner_radius=0.0007985133 outer_radius=0.001996283
      WrapTorus FCU: xyz_body_rotation=(-1.5738 -0.079762 0.39235) translation=(-0.00982171 -0.00990156 -0.0136546)
          quadrant=all inner_radius=0.00542989 outer_radius=0.006388106
    Body clavicle_L: mass=0.0001487976 mass_center=(-3.53295e-7 0 -2.44589e-7)
        inertia=(0.0001718663 0.0001582748 0.0001582748 0 0 0) meshes=clavicle_lBruno.vtp
    Body scapula_L: mass=0.0001487976 mass_center=(-3.53295e-7 0 -2.44589e-7)
        inertia=(0.0001718663 0.0001582748 0.0001582748 0 0 0) meshes=scapula_lBruno.vtp
    Body humerus_L: mass=3.145283 mass_center=(-0.00746794 -0.133073 -0.00517012)
        inertia=(0.0001824448 0.0001824448 0.0001824448 0 0 0) meshes=humerus_lBruno.vtp
    Body ulna_L: mass=0.9039452 mass_center=(-0.00214627 -0.124943 -0.00148588)
        inertia=(0.0001587044 0.0001587044 0.0001587044 0 0 0) meshes=ulna_lBruno.vtp
    Body radius_L: mass=0.9039452 mass_center=(-0.00214627 -0.124943 -0.00148588)
        inertia=(0.0001587044 0.0001587044 0.0001587044 0 0 0) meshes=radius_lBruno.vtp
      WrapTorus ECU_l: xyz_body_rotation=(0.98664 0.14888 0.2227) translation=(-0.0168982 -0.25057 -0.0361807)
          quadrant=all inner_radius=0.006220181 outer_radius=0.009330271
    Body hand_L: mass=0.6807488 mass_center=(-0.00161632 -0.0543748 -0.00111899)
        inertia=(9.415677e-5 9.415677e-5 9.415677e-5 0 0 0)
        meshes=(pisiform_lBruno.vtp scaphoid_lBruno.vtp triquetrum_lBruno.vtp hamate_lBruno.vtp capitate_lBruno.vtp trapezoid_lBruno.vtp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)
      WrapTorus ECRL_l: xyz_body_rotation=(-1.5383 -0.2344 0.73112) translation=(0.017727 -0.00766573 -0.0166091)
          quadrant=all inner_radius=0.006388106 outer_radius=0.01277621
      WrapTorus ECRB_l: xyz_body_rotation=(-1.3127 0.11781 -0.11624) translation=(0.0100613 -0.00758588 -0.0148523)
          quadrant=all inner_radius=0.006388106 outer_radius=0.007985133
      WrapTorus FCR_l: xyz_body_rotation=(1.556 0.15324 -0.10001) translation=(0.00255524 -0.00359331 0.0151718)
          quadrant=all inner_radius=0.0007985133 outer_radius=0.001996283
      WrapTorus FCU_l: xyz_body_rotation=(1.5738 0.079762 0.39235) translation=(-0.00982171 -0.00990156 0.0136546)
          quadrant=all inner_radius=0.00542989 outer_radius=0.006388106
    Body Abd_L_L1: mass=0.01487976 mass_center=(-3.53295e-5 0 -2.44589e-5)
        inertia=(0.01718663 0.01582748 0.01582748 0 0 0)
      WrapCylinder Cylinder8: xyz_body_rotation=(-1.5708 0 0) translation=(0.0395937 0.0111416 -0.0679002) quadrant=y
          radius=0.06611998 length=0.02228315
    Body Abd_L_L2: mass=0.01487976 mass_center=(-3.53295e-5 0 -2.44589e-5)
        inertia=(0.01718663 0.01582748 0.01582748 0 0 0)
      WrapCylinder Cylinder9: xyz_body_rotation=(-1.5708 0 0) translation=(0.0296953 0.0077991 -0.0679002) quadrant=y
          radius=0.06205106 length=0.02228315
    Body Abd_L_L3: mass=0.01487976 mass_center=(-3.53295e-5 0 -2.44589e-5)
        inertia=(0.01718663 0.01582748 0.01582748 0 0 0)
      WrapCylinder Cylinder10: xyz_body_rotation=(-1.5708 0 0) translation=(0.0296953 0.0155982 -0.0626771) quadrant=y
          radius=0.05696491 length=0.02228315
    Body Abd_L_L4: mass=0.01487976 mass_center=(-3.53295e-5 0 -2.44589e-5)
        inertia=(0.01718663 0.01582748 0.01582748 0 0 0)
      WrapCylinder Cylinder11: xyz_body_rotation=(-1.5708 0 0) translation=(0.0296953 0.0245115 -0.0626771) quadrant=y
          radius=0.05594768 length=0.02228315
    Body Abd_L_L5: mass=0.01487976 mass_center=(-3.53295e-5 0 -2.44589e-5)
        inertia=(0.01718663 0.01582748 0.01582748 0 0 0)
      WrapCylinder Cylinder12: xyz_body_rotation=(-1.5708 0 0) translation=(0.0395937 0.0267398 -0.0679002) quadrant=y
          radius=0.05594768 length=0.02228315
    Body Abd_R_L1: mass=0.01487976 mass_center=(-3.53295e-5 0 -2.44589e-5)
        inertia=(0.01718663 0.01582748 0.01582748 0 0 0)
      WrapCylinder Cylinder3: xyz_body_rotation=(1.5708 0 0) translation=(0.0395937 0.0111416 0.0679002) quadrant=y
          radius=0.06611998 length=0.02228315
    Body Abd_R_L2: mass=0.01487976 mass_center=(-3.53295e-5 0 -2.44589e-5)
        inertia=(0.01718663 0.01582748 0.01582748 0 0 0)
      WrapCylinder Cylinder4: xyz_body_rotation=(1.5708 0 0) translation=(0.0296953 0.0077991 0.0679002) quadrant=y
          radius=0.06205106 length=0.02228315
    Body Abd_R_L3: mass=0.01487976 mass_center=(-3.53295e-5 0 -2.44589e-5)
        inertia=(0.01718663 0.01582748 0.01582748 0 0 0)
      WrapCylinder Cylinder5: xyz_body_rotation=(1.5708 0 0) translation=(0.0296953 0.0155982 0.0626771) quadrant=y
          radius=0.05696491 length=0.02228315
    Body Abd_R_L4: mass=0.01487976 mass_center=(-3.53295e-5 0 -2.44589e-5)
        inertia=(0.01718663 0.01582748 0.01582748 0 0 0)
      WrapCylinder Cylinder6: xyz_body_rotation=(1.5708 0 0) translation=(0.0296953 0.0245115 0.0626771) quadrant=y
          radius=0.05594768 length=0.02228315
    Body Abd_R_L5: mass=0.01487976 mass_center=(-3.53295e-5 0 -2.44589e-5)
        inertia=(0.01718663 0.01582748 0.01582748 0 0 0)
      WrapCylinder Cylinder7: xyz_body_rotation=(1.5708 0 0) translation=(0.0395937 0.0267398 0.0679002) quadrant=y
          radius=0.05594768 length=0.02228315
  JointSet:
    CustomJoint ground_pelvis: socket_parent_frame=ground_offset socket_child_frame=pelvis_offset
      Coordinate pelvis_tilt: default_value=0 range=(-1.570796 1.570796) clamped=false
      Coordinate pelvis_list: default_value=0 range=(-1.570796 1.570796) clamped=false
      Coordinate pelvis_rotation: default_value=0 range=(-3.14159 3.14159) clamped=false
      Coordinate pelvis_tx: default_value=0 range=(-5 5) clamped=false
      Coordinate pelvis_ty: default_value=0 range=(-1 2) clamped=false
      Coordinate pelvis_tz: default_value=0 range=(-3 3) clamped=false
      PhysicalOffsetFrame ground_offset: socket_parent=/ground translation=(0 0 0) [meters]
      PhysicalOffsetFrame pelvis_offset: socket_parent=/bodyset/pelvis translation=(-0.0791874 -0.115087 0)
      SpatialTransform:
        TransformAxis rotation1: coordinates=pelvis_tilt axis=(0 0 1) LinearFunction(coefficients=1 0)
        TransformAxis rotation2: coordinates=pelvis_list axis=(1 0 0) LinearFunction(coefficients=1 0)
        TransformAxis rotation3: coordinates=pelvis_rotation axis=(0 1 0) LinearFunction(coefficients=1 0)
        TransformAxis translation1: coordinates=pelvis_tx axis=(1 0 0) LinearFunction(coefficients=1 0)
        TransformAxis translation2: coordinates=pelvis_ty axis=(0 1 0) LinearFunction(coefficients=1 0)
        TransformAxis translation3: coordinates=pelvis_tz axis=(0 0 1) LinearFunction(coefficients=1 0)
    WeldJoint sacrumpelvis: socket_parent_frame=pelvis_offset socket_child_frame=sacrum_offset
      PhysicalOffsetFrame pelvis_offset: socket_parent=/bodyset/pelvis translation=(0 0 0)
      PhysicalOffsetFrame sacrum_offset: socket_parent=/bodyset/sacrum translation=(0 0.0545937 0)
    CustomJoint hip_r: socket_parent_frame=pelvis_offset socket_child_frame=femur_r_offset
      Coordinate hip_flexion_r: default_value=0 range=(-2.094395 2.094395) clamped=true
      Coordinate hip_adduction_r: default_value=0 range=(-2.094395 2.094395) clamped=true
      Coordinate hip_rotation_r: default_value=0 range=(-2.094395 2.094395) clamped=true
      PhysicalOffsetFrame pelvis_offset: socket_parent=/bodyset/pelvis translation=(-0.0699818 -0.0962944 0.0872257)
      PhysicalOffsetFrame femur_r_offset: socket_parent=/bodyset/femur_r translation=(0 0 0)
      SpatialTransform: axes_held_at_zero=(translation1 translation2 translation3)
        TransformAxis rotation1: coordinates=hip_flexion_r axis=(0 0 1) LinearFunction(coefficients=1 0)
        TransformAxis rotation2: coordinates=hip_adduction_r axis=(1 0 0) LinearFunction(coefficients=1 0)
        TransformAxis rotation3: coordinates=hip_rotation_r axis=(0 1 0) LinearFunction(coefficients=1 0)
    CustomJoint patellofemoral_r: socket_parent_frame=femur_r_offset socket_child_frame=patella_r_offset
      Coordinate knee_angle_r_beta: default_value=0 range=(-99999.9 99999.9) clamped=false
      PhysicalOffsetFrame femur_r_offset: socket_parent=/bodyset/femur_r translation=(0 0 0)
      PhysicalOffsetFrame patella_r_offset: socket_parent=/bodyset/patella_r translation=(0 0 0)
      SpatialTransform: axes_held_at_zero=(rotation2 rotation3 translation3)
        TransformAxis rotation1: coordinates=knee_angle_r_beta axis=(0 0 1)
          SimmSpline: x=(0 0.174533 0.349066 0.523599 0.698132 0.872665 1.0472 1.22173 1.39626 1.5708 1.74533 1.91986 2.0944)
              y=(0.00113686 -0.00629212 -0.105582 -0.253683 -0.414245 -0.579047 -0.747244 -0.91799 -1.09044 -1.26379 -1.43763 -1.61186 -1.78634)
        TransformAxis translation1: coordinates=knee_angle_r_beta axis=(1 0 0)
          MultiplierFunction: scale=1.042026
            SimmSpline f9: x=(0 0.174533 0.349066 0.523599 0.698132 0.872665 1.0472 1.22173 1.39626 1.5708 1.74533 1.91986 2.0944)
                y=(0.04435 0.040692 0.035581 0.029012 0.021473 0.013523 0.005483 -0.002412 -0.009959 -0.016903 -0.022926 -0.027739 -0.030815)
        TransformAxis translation2: coordinates=knee_angle_r_beta axis=(0 1 0)
          MultiplierFunction: scale=1.042026
            SimmSpline f10: x=(0 0.174533 0.349066 0.523599 0.698132 0.872665 1.0472 1.22173 1.39626 1.5708 1.74533 1.91986 2.0944)
                y=(-0.418712 -0.426965 -0.43422 -0.440152 -0.444617 -0.447495 -0.448724 -0.448337 -0.446353 -0.442826 -0.438035 -0.432448 -0.426632)
    CustomJoint knee_r: socket_parent_frame=femur_r_offset socket_child_frame=tibia_r_offset
      Coordinate knee_angle_r: default_value=0 range=(-2.094395 0.1745329) clamped=true
      PhysicalOffsetFrame femur_r_offset: socket_parent=/bodyset/femur_r translation=(0 0 0)
      PhysicalOffsetFrame tibia_r_offset: socket_parent=/bodyset/tibia_r translation=(0 0 0)
      SpatialTransform: axes_held_at_zero=(rotation2 rotation3 translation3)
        TransformAxis rotation1: coordinates=knee_angle_r axis=(0 0 1) LinearFunction(coefficients=1 0)
        TransformAxis translation1: coordinates=knee_angle_r axis=(1 0 0)
          MultiplierFunction: scale=1.042026
            SimmSpline: x=(-2.0944 -1.74533 -1.39626 -1.0472 -0.698132 -0.349066 -0.174533 0.197344 0.337395 0.490178 1.52146 2.0944)
                y=(-0.0032 0.00179 0.00411 0.0041 0.00212 -0.001 -0.0031 -0.005227 -0.005435 -0.005574 -0.005435 -0.00525)
        TransformAxis translation2: coordinates=knee_angle_r axis=(0 1 0)
          MultiplierFunction: scale=1.042026
            SimmSpline: x=(-2.0944 -1.22173 -0.523599 -0.349066 -0.174533 0.159149 2.0944)
                y=(-0.4226 -0.4082 -0.399 -0.3976 -0.3966 -0.395264 -0.396)
    CustomJoint ankle_r: socket_parent_frame=tibia_r_offset socket_child_frame=talus_r_offset
      Coordinate ankle_rx_r: default_value=0 range=(-3.14 3.14) clamped=true
      Coordinate ankle_ry_r: default_value=0 range=(-3.14 3.14) clamped=true
      Coordinate ankle_rz_r: default_value=0 range=(-3.14 3.14) clamped=true
      PhysicalOffsetFrame tibia_r_offset: socket_parent=/bodyset/tibia_r translation=(0 -0.477525 0)
      PhysicalOffsetFrame talus_r_offset: socket_parent=/bodyset/talus_r translation=(0 0 0)
      SpatialTransform: axes_held_at_zero=(translation1 translation2 translation3)
        TransformAxis rotation1: coordinates=ankle_rx_r axis=(1 0 0) LinearFunction(coefficients=1 0)
        TransformAxis rotation2: coordinates=ankle_ry_r axis=(0 1 0) LinearFunction(coefficients=1 0)
        TransformAxis rotation3: coordinates=ankle_rz_r axis=(0 0 1) LinearFunction(coefficients=1 0)
    CustomJoint subtalar_r: socket_parent_frame=talus_r_offset socket_child_frame=calcn_r_offset
      Coordinate subtalar_angle_r: default_value=0 range=(-1.570796 1.570796) clamped=true locked=true
      PhysicalOffsetFrame talus_r_offset: socket_parent=/bodyset/talus_r translation=(-0.0587966 -0.0505745 0.00954827)
      PhysicalOffsetFrame calcn_r_offset: socket_parent=/bodyset/calcn_r translation=(0 0 0)
      SpatialTransform: axes_held_at_zero=(rotation2 rotation3 translation1 translation2 translation3)
        TransformAxis rotation1: coordinates=subtalar_angle_r axis=(0.7871796 0.6047475 -0.1209495)
            LinearFunction(coefficients=1 0)
    CustomJoint mtp_r: socket_parent_frame=calcn_r_offset socket_child_frame=toes_r_offset
      Coordinate mtp_angle_r: default_value=0 range=(-1.570796 1.570796) clamped=true locked=true
      PhysicalOffsetFrame calcn_r_offset: socket_parent=/bodyset/calcn_r translation=(0.215559 -0.00241118 0.00130204)
      PhysicalOffsetFrame toes_r_offset: socket_parent=/bodyset/toes_r translation=(0 0 0)
      SpatialTransform: axes_held_at_zero=(rotation2 rotation3 translation1 translation2 translation3)
        TransformAxis rotation1: coordinates=mtp_angle_r axis=(-0.5809544 0 0.8139361) LinearFunction(coefficients=1 0)
    CustomJoint hip_l: socket_parent_frame=pelvis_offset socket_child_frame=femur_l_offset
      Coordinate hip_flexion_l: default_value=0 range=(-2.094395 2.094395) clamped=true
      Coordinate hip_adduction_l: default_value=0 range=(-2.094395 2.094395) clamped=true
      Coordinate hip_rotation_l: default_value=0 range=(-2.094395 2.094395) clamped=true
      PhysicalOffsetFrame pelvis_offset: socket_parent=/bodyset/pelvis translation=(-0.0699818 -0.0962944 -0.0872257)
      PhysicalOffsetFrame femur_l_offset: socket_parent=/bodyset/femur_l translation=(0 0 0)
      SpatialTransform: axes_held_at_zero=(translation1 translation2 translation3)
        TransformAxis rotation1: coordinates=hip_flexion_l axis=(0 0 1) LinearFunction(coefficients=1 0)
        TransformAxis rotation2: coordinates=hip_adduction_l axis=(-1 0 0) LinearFunction(coefficients=1 0)
        TransformAxis rotation3: coordinates=hip_rotation_l axis=(0 -1 0) LinearFunction(coefficients=1 0)
    CustomJoint patellofemoral_l: socket_parent_frame=femur_l_offset socket_child_frame=patella_l_offset
      Coordinate knee_angle_l_beta: default_value=0 range=(-99999.9 99999.9) clamped=false
      PhysicalOffsetFrame femur_l_offset: socket_parent=/bodyset/femur_l translation=(0 0 0)
      PhysicalOffsetFrame patella_l_offset: socket_parent=/bodyset/patella_l translation=(0 0 0)
      SpatialTransform: axes_held_at_zero=(rotation2 rotation3 translation3)
        TransformAxis rotation1: coordinates=knee_angle_l_beta axis=(0 0 1)
          SimmSpline: x=(0 0.174533 0.349066 0.523599 0.698132 0.872665 1.0472 1.22173 1.39626 1.5708 1.74533 1.91986 2.0944)
              y=(0.00113686 -0.00629212 -0.105582 -0.253683 -0.414245 -0.579047 -0.747244 -0.91799 -1.09044 -1.26379 -1.43763 -1.61186 -1.78634)
        TransformAxis translation1: coordinates=knee_angle_l_beta axis=(1 0 0)
          MultiplierFunction: scale=1.042026
            SimmSpline f23: x=(0 0.174533 0.349066 0.523599 0.698132 0.872665 1.0472 1.22173 1.39626 1.5708 1.74533 1.91986 2.0944)
                y=(0.04435 0.040692 0.035581 0.029012 0.021473 0.013523 0.005483 -0.002412 -0.009959 -0.016903 -0.022926 -0.027739 -0.030815)
        TransformAxis translation2: coordinates=knee_angle_l_beta axis=(0 1 0)
          MultiplierFunction: scale=1.042026
            SimmSpline f24: x=(0 0.174533 0.349066 0.523599 0.698132 0.872665 1.0472 1.22173 1.39626 1.5708 1.74533 1.91986 2.0944)
                y=(-0.418712 -0.426965 -0.43422 -0.440152 -0.444617 -0.447495 -0.448724 -0.448337 -0.446353 -0.442826 -0.438035 -0.432448 -0.426632)
    CustomJoint knee_l: socket_parent_frame=femur_l_offset socket_child_frame=tibia_l_offset
      Coordinate knee_angle_l: default_value=0 range=(-2.094395 0.1745329) clamped=true
      PhysicalOffsetFrame femur_l_offset: socket_parent=/bodyset/femur_l translation=(0 0 0)
      PhysicalOffsetFrame tibia_l_offset: socket_parent=/bodyset/tibia_l translation=(0 0 0)
      SpatialTransform: axes_held_at_zero=(rotation2 rotation3 translation3)
        TransformAxis rotation1: coordinates=knee_angle_l axis=(0 0 1) LinearFunction(coefficients=1 0)
        TransformAxis translation1: coordinates=knee_angle_l axis=(1 0 0)
          MultiplierFunction: scale=1.042026
            SimmSpline: x=(-2.0944 -1.74533 -1.39626 -1.0472 -0.698132 -0.349066 -0.174533 0.197344 0.337395 0.490178 1.52146 2.0944)
                y=(-0.0032 0.00179 0.00411 0.0041 0.00212 -0.001 -0.0031 -0.005227 -0.005435 -0.005574 -0.005435 -0.00525)
        TransformAxis translation2: coordinates=knee_angle_l axis=(0 1 0)
          MultiplierFunction: scale=1.042026
            SimmSpline: x=(-2.0944 -1.22173 -0.523599 -0.349066 -0.174533 0.159149 2.0944)
                y=(-0.4226 -0.4082 -0.399 -0.3976 -0.3966 -0.395264 -0.396)
    CustomJoint ankle_l: socket_parent_frame=tibia_l_offset socket_child_frame=talus_l_offset
      Coordinate ankle_rx_l: default_value=0 range=(-3.14 3.14) clamped=true
      Coordinate ankle_ry_l: default_value=0 range=(-3.14 3.14) clamped=true
      Coordinate ankle_rz_l: default_value=0 range=(-3.14 3.14) clamped=true
      PhysicalOffsetFrame tibia_l_offset: socket_parent=/bodyset/tibia_l translation=(0 -0.477525 0)
      PhysicalOffsetFrame talus_l_offset: socket_parent=/bodyset/talus_l translation=(0 0 0)
      SpatialTransform: axes_held_at_zero=(translation1 translation2 translation3)
        TransformAxis rotation1: coordinates=ankle_rx_l axis=(1 0 0) LinearFunction(coefficients=1 0)
        TransformAxis rotation2: coordinates=ankle_ry_l axis=(0 1 0) LinearFunction(coefficients=1 0)
        TransformAxis rotation3: coordinates=ankle_rz_l axis=(0 0 1) LinearFunction(coefficients=1 0)
    CustomJoint subtalar_l: socket_parent_frame=talus_l_offset socket_child_frame=calcn_l_offset
      Coordinate subtalar_angle_l: default_value=0 range=(-1.570796 1.570796) clamped=true locked=true
      PhysicalOffsetFrame talus_l_offset: socket_parent=/bodyset/talus_l
          translation=(-0.0587966 -0.0505745 -0.00954827)
      PhysicalOffsetFrame calcn_l_offset: socket_parent=/bodyset/calcn_l translation=(0 0 0)
      SpatialTransform: axes_held_at_zero=(rotation2 rotation3 translation1 translation2 translation3)
        TransformAxis rotation1: coordinates=subtalar_angle_l axis=(-0.7871796 -0.6047475 -0.1209495)
            LinearFunction(coefficients=1 0)
    CustomJoint mtp_l: socket_parent_frame=calcn_l_offset socket_child_frame=toes_l_offset
      Coordinate mtp_angle_l: default_value=0 range=(-1.047198 1.047198) clamped=true locked=true
      PhysicalOffsetFrame calcn_l_offset: socket_parent=/bodyset/calcn_l translation=(0.215559 -0.00241118 -0.00130204)
      PhysicalOffsetFrame toes_l_offset: socket_parent=/bodyset/toes_l translation=(0 0 0)
      SpatialTransform: axes_held_at_zero=(rotation2 rotation3 translation1 translation2 translation3)
        TransformAxis rotation1: coordinates=mtp_angle_l axis=(0.5809544 0 0.8139361) LinearFunction(coefficients=1 0)
    CustomJoint Abdjnt: socket_parent_frame=sacrum_offset socket_child_frame=Abdomen_offset
      Coordinate Abs_FE: default_value=0 range=(-1.57 1.57) clamped=false
      Coordinate Abs_LB: default_value=0 range=(-1.57 1.57) clamped=false
      Coordinate Abs_AR: default_value=0 range=(-1.57 1.57) clamped=false
      PhysicalOffsetFrame sacrum_offset: socket_parent=/bodyset/sacrum translation=(-0.0814803 0.0791052 0)
      PhysicalOffsetFrame Abdomen_offset: socket_parent=/bodyset/Abdomen translation=(-0.0890858 -0.100274 0)
      SpatialTransform: axes_held_at_zero=(translation1 translation2 translation3)
        TransformAxis rotation1: coordinates=Abs_FE axis=(0 0 1) LinearFunction(coefficients=1 0)
        TransformAxis rotation2: coordinates=Abs_LB axis=(1 0 0) LinearFunction(coefficients=1 0)
        TransformAxis rotation3: coordinates=Abs_AR axis=(0 1 0) LinearFunction(coefficients=1 0)
    CustomJoint L5_S1_IVDjnt: socket_parent_frame=sacrum_offset socket_child_frame=lumbar5_offset
      Coordinate L5_S1_FE: default_value=0 range=(-1.57 1.57) clamped=true
      Coordinate L5_S1_LB: default_value=0 range=(-1.57 1.57) clamped=true
      Coordinate L5_S1_AR: default_value=0 range=(-1.57 1.57) clamped=true
      PhysicalOffsetFrame sacrum_offset: socket_parent=/bodyset/sacrum translation=(-0.102373 0.0791052 0)
          orientation=(0 0 -0.36652) [radians]
      PhysicalOffsetFrame lumbar5_offset: socket_parent=/bodyset/lumbar5 translation=(0 0 0)
      SpatialTransform: axes_held_at_zero=(translation1 translation2 translation3)
        TransformAxis rotation1: coordinates=L5_S1_FE axis=(0 0 1) LinearFunction(coefficients=1 0)
        TransformAxis rotation2: coordinates=L5_S1_LB axis=(1 0 0) LinearFunction(coefficients=1 0)
        TransformAxis rotation3: coordinates=L5_S1_AR axis=(0 1 0) LinearFunction(coefficients=1 0)
    CustomJoint L4_L5_IVDjnt: socket_parent_frame=lumbar5_offset socket_child_frame=lumbar4_offset
      Coordinate L4_L5_FE: default_value=0 range=(-1.57 1.57) clamped=false
      Coordinate L4_L5_LB: default_value=0 range=(-1.57 1.57) clamped=false
      Coordinate L4_L5_AR: default_value=0 range=(-1.57 1.57) clamped=false
      PhysicalOffsetFrame lumbar5_offset: socket_parent=/bodyset/lumbar5 translation=(0 0.047237 0)
          orientation=(0 0 0.31416)
      PhysicalOffsetFrame lumbar4_offset: socket_parent=/bodyset/lumbar4 translation=(0 0 0)
      SpatialTransform: axes_held_at_zero=(translation1 translation2 translation3)
        TransformAxis rotation1: coordinates=L4_L5_FE axis=(0 0 1) LinearFunction(coefficients=1 0)
        TransformAxis rotation2: coordinates=L4_L5_LB axis=(1 0 0) LinearFunction(coefficients=1 0)
        TransformAxis rotation3: coordinates=L4_L5_AR axis=(0 1 0) LinearFunction(coefficients=1 0)
    CustomJoint L3_L4_IVDjnt: socket_parent_frame=lumbar4_offset socket_child_frame=lumbar3_offset
      Coordinate L3_L4_FE: default_value=0 range=(-1.57 1.57) clamped=false
      Coordinate L3_L4_LB: default_value=0 range=(-1.57 1.57) clamped=false
      Coordinate L3_L4_AR: default_value=0 range=(-1.57 1.57) clamped=false
      PhysicalOffsetFrame lumbar4_offset: socket_parent=/bodyset/lumbar4 translation=(0 0.0410546 0)
          orientation=(0 0 0.20944)
      PhysicalOffsetFrame lumbar3_offset: socket_parent=/bodyset/lumbar3 translation=(0 0 0)
      SpatialTransform: axes_held_at_zero=(translation1 translation2 translation3)
        TransformAxis rotation1: coordinates=L3_L4_FE axis=(0 0 1) LinearFunction(coefficients=1 0)
        TransformAxis rotation2: coordinates=L3_L4_LB axis=(1 0 0) LinearFunction(coefficients=1 0)
        TransformAxis rotation3: coordinates=L3_L4_AR axis=(0 1 0) LinearFunction(coefficients=1 0)
    CustomJoint L2_L3_IVDjnt: socket_parent_frame=lumbar3_offset socket_child_frame=lumbar2_offset
      Coordinate L2_L3_FE: default_value=0 range=(-1.57 1.57) clamped=false
      Coordinate L2_L3_LB: default_value=0 range=(-1.57 1.57) clamped=false
      Coordinate L2_L3_AR: default_value=0 range=(-1.57 1.57) clamped=false
      PhysicalOffsetFrame lumbar3_offset: socket_parent=/bodyset/lumbar3 translation=(0 0.0414715 0)
          orientation=(0 0 0.12217)
      PhysicalOffsetFrame lumbar2_offset: socket_parent=/bodyset/lumbar2 translation=(0 0 0)
      SpatialTransform: axes_held_at_zero=(translation1 translation2 translation3)
        TransformAxis rotation1: coordinates=L2_L3_FE axis=(0 0 1) LinearFunction(coefficients=1 0)
        TransformAxis rotation2: coordinates=L2_L3_LB axis=(1 0 0) LinearFunction(coefficients=1 0)
        TransformAxis rotation3: coordinates=L2_L3_AR axis=(0 1 0) LinearFunction(coefficients=1 0)
    CustomJoint L1_L2_IVDjnt: socket_parent_frame=lumbar2_offset socket_child_frame=lumbar1_offset
      Coordinate L1_L2_FE: default_value=0 range=(-1.57 1.57) clamped=false
      Coordinate L1_L2_LB: default_value=0 range=(-1.57 1.57) clamped=false
      Coordinate L1_L2_AR: default_value=0 range=(-1.57 1.57) clamped=false
      PhysicalOffsetFrame lumbar2_offset: socket_parent=/bodyset/lumbar2 translation=(0 0.039479 0)
          orientation=(0 0 0.10472)
      PhysicalOffsetFrame lumbar1_offset: socket_parent=/bodyset/lumbar1 translation=(0 0 0)
      SpatialTransform: axes_held_at_zero=(translation1 translation2 translation3)
        TransformAxis rotation1: coordinates=L1_L2_FE axis=(0 0 1) LinearFunction(coefficients=1 0)
        TransformAxis rotation2: coordinates=L1_L2_LB axis=(1 0 0) LinearFunction(coefficients=1 0)
        TransformAxis rotation3: coordinates=L1_L2_AR axis=(0 1 0) LinearFunction(coefficients=1 0)
    CustomJoint T12_L1_IVDjnt: socket_parent_frame=lumbar1_offset socket_child_frame=thoracic12_offset
      Coordinate T12_L1_FE: default_value=0 range=(-1.57 1.57) clamped=false
      Coordinate T12_L1_LB: default_value=0 range=(-1.57 1.57) clamped=false
      Coordinate T12_L1_AR: default_value=0 range=(-1.57 1.57) clamped=false
      PhysicalOffsetFrame lumbar1_offset: socket_parent=/bodyset/lumbar1 translation=(0 0.0426552 0)
          orientation=(0 0 -0.034907)
      PhysicalOffsetFrame thoracic12_offset: socket_parent=/bodyset/thoracic12 translation=(0 0 0)
      SpatialTransform: axes_held_at_zero=(translation1 translation2 translation3)
        TransformAxis rotation1: coordinates=T12_L1_FE axis=(0 0 1) LinearFunction(coefficients=1 0)
        TransformAxis rotation2: coordinates=T12_L1_LB axis=(1 0 0) LinearFunction(coefficients=1 0)
        TransformAxis rotation3: coordinates=T12_L1_AR axis=(0 1 0) LinearFunction(coefficients=1 0)
    CustomJoint T11_T12_IVDjnt: socket_parent_frame=thoracic12_offset socket_child_frame=thoracic11_offset
      Coordinate T11_T12_FE: default_value=0 range=(-1.57 1.57) clamped=false
      Coordinate T11_T12_LB: default_value=0 range=(-1.57 1.57) clamped=false
      Coordinate T11_T12_AR: default_value=0 range=(-1.57 1.57) clamped=false
      PhysicalOffsetFrame thoracic12_offset: socket_parent=/bodyset/thoracic12 translation=(0 0.0401329 0)
          orientation=(0 0 -0.069813)
      PhysicalOffsetFrame thoracic11_offset: socket_parent=/bodyset/thoracic11 translation=(0 0 0)
      SpatialTransform: axes_held_at_zero=(translation1 translation2 translation3)
        TransformAxis rotation1: coordinates=T11_T12_FE axis=(0 0 1) LinearFunction(coefficients=1 0)
        TransformAxis rotation2: coordinates=T11_T12_LB axis=(1 0 0) LinearFunction(coefficients=1 0)
        TransformAxis rotation3: coordinates=T11_T12_AR axis=(0 1 0) LinearFunction(coefficients=1 0)
    CustomJoint T10_T11_IVDjnt: socket_parent_frame=thoracic11_offset socket_child_frame=thoracic10_offset
      Coordinate T10_T11_FE: default_value=0 range=(-1.57 1.57) clamped=false
      Coordinate T10_T11_LB: default_value=0 range=(-1.57 1.57) clamped=false
      Coordinate T10_T11_AR: default_value=0 range=(-1.57 1.57) clamped=false
      PhysicalOffsetFrame thoracic11_offset: socket_parent=/bodyset/thoracic11 translation=(0 0.0342506 0)
          orientation=(0 0 -0.087266)
      PhysicalOffsetFrame thoracic10_offset: socket_parent=/bodyset/thoracic10 translation=(0 0 0)
      SpatialTransform: axes_held_at_zero=(translation1 translation2 translation3)
        TransformAxis rotation1: coordinates=T10_T11_FE axis=(0 0 1) LinearFunction(coefficients=1 0)
        TransformAxis rotation2: coordinates=T10_T11_LB axis=(1 0 0) LinearFunction(coefficients=1 0)
        TransformAxis rotation3: coordinates=T10_T11_AR axis=(0 1 0) LinearFunction(coefficients=1 0)
    CustomJoint T9_T10_IVDjnt: socket_parent_frame=thoracic10_offset socket_child_frame=thoracic9_offset
      Coordinate T9_T10_FE: default_value=0 range=(-1.57 1.57) clamped=false
      Coordinate T9_T10_LB: default_value=0 range=(-1.57 1.57) clamped=false
      Coordinate T9_T10_AR: default_value=0 range=(-1.57 1.57) clamped=false
      PhysicalOffsetFrame thoracic10_offset: socket_parent=/bodyset/thoracic10 translation=(0 0.0329027 0)
          orientation=(0 0 -0.069813)
      PhysicalOffsetFrame thoracic9_offset: socket_parent=/bodyset/thoracic9 translation=(0 0 0)
      SpatialTransform: axes_held_at_zero=(translation1 translation2 translation3)
        TransformAxis rotation1: coordinates=T9_T10_FE axis=(0 0 1) LinearFunction(coefficients=1 0)
        TransformAxis rotation2: coordinates=T9_T10_LB axis=(1 0 0) LinearFunction(coefficients=1 0)
        TransformAxis rotation3: coordinates=T9_T10_AR axis=(0 1 0) LinearFunction(coefficients=1 0)
    CustomJoint T8_T9_IVDjnt: socket_parent_frame=thoracic9_offset socket_child_frame=thoracic8_offset
      Coordinate T8_T9_FE: default_value=0 range=(-1.57 1.57) clamped=false
      Coordinate T8_T9_LB: default_value=0 range=(-1.57 1.57) clamped=false
      Coordinate T8_T9_AR: default_value=0 range=(-1.57 1.57) clamped=false
      PhysicalOffsetFrame thoracic9_offset: socket_parent=/bodyset/thoracic9 translation=(0 0.0282072 0)
          orientation=(0 0 -0.087266)
      PhysicalOffsetFrame thoracic8_offset: socket_parent=/bodyset/thoracic8 translation=(0 0 0)
      SpatialTransform: axes_held_at_zero=(translation1 translation2 translation3)
        TransformAxis rotation1: coordinates=T8_T9_FE axis=(0 0 1) LinearFunction(coefficients=1 0)
        TransformAxis rotation2: coordinates=T8_T9_LB axis=(1 0 0) LinearFunction(coefficients=1 0)
        TransformAxis rotation3: coordinates=T8_T9_AR axis=(0 1 0) LinearFunction(coefficients=1 0)
    CustomJoint T7_T8_IVDjnt: socket_parent_frame=thoracic8_offset socket_child_frame=thoracic7_offset
      Coordinate T7_T8_FE: default_value=0 range=(-1.57 1.57) clamped=false
      Coordinate T7_T8_LB: default_value=0 range=(-1.57 1.57) clamped=false
      Coordinate T7_T8_AR: default_value=0 range=(-1.57 1.57) clamped=false
      PhysicalOffsetFrame thoracic8_offset: socket_parent=/bodyset/thoracic8 translation=(0 0.0274418 0)
          orientation=(0 0 -0.10472)
      PhysicalOffsetFrame thoracic7_offset: socket_parent=/bodyset/thoracic7 translation=(0 0 0)
      SpatialTransform: axes_held_at_zero=(translation1 translation2 translation3)
        TransformAxis rotation1: coordinates=T7_T8_FE axis=(0 0 1) LinearFunction(coefficients=1 0)
        TransformAxis rotation2: coordinates=T7_T8_LB axis=(1 0 0) LinearFunction(coefficients=1 0)
        TransformAxis rotation3: coordinates=T7_T8_AR axis=(0 1 0) LinearFunction(coefficients=1 0)
    CustomJoint T6_T7_IVDjnt: socket_parent_frame=thoracic7_offset socket_child_frame=thoracic6_offset
      Coordinate T6_T7_FE: default_value=0 range=(-1.57 1.57) clamped=false
      Coordinate T6_T7_LB: default_value=0 range=(-1.57 1.57) clamped=false
      Coordinate T6_T7_AR: default_value=0 range=(-1.57 1.57) clamped=false
      PhysicalOffsetFrame thoracic7_offset: socket_parent=/bodyset/thoracic7 translation=(0 0.0289655 0)
          orientation=(0 0 -0.10472)
      PhysicalOffsetFrame thoracic6_offset: socket_parent=/bodyset/thoracic6 translation=(0 0 0)
      SpatialTransform: axes_held_at_zero=(translation1 translation2 translation3)
        TransformAxis rotation1: coordinates=T6_T7_FE axis=(0 0 1) LinearFunction(coefficients=1 0)
        TransformAxis rotation2: coordinates=T6_T7_LB axis=(1 0 0) LinearFunction(coefficients=1 0)
        TransformAxis rotation3: coordinates=T6_T7_AR axis=(0 1 0) LinearFunction(coefficients=1 0)
    CustomJoint T5_T6_IVDjnt: socket_parent_frame=thoracic6_offset socket_child_frame=thoracic5_offset
      Coordinate T5_T6_FE: default_value=0 range=(-1.57 1.57) clamped=false
      Coordinate T5_T6_LB: default_value=0 range=(-1.57 1.57) clamped=false
      Coordinate T5_T6_AR: default_value=0 range=(-1.57 1.57) clamped=false
      PhysicalOffsetFrame thoracic6_offset: socket_parent=/bodyset/thoracic6 translation=(0 0.029021 0)
          orientation=(0 0 -0.10472)
      PhysicalOffsetFrame thoracic5_offset: socket_parent=/bodyset/thoracic5 translation=(0 0 0)
      SpatialTransform: axes_held_at_zero=(translation1 translation2 translation3)
        TransformAxis rotation1: coordinates=T5_T6_FE axis=(0 0 1) LinearFunction(coefficients=1 0)
        TransformAxis rotation2: coordinates=T5_T6_LB axis=(1 0 0) LinearFunction(coefficients=1 0)
        TransformAxis rotation3: coordinates=T5_T6_AR axis=(0 1 0) LinearFunction(coefficients=1 0)
    CustomJoint T4_T5_IVDjnt: socket_parent_frame=thoracic5_offset socket_child_frame=thoracic4_offset
      Coordinate T4_T5_FE: default_value=0 range=(-1.57 1.57) clamped=false
      Coordinate T4_T5_LB: default_value=0 range=(-1.57 1.57) clamped=false
      Coordinate T4_T5_AR: default_value=0 range=(-1.57 1.57) clamped=false
      PhysicalOffsetFrame thoracic5_offset: socket_parent=/bodyset/thoracic5 translation=(0 0.0304515 0)
          orientation=(0 0 -0.10472)
      PhysicalOffsetFrame thoracic4_offset: socket_parent=/bodyset/thoracic4 translation=(0 0 0)
      SpatialTransform: axes_held_at_zero=(translation1 translation2 translation3)
        TransformAxis rotation1: coordinates=T4_T5_FE axis=(0 0 1) LinearFunction(coefficients=1 0)
        TransformAxis rotation2: coordinates=T4_T5_LB axis=(1 0 0) LinearFunction(coefficients=1 0)
        TransformAxis rotation3: coordinates=T4_T5_AR axis=(0 1 0) LinearFunction(coefficients=1 0)
    CustomJoint T3_T4_IVDjnt: socket_parent_frame=thoracic4_offset socket_child_frame=thoracic3_offset
      Coordinate T3_T4_FE: default_value=0 range=(-1.57 1.57) clamped=false
      Coordinate T3_T4_LB: default_value=0 range=(-1.57 1.57) clamped=false
      Coordinate T3_T4_AR: default_value=0 range=(-1.57 1.57) clamped=false
      PhysicalOffsetFrame thoracic4_offset: socket_parent=/bodyset/thoracic4 translation=(0 0.0293637 0)
          orientation=(0 0 -0.069813)
      PhysicalOffsetFrame thoracic3_offset: socket_parent=/bodyset/thoracic3 translation=(0 0 0)
      SpatialTransform: axes_held_at_zero=(translation1 translation2 translation3)
        TransformAxis rotation1: coordinates=T3_T4_FE axis=(0 0 1) LinearFunction(coefficients=1 0)
        TransformAxis rotation2: coordinates=T3_T4_LB axis=(1 0 0) LinearFunction(coefficients=1 0)
        TransformAxis rotation3: coordinates=T3_T4_AR axis=(0 1 0) LinearFunction(coefficients=1 0)
    CustomJoint T2_T3_IVDjnt: socket_parent_frame=thoracic3_offset socket_child_frame=thoracic2_offset
      Coordinate T2_T3_FE: default_value=0 range=(-1.57 1.57) clamped=false
      Coordinate T2_T3_LB: default_value=0 range=(-1.57 1.57) clamped=false
      Coordinate T2_T3_AR: default_value=0 range=(-1.57 1.57) clamped=false
      PhysicalOffsetFrame thoracic3_offset: socket_parent=/bodyset/thoracic3 translation=(0 0.0274813 0)
          orientation=(0 0 -0.05236)
      PhysicalOffsetFrame thoracic2_offset: socket_parent=/bodyset/thoracic2 translation=(0 0 0)
      SpatialTransform: axes_held_at_zero=(translation1 translation2 translation3)
        TransformAxis rotation1: coordinates=T2_T3_FE axis=(0 0 1) LinearFunction(coefficients=1 0)
        TransformAxis rotation2: coordinates=T2_T3_LB axis=(1 0 0) LinearFunction(coefficients=1 0)
        TransformAxis rotation3: coordinates=T2_T3_AR axis=(0 1 0) LinearFunction(coefficients=1 0)
    CustomJoint T1_T2_IVDjnt: socket_parent_frame=thoracic2_offset socket_child_frame=thoracic1_offset
      Coordinate T1_T2_FE: default_value=0 range=(-1.57 1.57) clamped=false
      Coordinate T1_T2_LB: default_value=0 range=(-1.57 1.57) clamped=false
      Coordinate T1_T2_AR: default_value=0 range=(-1.57 1.57) clamped=false
      PhysicalOffsetFrame thoracic2_offset: socket_parent=/bodyset/thoracic2 translation=(0 0.0258207 0)
          orientation=(0 0 -0.017453)
      PhysicalOffsetFrame thoracic1_offset: socket_parent=/bodyset/thoracic1 translation=(0 0 0)
      SpatialTransform: axes_held_at_zero=(translation1 translation2 translation3)
        TransformAxis rotation1: coordinates=T1_T2_FE axis=(0 0 1) LinearFunction(coefficients=1 0)
        TransformAxis rotation2: coordinates=T1_T2_LB axis=(1 0 0) LinearFunction(coefficients=1 0)
        TransformAxis rotation3: coordinates=T1_T2_AR axis=(0 1 0) LinearFunction(coefficients=1 0)
    WeldJoint T1_head_neck: socket_parent_frame=thoracic1_offset socket_child_frame=head_neck_offset
      PhysicalOffsetFrame thoracic1_offset: socket_parent=/bodyset/thoracic1 translation=(-0.00677052 0.0260251 0)
          orientation=(0 0 0.5236)
      PhysicalOffsetFrame head_neck_offset: socket_parent=/bodyset/head_neck translation=(0 0 0)
    WeldJoint T12_r12R_CVjnt: socket_parent_frame=thoracic12_offset socket_child_frame=rib12_R_offset
      PhysicalOffsetFrame thoracic12_offset: socket_parent=/bodyset/thoracic12
          translation=(-0.0218221 0.0261622 0.0223789) orientation=(1.5708 3.1416 0.2748)
      PhysicalOffsetFrame rib12_R_offset: socket_parent=/bodyset/rib12_R translation=(0 0 0)
          orientation=(-1.5708 -0.349066 -2.86679)
    WeldJoint T11_r11R_CVjnt: socket_parent_frame=thoracic11_offset socket_child_frame=rib11_R_offset
      PhysicalOffsetFrame thoracic11_offset: socket_parent=/bodyset/thoracic11
          translation=(-0.0158177 0.021795 0.0175392) orientation=(1.5708 3.1416 0.34175)
      PhysicalOffsetFrame rib11_R_offset: socket_parent=/bodyset/rib11_R translation=(0 0 0)
          orientation=(-1.5708 -0.279253 -2.79985)
    WeldJoint T10_r10R_CVjnt: socket_parent_frame=thoracic10_offset socket_child_frame=rib10_R_offset
      PhysicalOffsetFrame thoracic10_offset: socket_parent=/bodyset/thoracic10
          translation=(-0.0147318 0.0329027 0.0177794) orientation=(1.5708 3.1416 0.40034)
      PhysicalOffsetFrame rib10_R_offset: socket_parent=/bodyset/rib10_R translation=(0 0 0)
          orientation=(-1.5708 -0.191986 -2.74125)
    WeldJoint T9_r9R_CVjnt: socket_parent_frame=thoracic9_offset socket_child_frame=rib9_R_offset
      PhysicalOffsetFrame thoracic9_offset: socket_parent=/bodyset/thoracic9
          translation=(-0.0115841 0.0282072 0.0153371) orientation=(1.5708 3.1416 0.45172)
      PhysicalOffsetFrame rib9_R_offset: socket_parent=/bodyset/rib9_R translation=(0 0 0)
          orientation=(-1.5708 -0.122173 -2.68987)
    WeldJoint T8_r8R_CVjnt: socket_parent_frame=thoracic8_offset socket_child_frame=rib8_R_offset
      PhysicalOffsetFrame thoracic8_offset: socket_parent=/bodyset/thoracic8
          translation=(-0.0103894 0.0274418 0.0152326) orientation=(1.5708 3.1416 0.49691)
      PhysicalOffsetFrame rib8_R_offset: socket_parent=/bodyset/rib8_R translation=(0 0 0)
          orientation=(-1.5708 -0.0349066 -2.64468)
    WeldJoint T7_r7R_CVjnt: socket_parent_frame=thoracic7_offset socket_child_frame=rib7_R_offset
      PhysicalOffsetFrame thoracic7_offset: socket_parent=/bodyset/thoracic7
          translation=(-0.00996672 0.0289655 0.0163713) orientation=(1.5708 3.1416 0.53682)
      PhysicalOffsetFrame rib7_R_offset: socket_parent=/bodyset/rib7_R translation=(0 0 0)
          orientation=(-1.5708 0.0698132 -2.60477)
    WeldJoint T6_r6R_CVjnt: socket_parent_frame=thoracic6_offset socket_child_frame=rib6_R_offset
      PhysicalOffsetFrame thoracic6_offset: socket_parent=/bodyset/thoracic6
          translation=(-0.00876198 0.029021 0.0163619) orientation=(1.5708 3.1416 0.57221)
      PhysicalOffsetFrame rib6_R_offset: socket_parent=/bodyset/rib6_R translation=(0 0 0)
          orientation=(-1.5708 0.174533 -2.56939)
    WeldJoint T5_r5R_CVjnt: socket_parent_frame=thoracic5_offset socket_child_frame=rib5_R_offset
      PhysicalOffsetFrame thoracic5_offset: socket_parent=/bodyset/thoracic5
          translation=(-0.00780481 0.0304515 0.0168852) orientation=(1.5708 3.1416 0.60373)
      PhysicalOffsetFrame rib5_R_offset: socket_parent=/bodyset/rib5_R translation=(0 0 0)
          orientation=(-1.5708 0.279253 -2.53787)
    WeldJoint T4_r4R_CVjnt: socket_parent_frame=thoracic4_offset socket_child_frame=rib4_R_offset
      PhysicalOffsetFrame thoracic4_offset: socket_parent=/bodyset/thoracic4
          translation=(-0.00606189 0.0293637 0.0155847) orientation=(1.5708 3.1416 0.63193)
      PhysicalOffsetFrame rib4_R_offset: socket_parent=/bodyset/rib4_R translation=(0 0 0)
          orientation=(-1.5708 0.383972 -2.50967)
    WeldJoint T3_r3R_CVjnt: socket_parent_frame=thoracic3_offset socket_child_frame=rib3_R_offset
      PhysicalOffsetFrame thoracic3_offset: socket_parent=/bodyset/thoracic3
          translation=(-0.00440104 0.0274813 0.0139404) orientation=(1.5708 3.1416 0.65727)
      PhysicalOffsetFrame rib3_R_offset: socket_parent=/bodyset/rib3_R translation=(0 0 0)
          orientation=(-1.5708 0.453786 -2.48433)
    WeldJoint T2_r2R_CVjnt: socket_parent_frame=thoracic2_offset socket_child_frame=rib2_R_offset
      PhysicalOffsetFrame thoracic2_offset: socket_parent=/bodyset/thoracic2
          translation=(-0.00303852 0.0258207 0.0125333) orientation=(1.5708 3.1416 0.68013)
      PhysicalOffsetFrame rib2_R_offset: socket_parent=/bodyset/rib2_R translation=(0 0 0)
          orientation=(-1.5708 0.506145 -2.46146)
    WeldJoint T1_r1R_CVjnt: socket_parent_frame=thoracic1_offset socket_child_frame=rib1_R_offset
      PhysicalOffsetFrame thoracic1_offset: socket_parent=/bodyset/thoracic1
          translation=(-0.00331429 0.0250327 0.0195918) orientation=(1.5708 3.1416 0.70085)
      PhysicalOffsetFrame rib1_R_offset: socket_parent=/bodyset/rib1_R translation=(0 0 0)
          orientation=(-1.5708 0.523599 -2.44074)
    WeldJoint T12_r12L_CVjnt: socket_parent_frame=thoracic12_offset socket_child_frame=rib12_L_offset
      PhysicalOffsetFrame thoracic12_offset: socket_parent=/bodyset/thoracic12
          translation=(-0.0218221 0.0261622 -0.0223789) orientation=(1.5708 3.1416 -0.2748)
      PhysicalOffsetFrame rib12_L_offset: socket_parent=/bodyset/rib12_L translation=(0 0 0)
          orientation=(-1.5708 -0.349066 2.86679)
    WeldJoint T11_r11L_CVjnt: socket_parent_frame=thoracic11_offset socket_child_frame=rib11_L_offset
      PhysicalOffsetFrame thoracic11_offset: socket_parent=/bodyset/thoracic11
          translation=(-0.0158177 0.021795 -0.0175392) orientation=(1.5708 3.1416 -0.34175)
      PhysicalOffsetFrame rib11_L_offset: socket_parent=/bodyset/rib11_L translation=(0 0 0)
          orientation=(-1.5708 -0.279253 2.79985)
    WeldJoint T10_r10L_CVjnt: socket_parent_frame=thoracic10_offset socket_child_frame=rib10_L_offset
      PhysicalOffsetFrame thoracic10_offset: socket_parent=/bodyset/thoracic10
          translation=(-0.0147318 0.0329027 -0.0177794) orientation=(1.5708 3.1416 -0.40034)
      PhysicalOffsetFrame rib10_L_offset: socket_parent=/bodyset/rib10_L translation=(0 0 0)
          orientation=(-1.5708 -0.191986 2.74125)
    WeldJoint T9_r9L_CVjnt: socket_parent_frame=thoracic9_offset socket_child_frame=rib9_L_offset
      PhysicalOffsetFrame thoracic9_offset: socket_parent=/bodyset/thoracic9
          translation=(-0.0115841 0.0282072 -0.0153371) orientation=(1.5708 3.1416 -0.45172)
      PhysicalOffsetFrame rib9_L_offset: socket_parent=/bodyset/rib9_L translation=(0 0 0)
          orientation=(-1.5708 -0.122173 2.68987)
    WeldJoint T8_r8L_CVjnt: socket_parent_frame=thoracic8_offset socket_child_frame=rib8_L_offset
      PhysicalOffsetFrame thoracic8_offset: socket_parent=/bodyset/thoracic8
          translation=(-0.0103894 0.0274418 -0.0152326) orientation=(1.5708 3.1416 -0.49691)
      PhysicalOffsetFrame rib8_L_offset: socket_parent=/bodyset/rib8_L translation=(0 0 0)
          orientation=(-1.5708 -0.0349066 2.64468)
    WeldJoint T7_r7L_CVjnt: socket_parent_frame=thoracic7_offset socket_child_frame=rib7_L_offset
      PhysicalOffsetFrame thoracic7_offset: socket_parent=/bodyset/thoracic7
          translation=(-0.00996672 0.0289655 -0.0163713) orientation=(1.5708 3.1416 -0.53682)
      PhysicalOffsetFrame rib7_L_offset: socket_parent=/bodyset/rib7_L translation=(0 0 0)
          orientation=(-1.5708 0.0698132 2.60477)
    WeldJoint T6_r6L_CVjnt: socket_parent_frame=thoracic6_offset socket_child_frame=rib6_L_offset
      PhysicalOffsetFrame thoracic6_offset: socket_parent=/bodyset/thoracic6
          translation=(-0.00876198 0.029021 -0.0163619) orientation=(1.5708 3.1416 -0.57221)
      PhysicalOffsetFrame rib6_L_offset: socket_parent=/bodyset/rib6_L translation=(0 0 0)
          orientation=(-1.5708 0.174533 2.56939)
    WeldJoint T5_r5L_CVjnt: socket_parent_frame=thoracic5_offset socket_child_frame=rib5_L_offset
      PhysicalOffsetFrame thoracic5_offset: socket_parent=/bodyset/thoracic5
          translation=(-0.00780481 0.0304515 -0.0168852) orientation=(1.5708 3.1416 -0.60373)
      PhysicalOffsetFrame rib5_L_offset: socket_parent=/bodyset/rib5_L translation=(0 0 0)
          orientation=(-1.5708 0.279253 2.53787)
    WeldJoint T4_r4L_CVjnt: socket_parent_frame=thoracic4_offset socket_child_frame=rib4_L_offset
      PhysicalOffsetFrame thoracic4_offset: socket_parent=/bodyset/thoracic4
          translation=(-0.00606189 0.0293637 -0.0155847) orientation=(1.5708 3.1416 -0.63193)
      PhysicalOffsetFrame rib4_L_offset: socket_parent=/bodyset/rib4_L translation=(0 0 0)
          orientation=(-1.5708 0.383972 2.50967)
    WeldJoint T3_r3L_CVjnt: socket_parent_frame=thoracic3_offset socket_child_frame=rib3_L_offset
      PhysicalOffsetFrame thoracic3_offset: socket_parent=/bodyset/thoracic3
          translation=(-0.00440104 0.0274813 -0.0139404) orientation=(1.5708 3.1416 -0.65727)
      PhysicalOffsetFrame rib3_L_offset: socket_parent=/bodyset/rib3_L translation=(0 0 0)
          orientation=(-1.5708 0.453786 2.48433)
    WeldJoint T2_r2L_CVjnt: socket_parent_frame=thoracic2_offset socket_child_frame=rib2_L_offset
      PhysicalOffsetFrame thoracic2_offset: socket_parent=/bodyset/thoracic2
          translation=(-0.00303852 0.0258207 -0.0125333) orientation=(1.5708 3.1416 -0.68013)
      PhysicalOffsetFrame rib2_L_offset: socket_parent=/bodyset/rib2_L translation=(0 0 0)
          orientation=(-1.5708 0.506145 2.46146)
    WeldJoint T1_r1L_CVjnt: socket_parent_frame=thoracic1_offset socket_child_frame=rib1_L_offset
      PhysicalOffsetFrame thoracic1_offset: socket_parent=/bodyset/thoracic1
          translation=(-0.00331429 0.0250327 -0.0195918) orientation=(1.5708 3.1416 -0.70085)
      PhysicalOffsetFrame rib1_L_offset: socket_parent=/bodyset/rib1_L translation=(0 0 0)
          orientation=(-1.5708 0.523599 2.44074)
    WeldJoint r1R_sterR_jnt: socket_parent_frame=rib1_R_offset socket_child_frame=sternum_offset
      PhysicalOffsetFrame rib1_R_offset: socket_parent=/bodyset/rib1_R translation=(0.0677443 -0.0610035 0.0154542)
      PhysicalOffsetFrame sternum_offset: socket_parent=/bodyset/sternum translation=(0 0 0)
    WeldJoint sterR_clavR_jnt: socket_parent_frame=sternum_offset socket_child_frame=clavicle_R_offset
      PhysicalOffsetFrame sternum_offset: socket_parent=/bodyset/sternum translation=(0 0 0) orientation=(0 -0.2618 0)
      PhysicalOffsetFrame clavicle_R_offset: socket_parent=/bodyset/clavicle_R translation=(0 0 0)
    WeldJoint clavR_scapR_jnt: socket_parent_frame=clavicle_R_offset socket_child_frame=scapula_R_offset
      PhysicalOffsetFrame clavicle_R_offset: socket_parent=/bodyset/clavicle_R
          translation=(-0.0141844 0.0223611 0.141588) orientation=(0 0.34907 0)
      PhysicalOffsetFrame scapula_R_offset: socket_parent=/bodyset/scapula_R translation=(0 0 0)
    CustomJoint shoulder_R: socket_parent_frame=scapula_R_offset socket_child_frame=humerus_R_offset
      Coordinate shoulder_elv_r: default_value=0 range=(-3.14 3.14) clamped=true
      Coordinate shoulder_rot_r: default_value=0 range=(-3.14 3.14) clamped=true
      Coordinate elv_angle_r: default_value=0 range=(-3.14 3.14) clamped=true
      PhysicalOffsetFrame scapula_R_offset: socket_parent=/bodyset/scapula_R
          translation=(-0.00949754 -0.0378814 0.00940157) orientation=(0 -0.087266 0)
      PhysicalOffsetFrame humerus_R_offset: socket_parent=/bodyset/humerus_R translation=(0 0 0)
      SpatialTransform: axes_held_at_zero=(translation1 translation2 translation3)
        TransformAxis rotation1: coordinates=shoulder_elv_r axis=(1 0 0) LinearFunction(coefficients=1 0)
        TransformAxis rotation2: coordinates=shoulder_rot_r axis=(0 1 0) LinearFunction(coefficients=1 0)
        TransformAxis rotation3: coordinates=elv_angle_r axis=(0 0 1) LinearFunction(coefficients=1 0)
    CustomJoint elbow: socket_parent_frame=humerus_R_offset socket_child_frame=ulna_R_offset
      Coordinate elbow_flexion_r: default_value=0 range=(0 2.2689) clamped=true
      PhysicalOffsetFrame humerus_R_offset: socket_parent=/bodyset/humerus_R
          translation=(0.00678034 -0.322789 -0.0136718)
      PhysicalOffsetFrame ulna_R_offset: socket_parent=/bodyset/ulna_R translation=(0 0 0)
      SpatialTransform: axes_held_at_zero=(rotation2 rotation3 translation1 translation2 translation3)
        TransformAxis rotation1: coordinates=elbow_flexion_r axis=(0.0494 0.0366 0.99811)
            LinearFunction(coefficients=1 0)
    CustomJoint radioulnar: socket_parent_frame=ulna_R_offset socket_child_frame=radius_R_offset
      Coordinate pro_sup_r: default_value=0 range=(-1.5708 1.5708) clamped=true
      PhysicalOffsetFrame ulna_R_offset: socket_parent=/bodyset/ulna_R translation=(0.000414679 -0.0119251 0.0207329)
      PhysicalOffsetFrame radius_R_offset: socket_parent=/bodyset/radius_R translation=(0 0 0)
      SpatialTransform: axes_held_at_zero=(rotation2 rotation3 translation1 translation2 translation3)
        TransformAxis rotation1: coordinates=pro_sup_r axis=(-0.017161 0.99267 -0.11967)
            LinearFunction(coefficients=1 0)
    CustomJoint radius_hand_r: socket_parent_frame=radius_R_offset socket_child_frame=hand_R_offset
      Coordinate wrist_dev_r: default_value=0 range=(-1.57 1.57) clamped=true
      Coordinate wrist_rot_r: default_value=0 range=(-1.57 1.57) clamped=true
      Coordinate wrist_flex_r: default_value=0 range=(-1.57 1.57) clamped=true
      PhysicalOffsetFrame radius_R_offset: socket_parent=/bodyset/radius_R translation=(0.0186605 -0.250881 0.0259174)
      PhysicalOffsetFrame hand_R_offset: socket_parent=/bodyset/hand_R translation=(0 0 0)
      SpatialTransform: axes_held_at_zero=(translation1 translation2 translation3)
        TransformAxis rotation1: coordinates=wrist_dev_r axis=(1 0 0) LinearFunction(coefficients=1 0)
        TransformAxis rotation2: coordinates=wrist_rot_r axis=(0 1 0) LinearFunction(coefficients=1 0)
        TransformAxis rotation3: coordinates=wrist_flex_r axis=(0 0 1) LinearFunction(coefficients=1 0)
    WeldJoint sterL_clavL_jnt: socket_parent_frame=sternum_offset socket_child_frame=clavicle_L_offset
      PhysicalOffsetFrame sternum_offset: socket_parent=/bodyset/sternum translation=(0 0 -0.0700925)
          orientation=(0 0.2618 0)
      PhysicalOffsetFrame clavicle_L_offset: socket_parent=/bodyset/clavicle_L translation=(0 0 0)
    WeldJoint clavL_scapL_jnt: socket_parent_frame=clavicle_L_offset socket_child_frame=scapula_L_offset
      PhysicalOffsetFrame clavicle_L_offset: socket_parent=/bodyset/clavicle_L
          translation=(-0.0141844 0.0223611 -0.141588) orientation=(0 -0.34907 0)
      PhysicalOffsetFrame scapula_L_offset: socket_parent=/bodyset/scapula_L translation=(0 0 0)
    CustomJoint shoulder_L: socket_parent_frame=scapula_L_offset socket_child_frame=humerus_L_offset
      Coordinate shoulder_elv_l: default_value=0 range=(-3.14 3.14) clamped=true
      Coordinate shoulder_rot_l: default_value=0 range=(-3.14 3.14) clamped=true
      Coordinate elv_angle_l: default_value=0 range=(-3.14 3.14) clamped=true
      PhysicalOffsetFrame scapula_L_offset: socket_parent=/bodyset/scapula_L
          translation=(-0.00949754 -0.0378814 -0.00940157) orientation=(0 0.087266 0)
      PhysicalOffsetFrame humerus_L_offset: socket_parent=/bodyset/humerus_L translation=(0 0 0)
      SpatialTransform: axes_held_at_zero=(translation1 translation2 translation3)
        TransformAxis rotation1: coordinates=shoulder_elv_l axis=(1 0 0) LinearFunction(coefficients=1 0)
        TransformAxis rotation2: coordinates=shoulder_rot_l axis=(0 1 0) LinearFunction(coefficients=1 0)
        TransformAxis rotation3: coordinates=elv_angle_l axis=(0 0 1) LinearFunction(coefficients=1 0)
    CustomJoint elbow_l: socket_parent_frame=humerus_L_offset socket_child_frame=ulna_L_offset
      Coordinate elbow_flexion_l: default_value=0 range=(0 2.2689) clamped=true
      PhysicalOffsetFrame humerus_L_offset: socket_parent=/bodyset/humerus_L
          translation=(0.00678034 -0.322789 0.0136718)
      PhysicalOffsetFrame ulna_L_offset: socket_parent=/bodyset/ulna_L translation=(0 0 0)
      SpatialTransform: axes_held_at_zero=(rotation2 rotation3 translation1 translation2 translation3)
        TransformAxis rotation1: coordinates=elbow_flexion_l axis=(-0.0494 -0.0366 0.99811)
            LinearFunction(coefficients=1 0)
    CustomJoint radioulnar_l: socket_parent_frame=ulna_L_offset socket_child_frame=radius_L_offset
      Coordinate pro_sup_l: default_value=0 range=(-1.5708 1.5708) clamped=true
      PhysicalOffsetFrame ulna_L_offset: socket_parent=/bodyset/ulna_L translation=(0.000414679 -0.0119251 -0.0207329)
      PhysicalOffsetFrame radius_L_offset: socket_parent=/bodyset/radius_L translation=(0 0 0)
      SpatialTransform: axes_held_at_zero=(rotation2 rotation3 translation1 translation2 translation3)
        TransformAxis rotation1: coordinates=pro_sup_l axis=(0.017161 -0.99267 -0.11967)
            LinearFunction(coefficients=1 0)
    CustomJoint radius_hand_l: socket_parent_frame=radius_L_offset socket_child_frame=hand_L_offset
      Coordinate wrist_dev_l: default_value=0 range=(-1.57 1.57) clamped=true
      Coordinate wrist_rot_l: default_value=0 range=(-1.57 1.57) clamped=true
      Coordinate wrist_flex_l: default_value=0 range=(-1.57 1.57) clamped=true
      PhysicalOffsetFrame radius_L_offset: socket_parent=/bodyset/radius_L translation=(0.0186605 -0.250881 -0.0259174)
      PhysicalOffsetFrame hand_L_offset: socket_parent=/bodyset/hand_L translation=(0 0 0)
      SpatialTransform: axes_held_at_zero=(translation1 translation2 translation3)
        TransformAxis rotation1: coordinates=wrist_dev_l axis=(1 0 0) LinearFunction(coefficients=1 0)
        TransformAxis rotation2: coordinates=wrist_rot_l axis=(0 1 0) LinearFunction(coefficients=1 0)
        TransformAxis rotation3: coordinates=wrist_flex_l axis=(0 0 1) LinearFunction(coefficients=1 0)
    WeldJoint Abd_L_L1: socket_parent_frame=lumbar1_offset socket_child_frame=Abd_L_L1_offset
      PhysicalOffsetFrame lumbar1_offset: socket_parent=/bodyset/lumbar1 translation=(0 0 0) orientation=(0 0 -0.38397)
      PhysicalOffsetFrame Abd_L_L1_offset: socket_parent=/bodyset/Abd_L_L1 translation=(0 0 0)
    WeldJoint Abd_L_L2: socket_parent_frame=lumbar2_offset socket_child_frame=Abd_L_L2_offset
      PhysicalOffsetFrame lumbar2_offset: socket_parent=/bodyset/lumbar2 translation=(0 0 0) orientation=(0 0 -0.27925)
      PhysicalOffsetFrame Abd_L_L2_offset: socket_parent=/bodyset/Abd_L_L2 translation=(0 0 0)
    WeldJoint Abd_L_L3: socket_parent_frame=lumbar3_offset socket_child_frame=Abd_L_L3_offset
      PhysicalOffsetFrame lumbar3_offset: socket_parent=/bodyset/lumbar3 translation=(0 0 0) orientation=(0 0 -0.15708)
      PhysicalOffsetFrame Abd_L_L3_offset: socket_parent=/bodyset/Abd_L_L3 translation=(0 0 0)
    WeldJoint Abd_L_L4: socket_parent_frame=lumbar4_offset socket_child_frame=Abd_L_L4_offset
      PhysicalOffsetFrame lumbar4_offset: socket_parent=/bodyset/lumbar4 translation=(0 0 0) orientation=(0 0 0.05236)
      PhysicalOffsetFrame Abd_L_L4_offset: socket_parent=/bodyset/Abd_L_L4 translation=(0 0 0)
    WeldJoint Abd_L_L5: socket_parent_frame=lumbar5_offset socket_child_frame=Abd_L_L5_offset
      PhysicalOffsetFrame lumbar5_offset: socket_parent=/bodyset/lumbar5 translation=(0 0 0) orientation=(0 0 0.36652)
      PhysicalOffsetFrame Abd_L_L5_offset: socket_parent=/bodyset/Abd_L_L5 translation=(0 0 0)
    WeldJoint Abd_R_L1: socket_parent_frame=lumbar1_offset socket_child_frame=Abd_R_L1_offset
      PhysicalOffsetFrame lumbar1_offset: socket_parent=/bodyset/lumbar1 translation=(0 0 0) orientation=(0 0 -0.38397)
      PhysicalOffsetFrame Abd_R_L1_offset: socket_parent=/bodyset/Abd_R_L1 translation=(0 0 0)
    WeldJoint Abd_R_L2: socket_parent_frame=lumbar2_offset socket_child_frame=Abd_R_L2_offset
      PhysicalOffsetFrame lumbar2_offset: socket_parent=/bodyset/lumbar2 translation=(0 0 0) orientation=(0 0 -0.27925)
      PhysicalOffsetFrame Abd_R_L2_offset: socket_parent=/bodyset/Abd_R_L2 translation=(0 0 0)
    WeldJoint Abd_R_L3: socket_parent_frame=lumbar3_offset socket_child_frame=Abd_R_L3_offset
      PhysicalOffsetFrame lumbar3_offset: socket_parent=/bodyset/lumbar3 translation=(0 0 0) orientation=(0 0 -0.15708)
      PhysicalOffsetFrame Abd_R_L3_offset: socket_parent=/bodyset/Abd_R_L3 translation=(0 0 0)
    WeldJoint Abd_R_L4: socket_parent_frame=lumbar4_offset socket_child_frame=Abd_R_L4_offset
      PhysicalOffsetFrame lumbar4_offset: socket_parent=/bodyset/lumbar4 translation=(0 0 0) orientation=(0 0 0.05236)
      PhysicalOffsetFrame Abd_R_L4_offset: socket_parent=/bodyset/Abd_R_L4 translation=(0 0 0)
    WeldJoint Abd_R_L5: socket_parent_frame=lumbar5_offset socket_child_frame=Abd_R_L5_offset
      PhysicalOffsetFrame lumbar5_offset: socket_parent=/bodyset/lumbar5 translation=(0 0 0) orientation=(0 0 0.36652)
      PhysicalOffsetFrame Abd_R_L5_offset: socket_parent=/bodyset/Abd_R_L5 translation=(0 0 0)
  ForceSet:
    Thelen2003Muscle Ps_L1_VB_r: max_isometric_force=428.0098 optimal_fiber_length=0.2324613
        tendon_slack_length=0.06903885 pennation_angle_at_optimal=0.18675 [radians]
      PathPoint PathPoint_lumbar1: lumbar1 (-0.000571386 0.0353636 0.0208924)
      PathPoint PathPoint_pelvis: pelvis (-0.0235582 -0.0830376 0.0792866)
    Thelen2003Muscle Ps_L1_TP_r: max_isometric_force=123.5492 optimal_fiber_length=0.2287381
        tendon_slack_length=0.06793309 pennation_angle_at_optimal=0.18675
      PathPoint PathPoint_lumbar1: lumbar1 (-0.0157791 0.0316613 0.0236345)
      PathPoint PathPoint_pelvis: pelvis (-0.0235582 -0.0830376 0.0792866)
    Thelen2003Muscle Ps_L1_L2_IVD_r: max_isometric_force=235.5223 optimal_fiber_length=0.2141005
        tendon_slack_length=0.06358586 pennation_angle_at_optimal=0.18675
      PathPoint PathPoint_lumbar1: lumbar1 (0.000274384 0.00933675 0.0216059)
      PathPoint PathPoint_pelvis: pelvis (-0.0235582 -0.0830376 0.0792866)
    Thelen2003Muscle Ps_L2_TP_r: max_isometric_force=413.8707 optimal_fiber_length=0.1987897
        tendon_slack_length=0.05903871 pennation_angle_at_optimal=0.18675
      PathPoint PathPoint_lumbar2: lumbar2 (-0.0142923 0.0270953 0.0232417)
      PathPoint PathPoint_pelvis: pelvis (-0.0235582 -0.0830376 0.0792866)
    Thelen2003Muscle Ps_L2_L3_IVD_r: max_isometric_force=240.9481 optimal_fiber_length=0.1846355
        tendon_slack_length=0.05483504 pennation_angle_at_optimal=0.18675
      PathPoint PathPoint_lumbar2: lumbar2 (0.00509195 0.00707606 0.022405)
      PathPoint PathPoint_pelvis: pelvis (-0.0235582 -0.0830376 0.0792866)
    Thelen2003Muscle Ps_L3_TP_r: max_isometric_force=204.5022 optimal_fiber_length=0.171913
        tendon_slack_length=0.05105656 pennation_angle_at_optimal=0.18675
      PathPoint PathPoint_lumbar3: lumbar3 (-0.019977 0.0286501 0.0295209)
      PathPoint PathPoint_pelvis: pelvis (-0.0235582 -0.0830376 0.0792866)
    Thelen2003Muscle Ps_L3_L4_IVD_r: max_isometric_force=72.59907 optimal_fiber_length=0.1561998
        tendon_slack_length=0.0463899 pennation_angle_at_optimal=0.18675
      PathPoint PathPoint_lumbar3: lumbar3 (0.00286025 0.00794742 0.0220968)
      PathPoint PathPoint_pelvis: pelvis (-0.0235582 -0.0830376 0.0792866)
    Thelen2003Muscle Ps_L4_TP_r: max_isometric_force=324.4161 optimal_fiber_length=0.1476477
        tendon_slack_length=0.04384999 pennation_angle_at_optimal=0.18675
      PathPoint PathPoint_lumbar4: lumbar4 (-0.0178795 0.0296034 0.0270316)
      PathPoint PathPoint_pelvis: pelvis (-0.0235582 -0.0830376 0.0792866)
    Thelen2003Muscle Ps_L4_L5_IVD_r: max_isometric_force=136.2099 optimal_fiber_length=0.1285996
        tendon_slack_length=0.0381929 pennation_angle_at_optimal=0.18675
      PathPoint PathPoint_lumbar4: lumbar4 (0.00403469 0.00744073 0.021516)
      PathPoint PathPoint_pelvis: pelvis (-0.0235582 -0.0830376 0.0792866)
    Thelen2003Muscle Ps_L5_TP_r: max_isometric_force=298.2825 optimal_fiber_length=0.1237921
        tendon_slack_length=0.03676511 pennation_angle_at_optimal=0.18675
      PathPoint PathPoint_lumbar5: lumbar5 (-0.0155306 0.0300624 0.0264163)
      PathPoint PathPoint_pelvis: pelvis (-0.0235582 -0.0830376 0.0792866)
    Thelen2003Muscle Ps_L5_VB_r: max_isometric_force=372.7561 optimal_fiber_length=0.1096832
        tendon_slack_length=0.03257489 pennation_angle_at_optimal=0.18675
      PathPoint PathPoint_lumbar5: lumbar5 (0.00483874 0.0181031 0.0198478)
      PathPoint PathPoint_pelvis: pelvis (-0.0235582 -0.0830376 0.0792866)
    Thelen2003Muscle Ps_L1_VB_l: max_isometric_force=428.0098 optimal_fiber_length=0.2324613
        tendon_slack_length=0.06903885 pennation_angle_at_optimal=0.18675
      PathPoint PathPoint_lumbar1: lumbar1 (-0.000571386 0.0353636 -0.0208924)
      PathPoint PathPoint_pelvis: pelvis (-0.0235582 -0.0830376 -0.0792866)
    Thelen2003Muscle Ps_L1_TP_l: max_isometric_force=123.5492 optimal_fiber_length=0.2287374
        tendon_slack_length=0.06793289 pennation_angle_at_optimal=0.18675
      PathPoint PathPoint_lumbar1: lumbar1 (-0.0157791 0.0316613 -0.0236397)
      PathPoint PathPoint_pelvis: pelvis (-0.0235582 -0.0830376 -0.0792866)
    Thelen2003Muscle Ps_L1_L2_IVD_l: max_isometric_force=235.5223 optimal_fiber_length=0.2141009
        tendon_slack_length=0.06358599 pennation_angle_at_optimal=0.18675
      PathPoint PathPoint_lumbar1: lumbar1 (0.000274384 0.00933675 -0.0216027)
      PathPoint PathPoint_pelvis: pelvis (-0.0235582 -0.0830376 -0.0792866)
    Thelen2003Muscle Ps_L2_TP_l: max_isometric_force=413.8707 optimal_fiber_length=0.1987896
        tendon_slack_length=0.05903867 pennation_angle_at_optimal=0.18675
      PathPoint PathPoint_lumbar2: lumbar2 (-0.0142923 0.0270953 -0.0232428)
      PathPoint PathPoint_pelvis: pelvis (-0.0235582 -0.0830376 -0.0792866)
    Thelen2003Muscle Ps_L2_L3_IVD_l: max_isometric_force=240.9481 optimal_fiber_length=0.1846352
        tendon_slack_length=0.05483494 pennation_angle_at_optimal=0.18675
      PathPoint PathPoint_lumbar2: lumbar2 (0.00509195 0.00707606 -0.0224071)
      PathPoint PathPoint_pelvis: pelvis (-0.0235582 -0.0830376 -0.0792866)
    Thelen2003Muscle Ps_L3_TP_l: max_isometric_force=204.5022 optimal_fiber_length=0.171913
        tendon_slack_length=0.05105656 pennation_angle_at_optimal=0.18675
      PathPoint PathPoint_lumbar3: lumbar3 (-0.019977 0.0286501 -0.0295209)
      PathPoint PathPoint_pelvis: pelvis (-0.0235582 -0.0830376 -0.0792866)
    Thelen2003Muscle Ps_L3_L4_IVD_l: max_isometric_force=72.59907 optimal_fiber_length=0.1562004
        tendon_slack_length=0.04639008 pennation_angle_at_optimal=0.18675
      PathPoint PathPoint_lumbar3: lumbar3 (0.00286025 0.00794742 -0.0220937)
      PathPoint PathPoint_pelvis: pelvis (-0.0235582 -0.0830376 -0.0792866)
    Thelen2003Muscle Ps_L4_TP_l: max_isometric_force=324.4161 optimal_fiber_length=0.1476471
        tendon_slack_length=0.04384982 pennation_angle_at_optimal=0.18675
      PathPoint PathPoint_lumbar4: lumbar4 (-0.0178795 0.0296034 -0.0270347)
      PathPoint PathPoint_pelvis: pelvis (-0.0235582 -0.0830376 -0.0792866)
    Thelen2003Muscle Ps_L4_L5_IVD_l: max_isometric_force=136.2099 optimal_fiber_length=0.1285989
        tendon_slack_length=0.03819268 pennation_angle_at_optimal=0.18675
      PathPoint PathPoint_lumbar4: lumbar4 (0.00403469 0.00744073 -0.0215192)
      PathPoint PathPoint_pelvis: pelvis (-0.0235582 -0.0830376 -0.0792866)
    Thelen2003Muscle Ps_L5_TP_l: max_isometric_force=298.2825 optimal_fiber_length=0.1237917
        tendon_slack_length=0.03676498 pennation_angle_at_optimal=0.18675
      PathPoint PathPoint_lumbar5: lumbar5 (-0.0155306 0.0300624 -0.0264184)
      PathPoint PathPoint_pelvis: pelvis (-0.0235582 -0.0830376 -0.0792866)
    Thelen2003Muscle Ps_L5_VB_l: max_isometric_force=372.7561 optimal_fiber_length=0.1096832
        tendon_slack_length=0.03257489 pennation_angle_at_optimal=0.18675
      PathPoint PathPoint_lumbar5: lumbar5 (0.00483874 0.0181031 -0.0198478)
      PathPoint PathPoint_pelvis: pelvis (-0.0235582 -0.0830376 -0.0792866)
    Thelen2003Muscle rect_abd_l: max_isometric_force=823.8196 optimal_fiber_length=0.3671386
        tendon_slack_length=0.09983161 pennation_angle_at_optimal=0
      PathPoint PathPoint_pelvis: pelvis (-0.0411596 -0.140546 -0.0111659)
      PathPoint rect_abd_l_viaPt1: Abdomen (0.0213696 -0.0445663 -0.0520318)
      PathPoint rect_abd_l_viaPt2: Abdomen (0.0253108 0.0445663 -0.0543844)
      PathPoint PathPoint_rib6_L: rib6_L (0.171922 -0.122749 -0.0395833)
    Thelen2003Muscle rect_abd_r: max_isometric_force=823.8195 optimal_fiber_length=0.3671424
        tendon_slack_length=0.09983266 pennation_angle_at_optimal=0
      PathPoint PathPoint_pelvis: pelvis (-0.0411576 -0.140552 0.011167)
      PathPoint rect_abd_r_viaPt1: Abdomen (0.0213696 -0.0445663 0.0520318)
      PathPoint rect_abd_r_viaPt2: Abdomen (0.0253108 0.0445663 0.0543844)
      PathPoint PathPoint_rib6_R: rib6_R (0.171922 -0.122749 0.0395833)
    Thelen2003Muscle IL_L1_r: max_isometric_force=306.6999 optimal_fiber_length=0.06497648
        tendon_slack_length=0.1473121 pennation_angle_at_optimal=0.24086
      PathPoint PathPoint_pelvis: pelvis (-0.157791 0.0159461 0.0400026)
      PathPoint PathPoint_lumbar1: lumbar1 (-0.0313676 0.0404001 0.037129)
    Thelen2003Muscle IL_L2_r: max_isometric_force=381.1098 optimal_fiber_length=0.04352975
        tendon_slack_length=0.09868893 pennation_angle_at_optimal=0.24086
      PathPoint PathPoint_pelvis: pelvis (-0.149387 0.0410482 0.0445519)
      PathPoint PathPoint_lumbar2: lumbar2 (-0.0354961 0.0306974 0.0388847)
    Thelen2003Muscle IL_L3_r: max_isometric_force=450.8905 optimal_fiber_length=0.02653857
        tendon_slack_length=0.0601672 pennation_angle_at_optimal=0.24086
      PathPoint PathPoint_pelvis: pelvis (-0.135529 0.0579966 0.0496309)
      PathPoint PathPoint_lumbar3: lumbar3 (-0.0374976 0.0309677 0.04461)
    Thelen2003Muscle IL_L4_r: max_isometric_force=863.0564 optimal_fiber_length=0.01708489
        tendon_slack_length=0.03873418 pennation_angle_at_optimal=0.24086
      PathPoint PathPoint_pelvis: pelvis (-0.130501 0.0533145 0.0461763)
      PathPoint PathPoint_lumbar4: lumbar4 (-0.031113 0.0295322 0.0456348)
    Thelen2003Muscle IL_L1_l: max_isometric_force=306.6999 optimal_fiber_length=0.06497648
        tendon_slack_length=0.1473121 pennation_angle_at_optimal=0.24086
      PathPoint PathPoint_pelvis: pelvis (-0.157791 0.0159461 -0.0400026)
      PathPoint PathPoint_lumbar1: lumbar1 (-0.0313676 0.0404001 -0.037129)
    Thelen2003Muscle IL_L2_l: max_isometric_force=381.1098 optimal_fiber_length=0.04352975
        tendon_slack_length=0.09868893 pennation_angle_at_optimal=0.24086
      PathPoint PathPoint_pelvis: pelvis (-0.149387 0.0410482 -0.0445519)
      PathPoint PathPoint_lumbar2: lumbar2 (-0.0354961 0.0306974 -0.0388847)
    Thelen2003Muscle IL_L3_l: max_isometric_force=450.8905 optimal_fiber_length=0.02653857
        tendon_slack_length=0.0601672 pennation_angle_at_optimal=0.24086
      PathPoint PathPoint_pelvis: pelvis (-0.135529 0.0579966 -0.0496309)
      PathPoint PathPoint_lumbar3: lumbar3 (-0.0374976 0.0309677 -0.04461)
    Thelen2003Muscle IL_L4_l: max_isometric_force=863.0564 optimal_fiber_length=0.01708489
        tendon_slack_length=0.03873418 pennation_angle_at_optimal=0.24086
      PathPoint PathPoint_pelvis: pelvis (-0.130501 0.0533145 -0.0461763)
      PathPoint PathPoint_lumbar4: lumbar4 (-0.031113 0.0295322 -0.0456348)
    Thelen2003Muscle IL_R5_r: max_isometric_force=119.2366 optimal_fiber_length=0.2087606 tendon_slack_length=0.2921818
        pennation_angle_at_optimal=0.24086
      PathPoint PathPoint_pelvis: pelvis (-0.154712 0.0208585 0.0407109)
      PathPoint PathPoint_lumbar2: lumbar2 (-0.0568996 0.0263582 0.0536367)
      PathPoint PathPoint_rib10_R: rib10_R (-0.0541602 -0.0112385 0.0592528)
      PathPoint PathPoint_rib9_R: rib9_R (-0.0593251 -0.00928217 0.0682676)
      PathPoint PathPoint_rib8_R: rib8_R (-0.0583965 -0.00619139 0.0689376)
      PathPoint PathPoint_rib7_R: rib7_R (-0.0573167 -0.00549787 0.0678186)
      PathPoint PathPoint_rib6_R: rib6_R (-0.058009 -0.00570029 0.06707)
      PathPoint PathPoint_rib5_R: rib5_R (-0.0577538 -0.00431394 0.0665556)
    Thelen2003Muscle IL_R6_r: max_isometric_force=151.2067 optimal_fiber_length=0.1999205 tendon_slack_length=0.241466
        pennation_angle_at_optimal=0.24086
      PathPoint PathPoint_pelvis: pelvis (-0.143775 0.0451724 0.0444673)
      PathPoint PathPoint_lumbar2: lumbar2 (-0.0564353 0.0265099 0.056521)
      PathPoint PathPoint_rib10_R: rib10_R (-0.0558014 -0.0131826 0.0631015)
      PathPoint PathPoint_rib9_R: rib9_R (-0.0612262 -0.0109645 0.0727738)
      PathPoint PathPoint_rib8_R: rib8_R (-0.0602089 -0.00752611 0.0735483)
      PathPoint PathPoint_rib7_R: rib7_R (-0.0590519 -0.00663873 0.0725005)
      PathPoint PathPoint_rib6_R: rib6_R (-0.0598457 -0.00675649 0.0715882)
    Thelen2003Muscle IL_R7_r: max_isometric_force=182.3368 optimal_fiber_length=0.1948094 tendon_slack_length=0.2046735
        pennation_angle_at_optimal=0.24086
      PathPoint PathPoint_pelvis: pelvis (-0.132797 0.055877 0.0479125)
      PathPoint PathPoint_lumbar2: lumbar2 (-0.0559107 0.0263434 0.0595494)
      PathPoint PathPoint_rib10_R: rib10_R (-0.0570467 -0.015353 0.0670432)
      PathPoint PathPoint_rib9_R: rib9_R (-0.0625098 -0.0128575 0.0772038)
      PathPoint PathPoint_rib8_R: rib8_R (-0.0615325 -0.00906697 0.0782451)
      PathPoint PathPoint_rib7_R: rib7_R (-0.0602969 -0.00795007 0.0772641)
    Thelen2003Muscle IL_R8_r: max_isometric_force=162.0771 optimal_fiber_length=0.1776938 tendon_slack_length=0.1794888
        pennation_angle_at_optimal=0.24086
      PathPoint PathPoint_pelvis: pelvis (-0.153082 0.0624982 0.0672056)
      PathPoint PathPoint_lumbar2: lumbar2 (-0.0553368 0.0267307 0.0623653)
      PathPoint PathPoint_rib10_R: rib10_R (-0.0577166 -0.0177718 0.0710055)
      PathPoint PathPoint_rib9_R: rib9_R (-0.0628913 -0.014981 0.0812532)
      PathPoint PathPoint_rib8_R: rib8_R (-0.0623209 -0.0108307 0.0830375)
    Thelen2003Muscle IL_R9_r: max_isometric_force=199.5135 optimal_fiber_length=0.2044885 tendon_slack_length=0.1203864
        pennation_angle_at_optimal=0.24086
      PathPoint PathPoint_pelvis: pelvis (-0.148392 0.065387 0.0680876)
      PathPoint PathPoint_lumbar2: lumbar2 (-0.0555379 0.026557 0.0646662)
      PathPoint PathPoint_rib10_R: rib10_R (-0.0577624 -0.0204603 0.0749909)
      PathPoint PathPoint_rib9_R: rib9_R (-0.0626311 -0.0173563 0.0853349)
    Thelen2003Muscle IL_R10_r: max_isometric_force=399.052 optimal_fiber_length=0.1778268 tendon_slack_length=0.1046901
        pennation_angle_at_optimal=0.24086
      PathPoint PathPoint_pelvis: pelvis (-0.144386 0.0695622 0.0699725)
      PathPoint PathPoint_lumbar2: lumbar2 (-0.0552945 0.0264403 0.0672603)
      PathPoint PathPoint_rib10_R: rib10_R (-0.0575356 -0.0219131 0.0769938)
    Thelen2003Muscle IL_R11_r: max_isometric_force=489.2008 optimal_fiber_length=0.147597
        tendon_slack_length=0.07387964 pennation_angle_at_optimal=0.24086
      PathPoint PathPoint_pelvis: pelvis (-0.140783 0.0727773 0.0723066)
      PathPoint PathPoint_lumbar2: lumbar2 (-0.0551393 0.0264811 0.070406)
      PathPoint PathPoint_rib11_R: rib11_R (-0.0456134 -0.0269573 0.0682534)
    Thelen2003Muscle IL_R12_r: max_isometric_force=428.8624 optimal_fiber_length=0.1076565
        tendon_slack_length=0.05388742 pennation_angle_at_optimal=0.24086
      PathPoint PathPoint_pelvis: pelvis (-0.137384 0.0759342 0.0747393)
      PathPoint PathPoint_rib12_R: rib12_R (-0.0349067 -0.0352056 0.0542666)
    Thelen2003Muscle IL_R5_l: max_isometric_force=119.2366 optimal_fiber_length=0.2087607 tendon_slack_length=0.292182
        pennation_angle_at_optimal=0.24086
      PathPoint PathPoint_pelvis: pelvis (-0.154712 0.0208585 -0.0407088)
      PathPoint PathPoint_lumbar2: lumbar2 (-0.0568996 0.0263582 -0.0536367)
      PathPoint PathPoint_rib10_L: rib10_L (-0.0541604 -0.0112378 -0.0592531)
      PathPoint PathPoint_rib9_L: rib9_L (-0.059325 -0.00928159 -0.0682676)
      PathPoint PathPoint_rib8_L: rib8_L (-0.0583965 -0.00619193 -0.0689376)
      PathPoint PathPoint_rib7_L: rib7_L (-0.0573167 -0.00549728 -0.0678185)
      PathPoint PathPoint_rib6_L: rib6_L (-0.0580091 -0.0056997 -0.06707)
      PathPoint PathPoint_rib5_L: rib5_L (-0.0577538 -0.00431444 -0.0665555)
    Thelen2003Muscle IL_R6_l: max_isometric_force=151.2067 optimal_fiber_length=0.1999207 tendon_slack_length=0.2414662
        pennation_angle_at_optimal=0.24086
      PathPoint PathPoint_pelvis: pelvis (-0.143775 0.0451724 -0.0444694)
      PathPoint PathPoint_lumbar2: lumbar2 (-0.0564353 0.0265099 -0.056521)
      PathPoint PathPoint_rib10_L: rib10_L (-0.0558015 -0.013182 -0.0631019)
      PathPoint PathPoint_rib9_L: rib9_L (-0.0612262 -0.0109651 -0.0727738)
      PathPoint PathPoint_rib8_L: rib8_L (-0.0602089 -0.00752669 -0.0735482)
      PathPoint PathPoint_rib7_L: rib7_L (-0.0590519 -0.0066393 -0.0725006)
      PathPoint PathPoint_rib6_L: rib6_L (-0.0598458 -0.00675703 -0.0715882)
    Thelen2003Muscle IL_R7_l: max_isometric_force=182.3368 optimal_fiber_length=0.1948096 tendon_slack_length=0.2046737
        pennation_angle_at_optimal=0.24086
      PathPoint PathPoint_pelvis: pelvis (-0.132797 0.055877 -0.0479167)
      PathPoint PathPoint_lumbar2: lumbar2 (-0.0559107 0.0263434 -0.0595494)
      PathPoint PathPoint_rib10_L: rib10_L (-0.0570466 -0.0153535 -0.0670433)
      PathPoint PathPoint_rib9_L: rib9_L (-0.0625098 -0.012858 -0.0772038)
      PathPoint PathPoint_rib8_L: rib8_L (-0.0615325 -0.00906647 -0.0782452)
      PathPoint PathPoint_rib7_L: rib7_L (-0.0602969 -0.00795067 -0.0772641)
    Thelen2003Muscle IL_R8_l: max_isometric_force=162.0771 optimal_fiber_length=0.177694 tendon_slack_length=0.179489
        pennation_angle_at_optimal=0.24086
      PathPoint PathPoint_pelvis: pelvis (-0.153082 0.0624982 -0.0672056)
      PathPoint PathPoint_lumbar2: lumbar2 (-0.0553368 0.0267307 -0.0623653)
      PathPoint PathPoint_rib10_L: rib10_L (-0.0577166 -0.0177713 -0.0710058)
      PathPoint PathPoint_rib9_L: rib9_L (-0.0628912 -0.0149816 -0.0812533)
      PathPoint PathPoint_rib8_L: rib8_L (-0.0623209 -0.0108313 -0.0830376)
    Thelen2003Muscle IL_R9_l: max_isometric_force=199.5135 optimal_fiber_length=0.2044888 tendon_slack_length=0.1203865
        pennation_angle_at_optimal=0.24086
      PathPoint PathPoint_pelvis: pelvis (-0.148392 0.065387 -0.0680887)
      PathPoint PathPoint_lumbar2: lumbar2 (-0.0555379 0.026557 -0.0646662)
      PathPoint PathPoint_rib10_L: rib10_L (-0.0577634 -0.0204597 -0.0749912)
      PathPoint PathPoint_rib9_L: rib9_L (-0.0626313 -0.0173559 -0.0853353)
    Thelen2003Muscle IL_R10_l: max_isometric_force=399.052 optimal_fiber_length=0.1778271 tendon_slack_length=0.1046903
        pennation_angle_at_optimal=0.24086
      PathPoint PathPoint_pelvis: pelvis (-0.144386 0.0695622 -0.0699736)
      PathPoint PathPoint_lumbar2: lumbar2 (-0.0552945 0.0264403 -0.0672603)
      PathPoint PathPoint_rib10_L: rib10_L (-0.0575357 -0.0219126 -0.0769942)
    Thelen2003Muscle IL_R11_l: max_isometric_force=489.2008 optimal_fiber_length=0.1475973
        tendon_slack_length=0.07387981 pennation_angle_at_optimal=0.24086
      PathPoint PathPoint_pelvis: pelvis (-0.140783 0.0727773 -0.0723056)
      PathPoint PathPoint_lumbar2: lumbar2 (-0.0551393 0.0264811 -0.070406)
      PathPoint PathPoint_rib11_L: rib11_L (-0.0456134 -0.0269578 -0.0682534)
    Thelen2003Muscle IL_R12_l: max_isometric_force=428.8624 optimal_fiber_length=0.107657
        tendon_slack_length=0.05388769 pennation_angle_at_optimal=0.24086
      PathPoint PathPoint_pelvis: pelvis (-0.137384 0.0759342 -0.0747341)
      PathPoint PathPoint_rib12_L: rib12_L (-0.0349067 -0.035206 -0.0542666)
    Thelen2003Muscle LTpT_T1_r: max_isometric_force=677.8958 optimal_fiber_length=0.1257365
        tendon_slack_length=0.2977371 pennation_angle_at_optimal=0.21991
      PathPoint PathPoint_lumbar1: lumbar1 (-0.0568504 0.0193343 0.0115819)
      ConditionalPathPoint ViaPoint_thoracic12: thoracic12 (-0.043373 0.0314353 0.0154306)
          socket_coordinate=/jointset/L5_S1_IVDjnt/L5_S1_FE range=(-1.74533 1.74533) [radians]
      ConditionalPathPoint ViaPoint_thoracic11: thoracic11 (-0.0393509 0.026504 0.0206921)
          socket_coordinate=/jointset/L5_S1_IVDjnt/L5_S1_FE range=(-1.74533 1.74533)
      ConditionalPathPoint ViaPoint_thoracic10: thoracic10 (-0.0459563 0.0376941 0.0350937)
          socket_coordinate=/jointset/L5_S1_IVDjnt/L5_S1_FE range=(-1.74533 1.74533)
      ConditionalPathPoint ViaPoint_thoracic9: thoracic9 (-0.0476839 0.0318647 0.0427483)
          socket_coordinate=/jointset/L5_S1_IVDjnt/L5_S1_FE range=(-1.74533 1.74533)
      ConditionalPathPoint ViaPoint_thoracic8: thoracic8 (-0.0465785 0.0284762 0.0440961)
          socket_coordinate=/jointset/L5_S1_IVDjnt/L5_S1_FE range=(-1.74533 1.74533)
      ConditionalPathPoint ViaPoint_thoracic7: thoracic7 (-0.0456743 0.0269272 0.0439292)
          socket_coordinate=/jointset/L5_S1_IVDjnt/L5_S1_FE range=(-1.74533 1.74533)
      ConditionalPathPoint ViaPoint_thoracic6: thoracic6 (-0.0445228 0.0238424 0.0466802)
          socket_coordinate=/jointset/L5_S1_IVDjnt/L5_S1_FE range=(-1.74533 1.74533)
      ConditionalPathPoint ViaPoint_thoracic5: thoracic5 (-0.0424215 0.0217124 0.0484819)
          socket_coordinate=/jointset/L5_S1_IVDjnt/L5_S1_FE range=(-1.74533 1.74533)
      PathPoint PathPoint_thoracic1: thoracic1 (-0.0552789 0.00301134 0.054606)
    Thelen2003Muscle LTpT_T2_r: max_isometric_force=500.6005 optimal_fiber_length=0.1315722
        tendon_slack_length=0.3164293 pennation_angle_at_optimal=0.21991
      PathPoint PathPoint_lumbar2: lumbar2 (-0.0567106 0.00647498 0.0161541)
      ConditionalPathPoint ViaPoint_thoracic12: thoracic12 (-0.0437169 0.0357126 0.0185048)
          socket_coordinate=/jointset/L5_S1_IVDjnt/L5_S1_FE range=(-1.74533 1.74533)
      ConditionalPathPoint ViaPoint_thoracic11: thoracic11 (-0.039434 0.0297266 0.0236432)
          socket_coordinate=/jointset/L5_S1_IVDjnt/L5_S1_FE range=(-1.74533 1.74533)
      ConditionalPathPoint ViaPoint_thoracic10: thoracic10 (-0.0464419 0.0399671 0.0382629)
          socket_coordinate=/jointset/L5_S1_IVDjnt/L5_S1_FE range=(-1.74533 1.74533)
      ConditionalPathPoint ViaPoint_thoracic9: thoracic9 (-0.0476865 0.0332321 0.0451742)
          socket_coordinate=/jointset/L5_S1_IVDjnt/L5_S1_FE range=(-1.74533 1.74533)
      ConditionalPathPoint ViaPoint_thoracic8: thoracic8 (-0.0465727 0.0288653 0.046406)
          socket_coordinate=/jointset/L5_S1_IVDjnt/L5_S1_FE range=(-1.74533 1.74533)
      ConditionalPathPoint ViaPoint_thoracic7: thoracic7 (-0.0456834 0.0261471 0.0462171)
          socket_coordinate=/jointset/L5_S1_IVDjnt/L5_S1_FE range=(-1.74533 1.74533)
      ConditionalPathPoint ViaPoint_thoracic6: thoracic6 (-0.0442264 0.0218795 0.0487872)
          socket_coordinate=/jointset/L5_S1_IVDjnt/L5_S1_FE range=(-1.74533 1.74533)
      ConditionalPathPoint ViaPoint_thoracic5: thoracic5 (-0.0424215 0.0188264 0.0504836)
          socket_coordinate=/jointset/L5_S1_IVDjnt/L5_S1_FE range=(-1.74533 1.74533)
      ConditionalPathPoint ViaPoint_thoracic4: thoracic4 (-0.0394516 0.0130137 0.0519789)
          socket_coordinate=/jointset/L5_S1_IVDjnt/L5_S1_FE range=(-1.74533 1.74533)
      PathPoint PathPoint_thoracic2: thoracic2 (-0.0532435 0.00372238 0.0550134)
    Thelen2003Muscle LTpT_T3_r: max_isometric_force=358.8273 optimal_fiber_length=0.1331042
        tendon_slack_length=0.3201135 pennation_angle_at_optimal=0.21991
      PathPoint PathPoint_lumbar3: lumbar3 (-0.0532302 0.00706384 0.0171183)
      PathPoint PathPoint_lumbar1: lumbar1 (-0.0507599 0.0116516 0.0137335)
      ConditionalPathPoint ViaPoint_thoracic12: thoracic12 (-0.0437169 0.0357126 0.0178757)
          socket_coordinate=/jointset/L5_S1_IVDjnt/L5_S1_FE range=(-1.74533 1.74533)
      ConditionalPathPoint ViaPoint_thoracic11: thoracic11 (-0.039434 0.0297266 0.0231903)
          socket_coordinate=/jointset/L5_S1_IVDjnt/L5_S1_FE range=(-1.74533 1.74533)
      ConditionalPathPoint ViaPoint_thoracic10: thoracic10 (-0.0464419 0.0399671 0.0380304)
          socket_coordinate=/jointset/L5_S1_IVDjnt/L5_S1_FE range=(-1.74533 1.74533)
      ConditionalPathPoint ViaPoint_thoracic9: thoracic9 (-0.0476865 0.0332321 0.0450857)
          socket_coordinate=/jointset/L5_S1_IVDjnt/L5_S1_FE range=(-1.74533 1.74533)
      ConditionalPathPoint ViaPoint_thoracic8: thoracic8 (-0.0465727 0.0288653 0.0464575)
          socket_coordinate=/jointset/L5_S1_IVDjnt/L5_S1_FE range=(-1.74533 1.74533)
      ConditionalPathPoint ViaPoint_thoracic7: thoracic7 (-0.0456834 0.0261471 0.0464157)
          socket_coordinate=/jointset/L5_S1_IVDjnt/L5_S1_FE range=(-1.74533 1.74533)
      ConditionalPathPoint ViaPoint_thoracic6: thoracic6 (-0.0442264 0.0218795 0.0491282)
          socket_coordinate=/jointset/L5_S1_IVDjnt/L5_S1_FE range=(-1.74533 1.74533)
      ConditionalPathPoint ViaPoint_thoracic5: thoracic5 (-0.0424215 0.0188264 0.050966)
          socket_coordinate=/jointset/L5_S1_IVDjnt/L5_S1_FE range=(-1.74533 1.74533)
      PathPoint PathPoint_thoracic3: thoracic3 (-0.0564969 0.00444271 0.0544284)
    Thelen2003Muscle LTpT_T4_r: max_isometric_force=126.0048 optimal_fiber_length=0.1332977
        tendon_slack_length=0.320579 pennation_angle_at_optimal=0.21991
      PathPoint PathPoint_lumbar4: lumbar4 (-0.0546981 0.00744861 0.0161863)
      PathPoint PathPoint_lumbar1: lumbar1 (-0.0507652 0.0116477 0.0149039)
      ConditionalPathPoint ViaPoint_thoracic12: thoracic12 (-0.0437169 0.0357126 0.0191652)
          socket_coordinate=/jointset/L5_S1_IVDjnt/L5_S1_FE range=(-1.74533 1.74533)
      ConditionalPathPoint ViaPoint_thoracic11: thoracic11 (-0.039434 0.0297266 0.0245479)
          socket_coordinate=/jointset/L5_S1_IVDjnt/L5_S1_FE range=(-1.74533 1.74533)
      ConditionalPathPoint ViaPoint_thoracic10: thoracic10 (-0.0464419 0.0399671 0.0394733)
          socket_coordinate=/jointset/L5_S1_IVDjnt/L5_S1_FE range=(-1.74533 1.74533)
      ConditionalPathPoint ViaPoint_thoracic9: thoracic9 (-0.0476865 0.0332321 0.0465843)
          socket_coordinate=/jointset/L5_S1_IVDjnt/L5_S1_FE range=(-1.74533 1.74533)
      ConditionalPathPoint ViaPoint_thoracic8: thoracic8 (-0.0465727 0.0288653 0.0480104)
          socket_coordinate=/jointset/L5_S1_IVDjnt/L5_S1_FE range=(-1.74533 1.74533)
      ConditionalPathPoint ViaPoint_thoracic7: thoracic7 (-0.0456834 0.0261471 0.0480254)
          socket_coordinate=/jointset/L5_S1_IVDjnt/L5_S1_FE range=(-1.74533 1.74533)
      ConditionalPathPoint ViaPoint_thoracic6: thoracic6 (-0.0442264 0.0218795 0.0507931)
          socket_coordinate=/jointset/L5_S1_IVDjnt/L5_S1_FE range=(-1.74533 1.74533)
      PathPoint PathPoint_thoracic4: thoracic4 (-0.0592563 0.00777946 0.054606)
    Thelen2003Muscle LTpT_T5_r: max_isometric_force=118.5917 optimal_fiber_length=0.1246208
        tendon_slack_length=0.2997111 pennation_angle_at_optimal=0.21991
      PathPoint PathPoint_lumbar4: lumbar4 (-0.0571424 0.00385245 0.0135106)
      PathPoint PathPoint_lumbar2: lumbar2 (-0.050928 0.0271134 0.016627)
      ConditionalPathPoint ViaPoint_thoracic12: thoracic12 (-0.0437169 0.0357126 0.0212075)
          socket_coordinate=/jointset/L5_S1_IVDjnt/L5_S1_FE range=(-1.74533 1.74533)
      ConditionalPathPoint ViaPoint_thoracic11: thoracic11 (-0.039434 0.0297266 0.0269157)
          socket_coordinate=/jointset/L5_S1_IVDjnt/L5_S1_FE range=(-1.74533 1.74533)
      ConditionalPathPoint ViaPoint_thoracic10: thoracic10 (-0.0464419 0.0399671 0.0422478)
          socket_coordinate=/jointset/L5_S1_IVDjnt/L5_S1_FE range=(-1.74533 1.74533)
      ConditionalPathPoint ViaPoint_thoracic9: thoracic9 (-0.0476865 0.0332321 0.0496245)
          socket_coordinate=/jointset/L5_S1_IVDjnt/L5_S1_FE range=(-1.74533 1.74533)
      ConditionalPathPoint ViaPoint_thoracic8: thoracic8 (-0.0465727 0.0288653 0.0513093)
          socket_coordinate=/jointset/L5_S1_IVDjnt/L5_S1_FE range=(-1.74533 1.74533)
      ConditionalPathPoint ViaPoint_thoracic7: thoracic7 (-0.0456834 0.0261471 0.0515959)
          socket_coordinate=/jointset/L5_S1_IVDjnt/L5_S1_FE range=(-1.74533 1.74533)
      PathPoint PathPoint_thoracic5: thoracic5 (-0.0582013 0.0112318 0.0566221)
    Thelen2003Muscle LTpT_T6_r: max_isometric_force=169.3344 optimal_fiber_length=0.1315444
        tendon_slack_length=0.3005468 pennation_angle_at_optimal=0.21991
      PathPoint PathPoint_lumbar5: lumbar5 (-0.0391997 0.00250285 0.000223089)
      PathPoint PathPoint_lumbar2: lumbar2 (-0.050928 0.0271134 0.019343)
      PathPoint PathPoint_thoracic10: thoracic10 (-0.0564045 0.035052 0.0377134)
      PathPoint PathPoint_thoracic6: thoracic6 (-0.0632657 0.0141942 0.0561834)
    Thelen2003Muscle LTpT_T7_r: max_isometric_force=165.7978 optimal_fiber_length=0.1492767
        tendon_slack_length=0.2822742 pennation_angle_at_optimal=0.21991
      PathPoint PathPoint_sacrum: sacrum (-0.137179 0.067421 0.000289213)
      PathPoint PathPoint_lumbar2: lumbar2 (-0.0509191 0.0271104 0.0214322)
      PathPoint PathPoint_thoracic10: thoracic10 (-0.0575304 0.035482 0.0420405)
      PathPoint PathPoint_thoracic7: thoracic7 (-0.0622625 0.0175626 0.054781)
    Thelen2003Muscle LTpT_T8_r: max_isometric_force=250.5831 optimal_fiber_length=0.1600602
        tendon_slack_length=0.252777 pennation_angle_at_optimal=0.21991
      PathPoint PathPoint_sacrum: sacrum (-0.149276 0.055982 0.00039122)
      PathPoint PathPoint_lumbar4: lumbar4 (-0.053769 0.0197735 0.0186393)
      PathPoint PathPoint_lumbar3: lumbar3 (-0.0548732 0.0267465 0.0217207)
      PathPoint PathPoint_lumbar2: lumbar2 (-0.0525287 0.0260856 0.0215229)
      PathPoint PathPoint_thoracic8: thoracic8 (-0.0622056 0.0185625 0.0553821)
    Thelen2003Muscle LTpT_T9_r: max_isometric_force=290.0382 optimal_fiber_length=0.1576119
        tendon_slack_length=0.2671314 pennation_angle_at_optimal=0.21991
      PathPoint PathPoint_sacrum: sacrum (-0.173219 0.0298984 0)
      PathPoint PathPoint_lumbar4: lumbar4 (-0.0534949 0.0196959 0.0205424)
      PathPoint PathPoint_lumbar3: lumbar3 (-0.0545795 0.0270441 0.0231586)
      PathPoint PathPoint_lumbar2: lumbar2 (-0.0518582 0.0263078 0.022064)
      PathPoint PathPoint_thoracic9: thoracic9 (-0.0599387 0.032466 0.0563422)
    Thelen2003Muscle LTpT_T10_r: max_isometric_force=250.6679 optimal_fiber_length=0.145762
        tendon_slack_length=0.2470474 pennation_angle_at_optimal=0.21991
      PathPoint PathPoint_sacrum: sacrum (-0.171798 0.0273648 0.0111983)
      PathPoint PathPoint_lumbar4: lumbar4 (-0.0534949 0.0196959 0.0258491)
      PathPoint PathPoint_lumbar3: lumbar3 (-0.0542689 0.0271891 0.0280908)
      PathPoint PathPoint_lumbar2: lumbar2 (-0.0512018 0.0259752 0.0259923)
      PathPoint PathPoint_thoracic10: thoracic10 (-0.0512881 0.0369969 0.0413711)
    Thelen2003Muscle LTpT_T11_r: max_isometric_force=239.3754 optimal_fiber_length=0.1273367
        tendon_slack_length=0.215819 pennation_angle_at_optimal=0.21991
      PathPoint PathPoint_sacrum: sacrum (-0.164684 0.0342147 0.0251126)
      PathPoint PathPoint_lumbar4: lumbar4 (-0.0532317 0.018639 0.0356382)
      PathPoint PathPoint_lumbar3: lumbar3 (-0.0581913 0.0272792 0.0348495)
      PathPoint PathPoint_lumbar2: lumbar2 (-0.0531051 0.0266144 0.0307767)
      PathPoint PathPoint_thoracic11: thoracic11 (-0.0450188 0.0372898 0.03132)
    Thelen2003Muscle LTpT_T12_r: max_isometric_force=196.1394 optimal_fiber_length=0.1012109
        tendon_slack_length=0.1715391 pennation_angle_at_optimal=0.21991
      PathPoint PathPoint_sacrum: sacrum (-0.151219 0.0543709 0.0291762)
      PathPoint PathPoint_lumbar4: lumbar4 (-0.0532317 0.018639 0.0390855)
      PathPoint PathPoint_lumbar3: lumbar3 (-0.057465 0.0277969 0.0380015)
      PathPoint PathPoint_lumbar2: lumbar2 (-0.0527554 0.0272242 0.0335511)
      PathPoint PathPoint_thoracic12: thoracic12 (-0.0439669 0.0373653 0.0277366)
    Thelen2003Muscle LTpT_R4_r: max_isometric_force=125.8458 optimal_fiber_length=0.1736195
        tendon_slack_length=0.2942622 pennation_angle_at_optimal=0.21991
      PathPoint PathPoint_lumbar4: lumbar4 (-0.0546981 0.00744861 0.0161864)
      PathPoint PathPoint_lumbar2: lumbar2 (-0.052864 0.0290372 0.0218068)
      PathPoint PathPoint_rib10_R: rib10_R (-0.0346347 -0.00273542 0.0350131)
      PathPoint PathPoint_rib9_R: rib9_R (-0.0408101 -0.0025707 0.0431682)
      PathPoint PathPoint_rib8_R: rib8_R (-0.0422581 -0.00169485 0.0452881)
      PathPoint PathPoint_rib7_R: rib7_R (-0.0433815 -0.00181351 0.0458994)
      PathPoint PathPoint_rib4_R: rib4_R (-0.0454505 0.000722384 0.0467303)
    Thelen2003Muscle LTpT_R5_r: max_isometric_force=118.4875 optimal_fiber_length=0.1626956
        tendon_slack_length=0.2757477 pennation_angle_at_optimal=0.21991
      PathPoint PathPoint_lumbar4: lumbar4 (-0.0571424 0.00385245 0.0135106)
      PathPoint PathPoint_lumbar2: lumbar2 (-0.0541333 0.0284697 0.0247435)
      PathPoint PathPoint_rib10_R: rib10_R (-0.038467 -0.00374926 0.038804)
      PathPoint PathPoint_rib9_R: rib9_R (-0.0446245 -0.00342632 0.0473162)
      PathPoint PathPoint_rib8_R: rib8_R (-0.0458923 -0.00226748 0.0495763)
      PathPoint PathPoint_rib7_R: rib7_R (-0.046832 -0.0023661 0.0502979)
      PathPoint PathPoint_rib5_R: rib5_R (-0.0487211 -0.00202893 0.0519562)
    Thelen2003Muscle LTpT_R6_r: max_isometric_force=169.3344 optimal_fiber_length=0.1753622
        tendon_slack_length=0.2686512 pennation_angle_at_optimal=0.21991
      PathPoint PathPoint_lumbar5: lumbar5 (-0.0391997 0.00250285 0.00021937)
      PathPoint PathPoint_lumbar3: lumbar3 (-0.055193 0.0281611 0.0243727)
      PathPoint PathPoint_lumbar2: lumbar2 (-0.050928 0.0271134 0.0245661)
      PathPoint PathPoint_rib10_R: rib10_R (-0.0420888 -0.00485002 0.0425978)
      PathPoint PathPoint_rib9_R: rib9_R (-0.0482276 -0.00437332 0.0515038)
      PathPoint PathPoint_rib8_R: rib8_R (-0.0492911 -0.00293817 0.0539063)
      PathPoint PathPoint_rib7_R: rib7_R (-0.0500215 -0.00300781 0.0547391)
      PathPoint PathPoint_rib6_R: rib6_R (-0.0520095 -0.00366035 0.0566255)
    Thelen2003Muscle LTpT_R7_r: max_isometric_force=165.7978 optimal_fiber_length=0.1655799
        tendon_slack_length=0.2769068 pennation_angle_at_optimal=0.21991
      PathPoint PathPoint_sacrum: sacrum (-0.137179 0.0674177 0.000292493)
      PathPoint PathPoint_lumbar4: lumbar4 (-0.0537341 0.0206536 0.0212296)
      PathPoint PathPoint_lumbar3: lumbar3 (-0.0542788 0.0273507 0.0264678)
      PathPoint PathPoint_lumbar2: lumbar2 (-0.0509417 0.0270154 0.0279941)
      PathPoint PathPoint_rib10_R: rib10_R (-0.0470142 -0.00671283 0.0482961)
      PathPoint PathPoint_rib9_R: rib9_R (-0.0531333 -0.00600997 0.0578788)
      PathPoint PathPoint_rib8_R: rib8_R (-0.0538428 -0.0041726 0.0604975)
      PathPoint PathPoint_rib7_R: rib7_R (-0.0542158 -0.00417318 0.0614988)
    Thelen2003Muscle LTpT_R8_r: max_isometric_force=270.4566 optimal_fiber_length=0.1384471
        tendon_slack_length=0.2823901 pennation_angle_at_optimal=0.21991
      PathPoint PathPoint_sacrum: sacrum (-0.149276 0.0559864 0.000386509)
      PathPoint PathPoint_lumbar4: lumbar4 (-0.0533513 0.0198875 0.0246316)
      PathPoint PathPoint_lumbar3: lumbar3 (-0.0540633 0.0265524 0.0297885)
      PathPoint PathPoint_lumbar2: lumbar2 (-0.0510585 0.0265289 0.0314605)
      PathPoint PathPoint_rib10_R: rib10_R (-0.0511733 -0.00889431 0.0540067)
      PathPoint PathPoint_rib9_R: rib9_R (-0.0572985 -0.00796637 0.0643921)
      PathPoint PathPoint_rib8_R: rib8_R (-0.0575999 -0.00574016 0.0672296)
    Thelen2003Muscle LTpT_R9_r: max_isometric_force=230.2181 optimal_fiber_length=0.1215372
        tendon_slack_length=0.2969032 pennation_angle_at_optimal=0.21991
      PathPoint PathPoint_sacrum: sacrum (-0.173219 0.029904 0)
      PathPoint PathPoint_lumbar4: lumbar4 (-0.0534189 0.0193887 0.0282803)
      PathPoint PathPoint_lumbar3: lumbar3 (-0.0542037 0.0260284 0.0334838)
      PathPoint PathPoint_lumbar2: lumbar2 (-0.051044 0.0265928 0.0352635)
      PathPoint PathPoint_rib10_R: rib10_R (-0.0543886 -0.0114691 0.0597311)
      PathPoint PathPoint_rib9_R: rib9_R (-0.0605682 -0.0103094 0.0710734)
    Thelen2003Muscle LTpT_R10_r: max_isometric_force=250.4872 optimal_fiber_length=0.1445694
        tendon_slack_length=0.248342 pennation_angle_at_optimal=0.21991
      PathPoint PathPoint_sacrum: sacrum (-0.171798 0.0273637 0.0111983)
      PathPoint PathPoint_lumbar4: lumbar4 (-0.0531412 0.0184924 0.0330243)
      PathPoint PathPoint_lumbar3: lumbar3 (-0.0541277 0.0256149 0.0375251)
      PathPoint PathPoint_lumbar2: lumbar2 (-0.0510694 0.0262516 0.0385831)
      PathPoint PathPoint_rib10_R: rib10_R (-0.0566443 -0.0145107 0.0655628)
    Thelen2003Muscle LTpT_R11_r: max_isometric_force=240.014 optimal_fiber_length=0.135993
        tendon_slack_length=0.1937354 pennation_angle_at_optimal=0.21991
      PathPoint PathPoint_sacrum: sacrum (-0.164684 0.0342158 0.0251126)
      PathPoint PathPoint_lumbar4: lumbar4 (-0.0528822 0.0197321 0.0434603)
      PathPoint PathPoint_lumbar3: lumbar3 (-0.0542625 0.0270783 0.0470675)
      PathPoint PathPoint_lumbar2: lumbar2 (-0.0509295 0.0272104 0.0470923)
      PathPoint PathPoint_rib11_R: rib11_R (-0.0450139 -0.0204027 0.0593228)
    Thelen2003Muscle LTpT_R12_r: max_isometric_force=196.2089 optimal_fiber_length=0.08555185
        tendon_slack_length=0.1663871 pennation_angle_at_optimal=0.21991
      PathPoint PathPoint_sacrum: sacrum (-0.151219 0.0543709 0.0291762)
      PathPoint PathPoint_lumbar4: lumbar4 (-0.0533899 0.0192742 0.047727)
      PathPoint PathPoint_lumbar3: lumbar3 (-0.0542443 0.026745 0.0505088)
      PathPoint PathPoint_lumbar2: lumbar2 (-0.050928 0.0271134 0.0504883)
      PathPoint PathPoint_rib12_R: rib12_R (-0.0354632 -0.0295011 0.0486624)
    Thelen2003Muscle LTpT_T1_l: max_isometric_force=677.8958 optimal_fiber_length=0.1266128
        tendon_slack_length=0.2998121 pennation_angle_at_optimal=0.21991
      PathPoint PathPoint_lumbar1: lumbar1 (-0.0573216 0.0193413 -0.0115954)
      ConditionalPathPoint ViaPoint_thoracic12: thoracic12 (-0.043373 0.0314353 -0.0154306)
          socket_coordinate=/jointset/L5_S1_IVDjnt/L5_S1_FE range=(-1.74533 1.74533)
      ConditionalPathPoint ViaPoint_thoracic11: thoracic11 (-0.0393509 0.026504 -0.0206921)
          socket_coordinate=/jointset/L5_S1_IVDjnt/L5_S1_FE range=(-1.74533 1.74533)
      ConditionalPathPoint ViaPoint_thoracic10: thoracic10 (-0.0459563 0.0376941 -0.0350937)
          socket_coordinate=/jointset/L5_S1_IVDjnt/L5_S1_FE range=(-1.74533 1.74533)
      ConditionalPathPoint ViaPoint_thoracic9: thoracic9 (-0.0476839 0.0318647 -0.0427483)
          socket_coordinate=/jointset/L5_S1_IVDjnt/L5_S1_FE range=(-1.74533 1.74533)
      ConditionalPathPoint ViaPoint_thoracic8: thoracic8 (-0.0465785 0.0284762 -0.0440961)
          socket_coordinate=/jointset/L5_S1_IVDjnt/L5_S1_FE range=(-1.74533 1.74533)
      ConditionalPathPoint ViaPoint_thoracic7: thoracic7 (-0.0456743 0.0269272 -0.0439292)
          socket_coordinate=/jointset/L5_S1_IVDjnt/L5_S1_FE range=(-1.74533 1.74533)
      ConditionalPathPoint ViaPoint_thoracic6: thoracic6 (-0.0445228 0.0238424 -0.0466802)
          socket_coordinate=/jointset/L5_S1_IVDjnt/L5_S1_FE range=(-1.74533 1.74533)
      ConditionalPathPoint ViaPoint_thoracic5: thoracic5 (-0.0424215 0.0217124 -0.0484819)
          socket_coordinate=/jointset/L5_S1_IVDjnt/L5_S1_FE range=(-1.74533 1.74533)
      PathPoint PathPoint_thoracic1: thoracic1 (-0.0549186 0.00301132 -0.054606)
    Thelen2003Muscle LTpT_T2_l: max_isometric_force=500.6005 optimal_fiber_length=0.1315722
        tendon_slack_length=0.3164293 pennation_angle_at_optimal=0.21991
      PathPoint PathPoint_lumbar2: lumbar2 (-0.0567106 0.00647498 -0.0161541)
      ConditionalPathPoint ViaPoint_thoracic12: thoracic12 (-0.0437169 0.0357126 -0.0185048)
          socket_coordinate=/jointset/L5_S1_IVDjnt/L5_S1_FE range=(-1.74533 1.74533)
      ConditionalPathPoint ViaPoint_thoracic11: thoracic11 (-0.039434 0.0297266 -0.0236432)
          socket_coordinate=/jointset/L5_S1_IVDjnt/L5_S1_FE range=(-1.74533 1.74533)
      ConditionalPathPoint ViaPoint_thoracic10: thoracic10 (-0.0464419 0.0399671 -0.0382629)
          socket_coordinate=/jointset/L5_S1_IVDjnt/L5_S1_FE range=(-1.74533 1.74533)
      ConditionalPathPoint ViaPoint_thoracic9: thoracic9 (-0.0476865 0.0332321 -0.0451742)
          socket_coordinate=/jointset/L5_S1_IVDjnt/L5_S1_FE range=(-1.74533 1.74533)
      ConditionalPathPoint ViaPoint_thoracic8: thoracic8 (-0.0465727 0.0288653 -0.046406)
          socket_coordinate=/jointset/L5_S1_IVDjnt/L5_S1_FE range=(-1.74533 1.74533)
      ConditionalPathPoint ViaPoint_thoracic7: thoracic7 (-0.0456834 0.0261471 -0.0462171)
          socket_coordinate=/jointset/L5_S1_IVDjnt/L5_S1_FE range=(-1.74533 1.74533)
      ConditionalPathPoint ViaPoint_thoracic6: thoracic6 (-0.0442264 0.0218795 -0.0487872)
          socket_coordinate=/jointset/L5_S1_IVDjnt/L5_S1_FE range=(-1.74533 1.74533)
      ConditionalPathPoint ViaPoint_thoracic5: thoracic5 (-0.0424215 0.0188264 -0.0504836)
          socket_coordinate=/jointset/L5_S1_IVDjnt/L5_S1_FE range=(-1.74533 1.74533)
      ConditionalPathPoint ViaPoint_thoracic4: thoracic4 (-0.0394516 0.0130137 -0.0519789)
          socket_coordinate=/jointset/L5_S1_IVDjnt/L5_S1_FE range=(-1.74533 1.74533)
      PathPoint PathPoint_thoracic2: thoracic2 (-0.0532435 0.00372238 -0.0550134)
    Thelen2003Muscle LTpT_T3_l: max_isometric_force=358.8273 optimal_fiber_length=0.1331042
        tendon_slack_length=0.3201135 pennation_angle_at_optimal=0.21991
      PathPoint PathPoint_lumbar3: lumbar3 (-0.0532302 0.00706384 -0.0171183)
      PathPoint PathPoint_lumbar1: lumbar1 (-0.0507599 0.0116516 -0.0137335)
      ConditionalPathPoint ViaPoint_thoracic12: thoracic12 (-0.0437169 0.0357126 -0.0178757)
          socket_coordinate=/jointset/L5_S1_IVDjnt/L5_S1_FE range=(-1.74533 1.74533)
      ConditionalPathPoint ViaPoint_thoracic11: thoracic11 (-0.039434 0.0297266 -0.0231903)
          socket_coordinate=/jointset/L5_S1_IVDjnt/L5_S1_FE range=(-1.74533 1.74533)
      ConditionalPathPoint ViaPoint_thoracic10: thoracic10 (-0.0464419 0.0399671 -0.0380304)
          socket_coordinate=/jointset/L5_S1_IVDjnt/L5_S1_FE range=(-1.74533 1.74533)
      ConditionalPathPoint ViaPoint_thoracic9: thoracic9 (-0.0476865 0.0332321 -0.0450857)
          socket_coordinate=/jointset/L5_S1_IVDjnt/L5_S1_FE range=(-1.74533 1.74533)
      ConditionalPathPoint ViaPoint_thoracic8: thoracic8 (-0.0465727 0.0288653 -0.0464575)
          socket_coordinate=/jointset/L5_S1_IVDjnt/L5_S1_FE range=(-1.74533 1.74533)
      ConditionalPathPoint ViaPoint_thoracic7: thoracic7 (-0.0456834 0.0261471 -0.0464157)
          socket_coordinate=/jointset/L5_S1_IVDjnt/L5_S1_FE range=(-1.74533 1.74533)
      ConditionalPathPoint ViaPoint_thoracic6: thoracic6 (-0.0442264 0.0218795 -0.0491282)
          socket_coordinate=/jointset/L5_S1_IVDjnt/L5_S1_FE range=(-1.74533 1.74533)
      ConditionalPathPoint ViaPoint_thoracic5: thoracic5 (-0.0424215 0.0188264 -0.050966)
          socket_coordinate=/jointset/L5_S1_IVDjnt/L5_S1_FE range=(-1.74533 1.74533)
      PathPoint PathPoint_thoracic3: thoracic3 (-0.0564969 0.00444271 -0.0544284)
    Thelen2003Muscle LTpT_T4_l: max_isometric_force=126.0048 optimal_fiber_length=0.1332977
        tendon_slack_length=0.320579 pennation_angle_at_optimal=0.21991
      PathPoint PathPoint_lumbar4: lumbar4 (-0.0546981 0.00744861 -0.0161863)
      PathPoint PathPoint_lumbar1: lumbar1 (-0.0507652 0.0116477 -0.0149039)
      ConditionalPathPoint ViaPoint_thoracic12: thoracic12 (-0.0437169 0.0357126 -0.0191652)
          socket_coordinate=/jointset/L5_S1_IVDjnt/L5_S1_FE range=(-1.74533 1.74533)
      ConditionalPathPoint ViaPoint_thoracic11: thoracic11 (-0.039434 0.0297266 -0.0245479)
          socket_coordinate=/jointset/L5_S1_IVDjnt/L5_S1_FE range=(-1.74533 1.74533)
      ConditionalPathPoint ViaPoint_thoracic10: thoracic10 (-0.0464419 0.0399671 -0.0394733)
          socket_coordinate=/jointset/L5_S1_IVDjnt/L5_S1_FE range=(-1.74533 1.74533)
      ConditionalPathPoint ViaPoint_thoracic9: thoracic9 (-0.0476865 0.0332321 -0.0465843)
          socket_coordinate=/jointset/L5_S1_IVDjnt/L5_S1_FE range=(-1.74533 1.74533)
      ConditionalPathPoint ViaPoint_thoracic8: thoracic8 (-0.0465727 0.0288653 -0.0480104)
          socket_coordinate=/jointset/L5_S1_IVDjnt/L5_S1_FE range=(-1.74533 1.74533)
      ConditionalPathPoint ViaPoint_thoracic7: thoracic7 (-0.0456834 0.0261471 -0.0480254)
          socket_coordinate=/jointset/L5_S1_IVDjnt/L5_S1_FE range=(-1.74533 1.74533)
      ConditionalPathPoint ViaPoint_thoracic6: thoracic6 (-0.0442264 0.0218795 -0.0507931)
          socket_coordinate=/jointset/L5_S1_IVDjnt/L5_S1_FE range=(-1.74533 1.74533)
      PathPoint PathPoint_thoracic4: thoracic4 (-0.0592563 0.00777946 -0.054606)
    Thelen2003Muscle LTpT_T5_l: max_isometric_force=118.5917 optimal_fiber_length=0.1246208
        tendon_slack_length=0.2997111 pennation_angle_at_optimal=0.21991
      PathPoint PathPoint_lumbar4: lumbar4 (-0.0571424 0.00385245 -0.0135106)
      PathPoint PathPoint_lumbar2: lumbar2 (-0.050928 0.0271134 -0.016627)
      ConditionalPathPoint ViaPoint_thoracic12: thoracic12 (-0.0437169 0.0357126 -0.0212075)
          socket_coordinate=/jointset/L5_S1_IVDjnt/L5_S1_FE range=(-1.74533 1.74533)
      ConditionalPathPoint ViaPoint_thoracic11: thoracic11 (-0.039434 0.0297266 -0.0269157)
          socket_coordinate=/jointset/L5_S1_IVDjnt/L5_S1_FE range=(-1.74533 1.74533)
      ConditionalPathPoint ViaPoint_thoracic10: thoracic10 (-0.0464419 0.0399671 -0.0422478)
          socket_coordinate=/jointset/L5_S1_IVDjnt/L5_S1_FE range=(-1.74533 1.74533)
      ConditionalPathPoint ViaPoint_thoracic9: thoracic9 (-0.0476865 0.0332321 -0.0496245)
          socket_coordinate=/jointset/L5_S1_IVDjnt/L5_S1_FE range=(-1.74533 1.74533)
      ConditionalPathPoint ViaPoint_thoracic8: thoracic8 (-0.0465727 0.0288653 -0.0513093)
          socket_coordinate=/jointset/L5_S1_IVDjnt/L5_S1_FE range=(-1.74533 1.74533)
      ConditionalPathPoint ViaPoint_thoracic7: thoracic7 (-0.0456834 0.0261471 -0.0515959)
          socket_coordinate=/jointset/L5_S1_IVDjnt/L5_S1_FE range=(-1.74533 1.74533)
      PathPoint PathPoint_thoracic5: thoracic5 (-0.0582013 0.0112318 -0.0566221)
    Thelen2003Muscle LTpT_T6_l: max_isometric_force=169.3344 optimal_fiber_length=0.1315443
        tendon_slack_length=0.3005466 pennation_angle_at_optimal=0.21991
      PathPoint PathPoint_lumbar5: lumbar5 (-0.0391997 0.00250285 -0.00021937)
      PathPoint PathPoint_lumbar2: lumbar2 (-0.050928 0.0271134 -0.019343)
      PathPoint PathPoint_thoracic10: thoracic10 (-0.0564045 0.035052 -0.0377186)
      PathPoint PathPoint_thoracic6: thoracic6 (-0.0632657 0.0141942 -0.0561834)
    Thelen2003Muscle LTpT_T7_l: max_isometric_force=165.7978 optimal_fiber_length=0.1492765
        tendon_slack_length=0.282274 pennation_angle_at_optimal=0.21991
      PathPoint PathPoint_sacrum: sacrum (-0.137179 0.067421 -0.000292493)
      PathPoint PathPoint_lumbar2: lumbar2 (-0.0509191 0.0271104 -0.0214322)
      PathPoint PathPoint_thoracic10: thoracic10 (-0.0575304 0.035482 -0.0420436)
      PathPoint PathPoint_thoracic7: thoracic7 (-0.0622625 0.0175626 -0.054781)
    Thelen2003Muscle LTpT_T8_l: max_isometric_force=250.5832 optimal_fiber_length=0.1600602
        tendon_slack_length=0.2527769 pennation_angle_at_optimal=0.21991
      PathPoint PathPoint_sacrum: sacrum (-0.149276 0.055982 -0.000386509)
      PathPoint PathPoint_lumbar4: lumbar4 (-0.053769 0.0197735 -0.0186421)
      PathPoint PathPoint_lumbar3: lumbar3 (-0.0548732 0.0267465 -0.0217244)
      PathPoint PathPoint_lumbar2: lumbar2 (-0.0525287 0.0260856 -0.0215229)
      PathPoint PathPoint_thoracic8: thoracic8 (-0.0622056 0.0185625 -0.0553821)
    Thelen2003Muscle LTpT_T9_l: max_isometric_force=290.0382 optimal_fiber_length=0.1576119
        tendon_slack_length=0.2671314 pennation_angle_at_optimal=0.21991
      PathPoint PathPoint_sacrum: sacrum (-0.173219 0.0298984 0)
      PathPoint PathPoint_lumbar4: lumbar4 (-0.0534949 0.0196959 -0.0205424)
      PathPoint PathPoint_lumbar3: lumbar3 (-0.0545795 0.0270441 -0.0231586)
      PathPoint PathPoint_lumbar2: lumbar2 (-0.0518582 0.0263078 -0.022064)
      PathPoint PathPoint_thoracic9: thoracic9 (-0.0599387 0.032466 -0.0563422)
    Thelen2003Muscle LTpT_T10_l: max_isometric_force=250.6679 optimal_fiber_length=0.145762
        tendon_slack_length=0.2470474 pennation_angle_at_optimal=0.21991
      PathPoint PathPoint_sacrum: sacrum (-0.171798 0.0273648 -0.0111983)
      PathPoint PathPoint_lumbar4: lumbar4 (-0.0534949 0.0196959 -0.0258491)
      PathPoint PathPoint_lumbar3: lumbar3 (-0.0542689 0.0271891 -0.0280908)
      PathPoint PathPoint_lumbar2: lumbar2 (-0.0512018 0.0259752 -0.0259923)
      PathPoint PathPoint_thoracic10: thoracic10 (-0.0512881 0.0369969 -0.0413711)
    Thelen2003Muscle LTpT_T11_l: max_isometric_force=239.3753 optimal_fiber_length=0.1273368
        tendon_slack_length=0.2158191 pennation_angle_at_optimal=0.21991
      PathPoint PathPoint_sacrum: sacrum (-0.164684 0.0342147 -0.0251126)
      PathPoint PathPoint_lumbar4: lumbar4 (-0.0532317 0.018639 -0.0356382)
      PathPoint PathPoint_lumbar3: lumbar3 (-0.0581913 0.0272792 -0.0348443)
      PathPoint PathPoint_lumbar2: lumbar2 (-0.0531051 0.0266144 -0.0307767)
      PathPoint PathPoint_thoracic11: thoracic11 (-0.0450188 0.0372898 -0.03132)
    Thelen2003Muscle LTpT_T12_l: max_isometric_force=196.1394 optimal_fiber_length=0.1012109
        tendon_slack_length=0.1715391 pennation_angle_at_optimal=0.21991
      PathPoint PathPoint_sacrum: sacrum (-0.151219 0.0543709 0.0291762)
      PathPoint PathPoint_lumbar4: lumbar4 (-0.0532317 0.018639 0.0390855)
      PathPoint PathPoint_lumbar3: lumbar3 (-0.057465 0.0277969 0.0380015)
      PathPoint PathPoint_lumbar2: lumbar2 (-0.0527554 0.0272242 0.0335511)
      PathPoint PathPoint_thoracic12: thoracic12 (-0.0439669 0.0373653 0.0277366)
    Thelen2003Muscle LTpT_R4_l: max_isometric_force=125.8458 optimal_fiber_length=0.1736196
        tendon_slack_length=0.2942623 pennation_angle_at_optimal=0.21991
      PathPoint PathPoint_lumbar4: lumbar4 (-0.0546981 0.00744861 -0.0161863)
      PathPoint PathPoint_lumbar2: lumbar2 (-0.052864 0.0290372 -0.0218089)
      PathPoint PathPoint_rib10_L: rib10_L (-0.0346347 -0.00273569 -0.0350131)
      PathPoint PathPoint_rib9_L: rib9_L (-0.0408101 -0.00256992 -0.0431682)
      PathPoint PathPoint_rib8_L: rib8_L (-0.0422581 -0.0016952 -0.0452881)
      PathPoint PathPoint_rib7_L: rib7_L (-0.0433815 -0.00181387 -0.0458994)
      PathPoint PathPoint_rib4_L: rib4_L (-0.0454506 0.000722044 -0.0467302)
    Thelen2003Muscle LTpT_R5_l: max_isometric_force=118.4875 optimal_fiber_length=0.1626958
        tendon_slack_length=0.275748 pennation_angle_at_optimal=0.21991
      PathPoint PathPoint_lumbar4: lumbar4 (-0.0571424 0.00385245 -0.0135106)
      PathPoint PathPoint_lumbar2: lumbar2 (-0.0541333 0.0284697 -0.0247477)
      PathPoint PathPoint_rib10_L: rib10_L (-0.038467 -0.00374956 -0.0388041)
      PathPoint PathPoint_rib9_L: rib9_L (-0.0446245 -0.00342669 -0.0473162)
      PathPoint PathPoint_rib8_L: rib8_L (-0.0458923 -0.00226675 -0.0495763)
      PathPoint PathPoint_rib7_L: rib7_L (-0.046832 -0.00236538 -0.0502977)
      PathPoint PathPoint_rib5_L: rib5_L (-0.0487212 -0.00202932 -0.0519561)
    Thelen2003Muscle LTpT_R6_l: max_isometric_force=169.3344 optimal_fiber_length=0.1753624
        tendon_slack_length=0.2686514 pennation_angle_at_optimal=0.21991
      PathPoint PathPoint_lumbar5: lumbar5 (-0.0391997 0.00250285 -0.00021937)
      PathPoint PathPoint_lumbar3: lumbar3 (-0.055193 0.0281611 -0.0243686)
      PathPoint PathPoint_lumbar2: lumbar2 (-0.050928 0.0271134 -0.0245661)
      PathPoint PathPoint_rib10_L: rib10_L (-0.0420888 -0.00485034 -0.0425978)
      PathPoint PathPoint_rib9_L: rib9_L (-0.0482276 -0.00437373 -0.0515038)
      PathPoint PathPoint_rib8_L: rib8_L (-0.049291 -0.00293748 -0.0539062)
      PathPoint PathPoint_rib7_L: rib7_L (-0.0500214 -0.00300713 -0.0547389)
      PathPoint PathPoint_rib6_L: rib6_L (-0.0520094 -0.00366079 -0.0566254)
    Thelen2003Muscle LTpT_R7_l: max_isometric_force=165.7978 optimal_fiber_length=0.1655799
        tendon_slack_length=0.2769069 pennation_angle_at_optimal=0.21991
      PathPoint PathPoint_sacrum: sacrum (-0.137179 0.0674177 -0.000292493)
      PathPoint PathPoint_lumbar4: lumbar4 (-0.0537341 0.0206536 -0.02123)
      PathPoint PathPoint_lumbar3: lumbar3 (-0.0542788 0.0273507 -0.026473)
      PathPoint PathPoint_lumbar2: lumbar2 (-0.0509417 0.0270154 -0.027992)
      PathPoint PathPoint_rib10_L: rib10_L (-0.0470142 -0.00671321 -0.0482961)
      PathPoint PathPoint_rib9_L: rib9_L (-0.0531333 -0.00601041 -0.0578788)
      PathPoint PathPoint_rib8_L: rib8_L (-0.0538428 -0.00417195 -0.0604974)
      PathPoint PathPoint_rib7_L: rib7_L (-0.0542157 -0.00417366 -0.0614988)
    Thelen2003Muscle LTpT_R8_l: max_isometric_force=270.4566 optimal_fiber_length=0.1384473
        tendon_slack_length=0.2823903 pennation_angle_at_optimal=0.21991
      PathPoint PathPoint_sacrum: sacrum (-0.149276 0.0559864 -0.000386509)
      PathPoint PathPoint_lumbar4: lumbar4 (-0.0533513 0.0198875 -0.0246285)
      PathPoint PathPoint_lumbar3: lumbar3 (-0.0540633 0.0265524 -0.0297885)
      PathPoint PathPoint_lumbar2: lumbar2 (-0.0510585 0.0265289 -0.0314594)
      PathPoint PathPoint_rib10_L: rib10_L (-0.0511732 -0.00889472 -0.0540067)
      PathPoint PathPoint_rib9_L: rib9_L (-0.0572994 -0.00796576 -0.0643921)
      PathPoint PathPoint_rib8_L: rib8_L (-0.0575999 -0.00574069 -0.0672296)
    Thelen2003Muscle LTpT_R9_l: max_isometric_force=230.2181 optimal_fiber_length=0.1215373
        tendon_slack_length=0.2969035 pennation_angle_at_optimal=0.21991
      PathPoint PathPoint_sacrum: sacrum (-0.173219 0.029904 0)
      PathPoint PathPoint_lumbar4: lumbar4 (-0.0534189 0.0193887 -0.0282803)
      PathPoint PathPoint_lumbar3: lumbar3 (-0.0542037 0.0260284 -0.0334817)
      PathPoint PathPoint_lumbar2: lumbar2 (-0.051044 0.0265928 -0.0352656)
      PathPoint PathPoint_rib10_L: rib10_L (-0.0543886 -0.0114696 -0.0597311)
      PathPoint PathPoint_rib9_L: rib9_L (-0.0605682 -0.01031 -0.0710734)
    Thelen2003Muscle LTpT_R10_l: max_isometric_force=250.4872 optimal_fiber_length=0.1445697
        tendon_slack_length=0.2483424 pennation_angle_at_optimal=0.21991
      PathPoint PathPoint_sacrum: sacrum (-0.171798 0.0273637 -0.0111983)
      PathPoint PathPoint_lumbar4: lumbar4 (-0.0531412 0.0184924 -0.0330253)
      PathPoint PathPoint_lumbar3: lumbar3 (-0.0541277 0.0256149 -0.0375209)
      PathPoint PathPoint_lumbar2: lumbar2 (-0.0510694 0.0262516 -0.03858)
      PathPoint PathPoint_rib10_L: rib10_L (-0.0566442 -0.0145112 -0.0655629)
    Thelen2003Muscle LTpT_R11_l: max_isometric_force=240.0139 optimal_fiber_length=0.1359933
        tendon_slack_length=0.1937358 pennation_angle_at_optimal=0.21991
      PathPoint PathPoint_sacrum: sacrum (-0.164684 0.0342158 -0.0251126)
      PathPoint PathPoint_lumbar4: lumbar4 (-0.0528822 0.0197321 -0.0434614)
      PathPoint PathPoint_lumbar3: lumbar3 (-0.0542625 0.0270783 -0.0470706)
      PathPoint PathPoint_lumbar2: lumbar2 (-0.0509295 0.0272104 -0.0470891)
      PathPoint PathPoint_rib11_L: rib11_L (-0.0450139 -0.0204031 -0.0593228)
    Thelen2003Muscle LTpT_R12_l: max_isometric_force=196.2093 optimal_fiber_length=0.08555155
        tendon_slack_length=0.1663865 pennation_angle_at_optimal=0.21991
      PathPoint PathPoint_sacrum: sacrum (-0.151219 0.0543709 -0.0291762)
      PathPoint PathPoint_lumbar4: lumbar4 (-0.0533899 0.0192742 -0.0477301)
      PathPoint PathPoint_lumbar3: lumbar3 (-0.0542443 0.026745 -0.0505046)
      PathPoint PathPoint_lumbar2: lumbar2 (-0.050928 0.0271134 -0.0504935)
      PathPoint PathPoint_rib12_L: rib12_L (-0.0354632 -0.0295014 -0.0486624)
    Thelen2003Muscle LTpL_L5_r: max_isometric_force=328.2315 optimal_fiber_length=0.05828689
        tendon_slack_length=0.001158068 pennation_angle_at_optimal=0.21991
      PathPoint PathPoint_sacrum: sacrum (-0.147552 0.0823251 0.0364259)
      PathPoint PathPoint_lumbar5: lumbar5 (-0.0330958 0.0187503 0.037839)
    Thelen2003Muscle LTpL_L4_r: max_isometric_force=315.8454 optimal_fiber_length=0.04514962
        tendon_slack_length=0.04869071 pennation_angle_at_optimal=0.21991
      PathPoint PathPoint_pelvis: pelvis (-0.148971 0.0254751 0.0389747)
      PathPoint PathPoint_lumbar4: lumbar4 (-0.0288192 0.0268438 0.0361802)
    Thelen2003Muscle LTpL_L3_r: max_isometric_force=252.284 optimal_fiber_length=0.06365638
        tendon_slack_length=0.06919896 pennation_angle_at_optimal=0.21991
      PathPoint PathPoint_pelvis: pelvis (-0.156831 0.0254794 0.0419937)
      PathPoint PathPoint_lumbar3: lumbar3 (-0.0374979 0.0305578 0.0332358)
    Thelen2003Muscle LTpL_L2_r: max_isometric_force=225.4453 optimal_fiber_length=0.08418698
        tendon_slack_length=0.09262085 pennation_angle_at_optimal=0.21991
      PathPoint PathPoint_pelvis: pelvis (-0.158068 0.0188932 0.0438176)
      PathPoint PathPoint_lumbar2: lumbar2 (-0.0342316 0.0313449 0.030183)
    Thelen2003Muscle LTpL_L1_r: max_isometric_force=220.824 optimal_fiber_length=0.1029927
        tendon_slack_length=0.1198672 pennation_angle_at_optimal=0.21991
      PathPoint PathPoint_pelvis: pelvis (-0.160345 0.0148506 0.0450408)
      PathPoint PathPoint_lumbar1: lumbar1 (-0.0305736 0.0394339 0.0293833)
    Thelen2003Muscle LTpL_L5_l: max_isometric_force=328.2315 optimal_fiber_length=0.05828704
        tendon_slack_length=0.00115807 pennation_angle_at_optimal=0.21991
      PathPoint PathPoint_sacrum: sacrum (-0.147552 0.0823229 -0.0364227)
      PathPoint PathPoint_lumbar5: lumbar5 (-0.0330958 0.0187503 -0.037839)
    Thelen2003Muscle LTpL_L4_l: max_isometric_force=315.8454 optimal_fiber_length=0.04514982
        tendon_slack_length=0.04869093 pennation_angle_at_optimal=0.21991
      PathPoint PathPoint_pelvis: pelvis (-0.148971 0.0254751 -0.0389747)
      PathPoint PathPoint_lumbar4: lumbar4 (-0.0288192 0.0268438 -0.0361781)
    Thelen2003Muscle LTpL_L3_l: max_isometric_force=252.284 optimal_fiber_length=0.06365638
        tendon_slack_length=0.06919896 pennation_angle_at_optimal=0.21991
      PathPoint PathPoint_pelvis: pelvis (-0.156831 0.0254794 -0.0419937)
      PathPoint PathPoint_lumbar3: lumbar3 (-0.0374979 0.0305578 -0.0332358)
    Thelen2003Muscle LTpL_L2_l: max_isometric_force=225.4453 optimal_fiber_length=0.08418752
        tendon_slack_length=0.09262144 pennation_angle_at_optimal=0.21991
      PathPoint PathPoint_pelvis: pelvis (-0.158068 0.0188932 -0.0438218)
      PathPoint PathPoint_lumbar2: lumbar2 (-0.0342294 0.0313455 -0.0301871)
    Thelen2003Muscle LTpL_L1_l: max_isometric_force=220.824 optimal_fiber_length=0.1029955
        tendon_slack_length=0.1198705 pennation_angle_at_optimal=0.21991
      PathPoint PathPoint_pelvis: pelvis (-0.160345 0.0148448 -0.045044)
      PathPoint PathPoint_lumbar1: lumbar1 (-0.0305736 0.0394339 -0.0293885)
    Thelen2003Muscle QL_post_I_1-L3_r: max_isometric_force=102.4413 optimal_fiber_length=0.04185462
        tendon_slack_length=0.03516823 pennation_angle_at_optimal=0.12915
      PathPoint PathPoint_pelvis: pelvis (-0.120236 0.0674644 0.0543411)
      PathPoint PathPoint_lumbar3: lumbar3 (-0.0245402 0.0282192 0.031652)
    Thelen2003Muscle QL_post_I_2-L4_r: max_isometric_force=211.9672 optimal_fiber_length=0.0209141
        tendon_slack_length=0.01757302 pennation_angle_at_optimal=0.12915
      PathPoint PathPoint_pelvis: pelvis (-0.110338 0.0820295 0.0616534)
      PathPoint PathPoint_lumbar4: lumbar4 (-0.0242145 0.0304624 0.031652)
    Thelen2003Muscle QL_post_I_2-L3_r: max_isometric_force=79.36388 optimal_fiber_length=0.03548103
        tendon_slack_length=0.02981284 pennation_angle_at_optimal=0.12915
      PathPoint PathPoint_pelvis: pelvis (-0.110338 0.0820295 0.0616534)
      PathPoint PathPoint_lumbar3: lumbar3 (-0.0245402 0.0282192 0.031652)
    Thelen2003Muscle QL_post_I_2-L2_r: max_isometric_force=49.53207 optimal_fiber_length=0.05560909
        tendon_slack_length=0.04672539 pennation_angle_at_optimal=0.12915
      PathPoint PathPoint_pelvis: pelvis (-0.110338 0.0820295 0.0616534)
      PathPoint PathPoint_lumbar2: lumbar2 (-0.0239215 0.0272089 0.031652)
    Thelen2003Muscle QL_post_I_3-L1_r: max_isometric_force=104.6066 optimal_fiber_length=0.0793492
        tendon_slack_length=0.06667296 pennation_angle_at_optimal=0.12915
      PathPoint PathPoint_lumbar1: lumbar1 (-0.0243115 0.0361302 0.030294)
      PathPoint PathPoint_pelvis: pelvis (-0.103706 0.0904964 0.0722563)
    Thelen2003Muscle QL_post_I_3-L2_r: max_isometric_force=76.54956 optimal_fiber_length=0.05401276
        tendon_slack_length=0.04538408 pennation_angle_at_optimal=0.12915
      PathPoint PathPoint_lumbar2: lumbar2 (-0.0239215 0.0272089 0.031652)
      PathPoint PathPoint_pelvis: pelvis (-0.103706 0.0904964 0.0722563)
    Thelen2003Muscle QL_post_I_3-L3_r: max_isometric_force=130.5845 optimal_fiber_length=0.03553897
        tendon_slack_length=0.02986153 pennation_angle_at_optimal=0.12915
      PathPoint PathPoint_lumbar3: lumbar3 (-0.0245402 0.0282192 0.031652)
      PathPoint PathPoint_pelvis: pelvis (-0.103706 0.0904964 0.0722563)
    Thelen2003Muscle QL_post_I_1-L3_l: max_isometric_force=102.4413 optimal_fiber_length=0.04185462
        tendon_slack_length=0.03516823 pennation_angle_at_optimal=0.12915
      PathPoint PathPoint_pelvis: pelvis (-0.120236 0.0674644 -0.0543411)
      PathPoint PathPoint_lumbar3: lumbar3 (-0.0245402 0.0282192 -0.031652)
    Thelen2003Muscle QL_post_I_2-L4_l: max_isometric_force=211.9672 optimal_fiber_length=0.0209141
        tendon_slack_length=0.01757302 pennation_angle_at_optimal=0.12915
      PathPoint PathPoint_pelvis: pelvis (-0.110338 0.0820295 -0.0616534)
      PathPoint PathPoint_lumbar4: lumbar4 (-0.0242145 0.0304624 -0.031652)
    Thelen2003Muscle QL_post_I_2-L3_l: max_isometric_force=79.36388 optimal_fiber_length=0.03548103
        tendon_slack_length=0.02981284 pennation_angle_at_optimal=0.12915
      PathPoint PathPoint_pelvis: pelvis (-0.110338 0.0820295 -0.0616534)
      PathPoint PathPoint_lumbar3: lumbar3 (-0.0245402 0.0282192 -0.031652)
    Thelen2003Muscle QL_post_I_2-L2_l: max_isometric_force=49.53207 optimal_fiber_length=0.05560909
        tendon_slack_length=0.04672539 pennation_angle_at_optimal=0.12915
      PathPoint PathPoint_pelvis: pelvis (-0.110338 0.0820295 -0.0616534)
      PathPoint PathPoint_lumbar2: lumbar2 (-0.0239215 0.0272089 -0.031652)
    Thelen2003Muscle QL_post_I_3-L1_l: max_isometric_force=104.6066 optimal_fiber_length=0.0793492
        tendon_slack_length=0.06667296 pennation_angle_at_optimal=0.12915
      PathPoint PathPoint_lumbar1: lumbar1 (-0.0243115 0.0361302 -0.030294)
      PathPoint PathPoint_pelvis: pelvis (-0.103706 0.0904964 -0.0722563)
    Thelen2003Muscle QL_post_I_3-L2_l: max_isometric_force=76.54956 optimal_fiber_length=0.05401276
        tendon_slack_length=0.04538408 pennation_angle_at_optimal=0.12915
      PathPoint PathPoint_lumbar2: lumbar2 (-0.0239215 0.0272089 -0.031652)
      PathPoint PathPoint_pelvis: pelvis (-0.103706 0.0904964 -0.0722563)
    Thelen2003Muscle QL_post_I_3-L3_l: max_isometric_force=130.5845 optimal_fiber_length=0.03553897
        tendon_slack_length=0.02986153 pennation_angle_at_optimal=0.12915
      PathPoint PathPoint_lumbar3: lumbar3 (-0.0245402 0.0282192 -0.031652)
      PathPoint PathPoint_pelvis: pelvis (-0.103706 0.0904964 -0.0722563)
    Thelen2003Muscle QL_mid_L3-12_3_r: max_isometric_force=56.82813 optimal_fiber_length=0.07021659
        tendon_slack_length=0.03646056 pennation_angle_at_optimal=0.12915
      PathPoint PathPoint_rib12_R: rib12_R (-0.0205741 -0.0481841 0.0591334)
      PathPoint PathPoint_lumbar3: lumbar3 (-0.0245679 0.0306242 0.0317355)
    Thelen2003Muscle QL_mid_L3-12_2_r: max_isometric_force=64.66649 optimal_fiber_length=0.07695568
        tendon_slack_length=0.0399599 pennation_angle_at_optimal=0.12915
      PathPoint PathPoint_rib12_R: rib12_R (-0.0249168 -0.0280581 0.0404528)
      PathPoint PathPoint_lumbar3: lumbar3 (-0.0245669 0.0306231 0.0317355)
    Thelen2003Muscle QL_mid_L3-12_1_r: max_isometric_force=107.7775 optimal_fiber_length=0.0803054
        tendon_slack_length=0.04169926 pennation_angle_at_optimal=0.12915
      PathPoint PathPoint_rib12_R: rib12_R (-0.0163871 -0.0126032 0.0205881)
      PathPoint PathPoint_lumbar3: lumbar3 (-0.0245669 0.0306231 0.0317355)
    Thelen2003Muscle QL_mid_L2-12_1_r: max_isometric_force=211.5216 optimal_fiber_length=0.05408505
        tendon_slack_length=0.02808412 pennation_angle_at_optimal=0.12915
      PathPoint PathPoint_rib12_R: rib12_R (-0.0163871 -0.0126032 0.0205881)
      PathPoint PathPoint_lumbar2: lumbar2 (-0.0207986 0.0320653 0.0267631)
    Thelen2003Muscle QL_mid_L4-12_3_r: max_isometric_force=57.04733 optimal_fiber_length=0.08874843
        tendon_slack_length=0.04608338 pennation_angle_at_optimal=0.12915
      PathPoint PathPoint_rib12_R: rib12_R (-0.0205741 -0.0481841 0.0591334)
      PathPoint PathPoint_lumbar4: lumbar4 (-0.0238443 0.0356787 0.029312)
    Thelen2003Muscle QL_mid_L3-12_3_l: max_isometric_force=56.82813 optimal_fiber_length=0.07021695
        tendon_slack_length=0.03646075 pennation_angle_at_optimal=0.12915
      PathPoint PathPoint_rib12_L: rib12_L (-0.0205741 -0.0481841 -0.0591334)
      PathPoint PathPoint_lumbar3: lumbar3 (-0.0245679 0.0306242 -0.0317355)
    Thelen2003Muscle QL_mid_L3-12_2_l: max_isometric_force=64.66649 optimal_fiber_length=0.07695591
        tendon_slack_length=0.03996001 pennation_angle_at_optimal=0.12915
      PathPoint PathPoint_rib12_L: rib12_L (-0.0249168 -0.0280581 -0.0404528)
      PathPoint PathPoint_lumbar3: lumbar3 (-0.0245669 0.0306231 -0.0317355)
    Thelen2003Muscle QL_mid_L3-12_1_l: max_isometric_force=107.7775 optimal_fiber_length=0.08030551
        tendon_slack_length=0.04169932 pennation_angle_at_optimal=0.12915
      PathPoint PathPoint_rib12_L: rib12_L (-0.0163871 -0.0126032 -0.0205881)
      PathPoint PathPoint_lumbar3: lumbar3 (-0.0245669 0.0306231 -0.0317355)
    Thelen2003Muscle QL_mid_L2-12_1_l: max_isometric_force=211.5216 optimal_fiber_length=0.05408516
        tendon_slack_length=0.02808418 pennation_angle_at_optimal=0.12915
      PathPoint PathPoint_rib12_L: rib12_L (-0.0163871 -0.0126032 -0.0205881)
      PathPoint PathPoint_lumbar2: lumbar2 (-0.0207986 0.0320653 -0.0267631)
    Thelen2003Muscle QL_mid_L4-12_3_l: max_isometric_force=57.04733 optimal_fiber_length=0.0887488
        tendon_slack_length=0.04608357 pennation_angle_at_optimal=0.12915
      PathPoint PathPoint_rib12_L: rib12_L (-0.0205741 -0.0481841 -0.0591334)
      PathPoint PathPoint_lumbar4: lumbar4 (-0.0238443 0.0356787 -0.029312)
    Thelen2003Muscle QL_ant_I_2-T12_r: max_isometric_force=61.51184 optimal_fiber_length=0.1201204
        tendon_slack_length=0.06237353 pennation_angle_at_optimal=0.12915
      PathPoint PathPoint_pelvis: pelvis (-0.110338 0.0820295 0.0616534)
      PathPoint PathPoint_thoracic12: thoracic12 (0.00281165 0.0112324 0.018145)
    Thelen2003Muscle QL_ant_I_3-T12_r: max_isometric_force=115.5729 optimal_fiber_length=0.1168967
        tendon_slack_length=0.0606996 pennation_angle_at_optimal=0.12915
      PathPoint PathPoint_pelvis: pelvis (-0.103706 0.0904964 0.0722563)
      PathPoint PathPoint_thoracic12: thoracic12 (0.00281165 0.0112324 0.018145)
    Thelen2003Muscle QL_ant_I_2-12_1_r: max_isometric_force=38.05347 optimal_fiber_length=0.1136777
        tendon_slack_length=0.05902813 pennation_angle_at_optimal=0.12915
      PathPoint PathPoint_pelvis: pelvis (-0.110338 0.0820295 0.0616534)
      PathPoint PathPoint_rib12_R: rib12_R (-0.0221249 -0.0197958 0.030656)
    Thelen2003Muscle QL_ant_I_3-12_1_r: max_isometric_force=72.05869 optimal_fiber_length=0.1106773
        tendon_slack_length=0.05747013 pennation_angle_at_optimal=0.12915
      PathPoint PathPoint_pelvis: pelvis (-0.103706 0.0904964 0.0722563)
      PathPoint PathPoint_rib12_R: rib12_R (-0.0221249 -0.0197958 0.030656)
    Thelen2003Muscle QL_ant_I_3-12_2_r: max_isometric_force=47.76925 optimal_fiber_length=0.1055084
        tendon_slack_length=0.05478611 pennation_angle_at_optimal=0.12915
      PathPoint PathPoint_pelvis: pelvis (-0.103706 0.0904964 0.0722563)
      PathPoint PathPoint_rib12_R: rib12_R (-0.0249168 -0.0280581 0.0404528)
    Thelen2003Muscle QL_ant_I_3-12_3_r: max_isometric_force=55.05608 optimal_fiber_length=0.0910903
        tendon_slack_length=0.04729941 pennation_angle_at_optimal=0.12915
      PathPoint PathPoint_pelvis: pelvis (-0.103706 0.0904891 0.0722563)
      PathPoint PathPoint_rib12_R: rib12_R (-0.0205741 -0.0481841 0.0591334)
    Thelen2003Muscle QL_ant_I_2-T12_l: max_isometric_force=61.51184 optimal_fiber_length=0.1201204
        tendon_slack_length=0.06237353 pennation_angle_at_optimal=0.12915
      PathPoint PathPoint_pelvis: pelvis (-0.110338 0.0820295 -0.0616534)
      PathPoint PathPoint_thoracic12: thoracic12 (0.00281165 0.0112324 -0.018145)
    Thelen2003Muscle QL_ant_I_3-T12_l: max_isometric_force=115.5729 optimal_fiber_length=0.1168967
        tendon_slack_length=0.0606996 pennation_angle_at_optimal=0.12915
      PathPoint PathPoint_pelvis: pelvis (-0.103706 0.0904964 -0.0722563)
      PathPoint PathPoint_thoracic12: thoracic12 (0.00281165 0.0112324 -0.018145)
    Thelen2003Muscle QL_ant_I_2-12_1_l: max_isometric_force=38.05347 optimal_fiber_length=0.1136779
        tendon_slack_length=0.05902822 pennation_angle_at_optimal=0.12915
      PathPoint PathPoint_pelvis: pelvis (-0.110338 0.0820295 -0.0616534)
      PathPoint PathPoint_rib12_L: rib12_L (-0.0221249 -0.0197958 -0.030656)
    Thelen2003Muscle QL_ant_I_3-12_1_l: max_isometric_force=72.05869 optimal_fiber_length=0.1106775
        tendon_slack_length=0.05747021 pennation_angle_at_optimal=0.12915
      PathPoint PathPoint_pelvis: pelvis (-0.103706 0.0904964 -0.0722563)
      PathPoint PathPoint_rib12_L: rib12_L (-0.0221249 -0.0197958 -0.030656)
    Thelen2003Muscle QL_ant_I_3-12_2_l: max_isometric_force=47.76925 optimal_fiber_length=0.1055086
        tendon_slack_length=0.05478622 pennation_angle_at_optimal=0.12915
      PathPoint PathPoint_pelvis: pelvis (-0.103706 0.0904964 -0.0722563)
      PathPoint PathPoint_rib12_L: rib12_L (-0.0249168 -0.0280581 -0.0404528)
    Thelen2003Muscle QL_ant_I_3-12_3_l: max_isometric_force=55.05608 optimal_fiber_length=0.09109063
        tendon_slack_length=0.04729959 pennation_angle_at_optimal=0.12915
      PathPoint PathPoint_pelvis: pelvis (-0.103706 0.0904891 -0.0722563)
      PathPoint PathPoint_rib12_L: rib12_L (-0.0205741 -0.0481841 -0.0591334)
    Thelen2003Muscle MF_m1s_r: max_isometric_force=168.8993 optimal_fiber_length=0.06361579
        tendon_slack_length=0.02645032 pennation_angle_at_optimal=0
      PathPoint PathPoint_lumbar4: lumbar4 (-0.0476 0.0361691 0.0266968)
      PathPoint PathPoint_lumbar1: lumbar1 (-0.0452302 0.0100708 0.0122191)
    Thelen2003Muscle MF_m1t_1_r: max_isometric_force=149.6915 optimal_fiber_length=0.1051063
        tendon_slack_length=0.03151646 pennation_angle_at_optimal=0
      PathPoint PathPoint_lumbar5: lumbar5 (-0.0458285 0.0260497 0.028054)
      PathPoint PathPoint_lumbar1: lumbar1 (-0.0524713 0.00991838 0.0122936)
    Thelen2003Muscle MF_m1t_2_r: max_isometric_force=124.2382 optimal_fiber_length=0.1265037
        tendon_slack_length=0.03793253 pennation_angle_at_optimal=0
      PathPoint PathPoint_sacrum: sacrum (-0.126838 0.0935636 0.0196806)
      PathPoint PathPoint_lumbar1: lumbar1 (-0.0524701 0.00992427 0.0122974)
    Thelen2003Muscle MF_m1t_3_r: max_isometric_force=207.5138 optimal_fiber_length=0.130526
        tendon_slack_length=0.03913864 pennation_angle_at_optimal=0
      PathPoint PathPoint_pelvis: pelvis (-0.143101 0.0384901 0.0400611)
      PathPoint PathPoint_lumbar1: lumbar1 (-0.0524701 0.00992427 0.0122974)
    Thelen2003Muscle MF_m2s_r: max_isometric_force=113.3218 optimal_fiber_length=0.06587088
        tendon_slack_length=0.02547858 pennation_angle_at_optimal=0
      PathPoint PathPoint_lumbar5: lumbar5 (-0.0458907 0.0269236 0.0261265)
      PathPoint PathPoint_lumbar2: lumbar2 (-0.0469929 0.00630372 0.0127193)
    Thelen2003Muscle MF_m2t_1_r: max_isometric_force=119.5487 optimal_fiber_length=0.08674026
        tendon_slack_length=0.02640686 pennation_angle_at_optimal=0
      PathPoint PathPoint_sacrum: sacrum (-0.126148 0.0949463 0.0213468)
      PathPoint PathPoint_lumbar2: lumbar2 (-0.0530076 0.000326494 0.0128043)
    Thelen2003Muscle MF_m2t_2_r: max_isometric_force=303.4697 optimal_fiber_length=0.1016955
        tendon_slack_length=0.03095976 pennation_angle_at_optimal=0
      PathPoint PathPoint_pelvis: pelvis (-0.145833 0.0308244 0.0384932)
      PathPoint PathPoint_lumbar2: lumbar2 (-0.0530076 0.000326494 0.0128043)
    Thelen2003Muscle MF_m2t_3_r: max_isometric_force=335.2825 optimal_fiber_length=0.1180178
        tendon_slack_length=0.03592886 pennation_angle_at_optimal=0
      PathPoint PathPoint_pelvis: pelvis (-0.148199 0.0116509 0.0361208)
      PathPoint PathPoint_lumbar2: lumbar2 (-0.0524215 -0.000290037 0.0114723)
    Thelen2003Muscle MF_m3s_r: max_isometric_force=174.1509 optimal_fiber_length=0.05494041
        tendon_slack_length=0.02284325 pennation_angle_at_optimal=0
      PathPoint PathPoint_sacrum: sacrum (-0.126932 0.0931837 0.0181931)
      PathPoint PathPoint_lumbar3: lumbar3 (-0.0507293 0.00315641 0.0113862)
    Thelen2003Muscle MF_m3t_1_r: max_isometric_force=189.245 optimal_fiber_length=0.1390874
        tendon_slack_length=0.04628097 pennation_angle_at_optimal=0
      PathPoint PathPoint_pelvis: pelvis (-0.162829 -0.0509545 0.017863)
      PathPoint PathPoint_lumbar3: lumbar3 (-0.0574837 6.7547e-5 0.00998118)
    Thelen2003Muscle MF_m3t_2_r: max_isometric_force=189.245 optimal_fiber_length=0.1138638
        tendon_slack_length=0.03788789 pennation_angle_at_optimal=0
      PathPoint PathPoint_pelvis: pelvis (-0.152307 -0.0233991 0.0228291)
      PathPoint PathPoint_lumbar3: lumbar3 (-0.057465 5.95846e-5 0.0110234)
    Thelen2003Muscle MF_m3t_3_r: max_isometric_force=189.245 optimal_fiber_length=0.1138638
        tendon_slack_length=0.03788789 pennation_angle_at_optimal=0
      PathPoint PathPoint_pelvis: pelvis (-0.152307 -0.0233991 0.0228291)
      PathPoint PathPoint_lumbar3: lumbar3 (-0.057465 5.95846e-5 0.0110234)
    Thelen2003Muscle MF_m4s_r: max_isometric_force=210.2282 optimal_fiber_length=0.05025306
        tendon_slack_length=0.03175178 pennation_angle_at_optimal=0
      PathPoint PathPoint_sacrum: sacrum (-0.150101 0.0609556 0.0169009)
      PathPoint PathPoint_lumbar4: lumbar4 (-0.0524274 -0.000544059 0.0118084)
    Thelen2003Muscle MF_m4t_1_r: max_isometric_force=187.4535 optimal_fiber_length=0.07136387
        tendon_slack_length=0.02888448 pennation_angle_at_optimal=0
      PathPoint PathPoint_sacrum: sacrum (-0.159022 0.0462665 0.0160443)
      PathPoint PathPoint_lumbar4: lumbar4 (-0.0587545 -0.000489921 0.012439)
    Thelen2003Muscle MF_m4t_2_r: max_isometric_force=187.4535 optimal_fiber_length=0.09927393
        tendon_slack_length=0.04018106 pennation_angle_at_optimal=0
      PathPoint PathPoint_pelvis: pelvis (-0.160641 -0.041749 0.0158824)
      PathPoint PathPoint_lumbar4: lumbar4 (-0.0597412 -0.000545966 0.0124386)
    Thelen2003Muscle MF_m4t_3_r: max_isometric_force=187.4535 optimal_fiber_length=0.1152687
        tendon_slack_length=0.04665492 pennation_angle_at_optimal=0
      PathPoint PathPoint_pelvis: pelvis (-0.169095 -0.0599925 0.0132896)
      PathPoint PathPoint_lumbar4: lumbar4 (-0.061026 -0.000621853 0.0124386)
    Thelen2003Muscle MF_m5s_r: max_isometric_force=72.54656 optimal_fiber_length=0.01570446
        tendon_slack_length=0.00992267 pennation_angle_at_optimal=0
      PathPoint PathPoint_sacrum: sacrum (-0.136281 0.0738352 0.0108912)
      PathPoint PathPoint_lumbar5: lumbar5 (-0.0333339 0.00424621 0.00410462)
    Thelen2003Muscle MF_m5t_1_r: max_isometric_force=72.54656 optimal_fiber_length=0.08324118
        tendon_slack_length=0.03369182 pennation_angle_at_optimal=0
      PathPoint PathPoint_sacrum: sacrum (-0.181837 0.00582615 0.0104807)
      PathPoint PathPoint_lumbar5: lumbar5 (-0.0387969 0.0036008 0.00305645)
    Thelen2003Muscle MF_m5t_2_r: max_isometric_force=72.54656 optimal_fiber_length=0.0621128
        tendon_slack_length=0.02514012 pennation_angle_at_optimal=0
      PathPoint PathPoint_sacrum: sacrum (-0.170398 0.0285915 0.0122304)
      PathPoint PathPoint_lumbar5: lumbar5 (-0.0375794 0.00296984 0.00289516)
    Thelen2003Muscle MF_m5t_3_r: max_isometric_force=72.54656 optimal_fiber_length=0.04444881
        tendon_slack_length=0.01799063 pennation_angle_at_optimal=0
      PathPoint PathPoint_sacrum: sacrum (-0.159075 0.0474453 0.0121144)
      PathPoint PathPoint_lumbar5: lumbar5 (-0.0357402 0.00294967 0.00242435)
    Thelen2003Muscle MF_m1_laminar_r: max_isometric_force=81.23688 optimal_fiber_length=0.04444115
        tendon_slack_length=0.01687705 pennation_angle_at_optimal=0
      PathPoint PathPoint_lumbar3: lumbar3 (-0.0456794 0.0384771 0.0266732)
      PathPoint PathPoint_lumbar1: lumbar1 (-0.0419707 0.0182454 0.0155568)
    Thelen2003Muscle MF_m2_laminar_r: max_isometric_force=64.43043 optimal_fiber_length=0.03675655
        tendon_slack_length=0.01395874 pennation_angle_at_optimal=0
      PathPoint PathPoint_lumbar4: lumbar4 (-0.0472099 0.037431 0.0261697)
      PathPoint PathPoint_lumbar2: lumbar2 (-0.0419114 0.012013 0.0160611)
    Thelen2003Muscle MF_m3_laminar_r: max_isometric_force=74.42075 optimal_fiber_length=0.0403714
        tendon_slack_length=0.01533152 pennation_angle_at_optimal=0
      PathPoint PathPoint_lumbar5: lumbar5 (-0.0460117 0.0265684 0.026522)
      PathPoint PathPoint_lumbar3: lumbar3 (-0.0481664 0.010853 0.0151801)
    Thelen2003Muscle MF_m4_laminar_r: max_isometric_force=53.97183 optimal_fiber_length=0.04056514
        tendon_slack_length=0.0154051 pennation_angle_at_optimal=0
      PathPoint PathPoint_sacrum: sacrum (-0.130953 0.0863338 0.0202029)
      PathPoint PathPoint_lumbar4: lumbar4 (-0.0489048 0.00639777 0.0161611)
    Thelen2003Muscle MF_m5_laminar_r: max_isometric_force=116.3549 optimal_fiber_length=0.02343378
        tendon_slack_length=0.008899256 pennation_angle_at_optimal=0
      PathPoint PathPoint_pelvis: pelvis (-0.132847 0.016185 0.0129324)
      PathPoint PathPoint_lumbar5: lumbar5 (-0.0299823 0.00791945 0.00589165)
    Thelen2003Muscle MF_m1s_l: max_isometric_force=168.8993 optimal_fiber_length=0.0636146
        tendon_slack_length=0.02644983 pennation_angle_at_optimal=0
      PathPoint PathPoint_lumbar4: lumbar4 (-0.0476 0.0361691 -0.0266926)
      PathPoint PathPoint_lumbar1: lumbar1 (-0.0452302 0.0100708 -0.0122225)
    Thelen2003Muscle MF_m1t_1_l: max_isometric_force=149.6915 optimal_fiber_length=0.1051052
        tendon_slack_length=0.03151615 pennation_angle_at_optimal=0
      PathPoint PathPoint_lumbar5: lumbar5 (-0.0458285 0.0260497 -0.0280488)
      PathPoint PathPoint_lumbar1: lumbar1 (-0.0524713 0.00991838 -0.0122974)
    Thelen2003Muscle MF_m1t_2_l: max_isometric_force=124.2382 optimal_fiber_length=0.1265037
        tendon_slack_length=0.03793253 pennation_angle_at_optimal=0
      PathPoint PathPoint_sacrum: sacrum (-0.126838 0.0935636 -0.0196806)
      PathPoint PathPoint_lumbar1: lumbar1 (-0.0524701 0.00992427 -0.0122974)
    Thelen2003Muscle MF_m1t_3_l: max_isometric_force=207.5138 optimal_fiber_length=0.130526
        tendon_slack_length=0.03913864 pennation_angle_at_optimal=0
      PathPoint PathPoint_pelvis: pelvis (-0.143101 0.0384901 -0.0400611)
      PathPoint PathPoint_lumbar1: lumbar1 (-0.0524701 0.00992427 -0.0122974)
    Thelen2003Muscle MF_m2s_l: max_isometric_force=113.3218 optimal_fiber_length=0.06587052
        tendon_slack_length=0.02547844 pennation_angle_at_optimal=0
      PathPoint PathPoint_lumbar5: lumbar5 (-0.0458907 0.0269236 -0.0261245)
      PathPoint PathPoint_lumbar2: lumbar2 (-0.0469929 0.00630372 -0.0127199)
    Thelen2003Muscle MF_m2t_1_l: max_isometric_force=119.5487 optimal_fiber_length=0.08674121
        tendon_slack_length=0.02640715 pennation_angle_at_optimal=0
      PathPoint PathPoint_sacrum: sacrum (-0.126148 0.0949463 -0.021352)
      PathPoint PathPoint_lumbar2: lumbar2 (-0.0530076 0.000326494 -0.0128043)
    Thelen2003Muscle MF_m2t_2_l: max_isometric_force=303.4697 optimal_fiber_length=0.1016957
        tendon_slack_length=0.03095985 pennation_angle_at_optimal=0
      PathPoint PathPoint_pelvis: pelvis (-0.145833 0.0308244 -0.0384942)
      PathPoint PathPoint_lumbar2: lumbar2 (-0.0530076 0.000326494 -0.0128043)
    Thelen2003Muscle MF_m2t_3_l: max_isometric_force=335.2825 optimal_fiber_length=0.1177074
        tendon_slack_length=0.03583438 pennation_angle_at_optimal=0
      PathPoint PathPoint_pelvis: pelvis (-0.148199 0.0116509 -0.0361229)
      PathPoint PathPoint_lumbar2: lumbar2 (-0.0524215 -0.000290037 -0.0128039)
    Thelen2003Muscle MF_m3s_l: max_isometric_force=174.1509 optimal_fiber_length=0.05505986
        tendon_slack_length=0.02289292 pennation_angle_at_optimal=0
      PathPoint PathPoint_sacrum: sacrum (-0.126932 0.0931837 -0.0181973)
      PathPoint PathPoint_lumbar3: lumbar3 (-0.0507293 0.00315641 -0.010825)
    Thelen2003Muscle MF_m3t_1_l: max_isometric_force=189.245 optimal_fiber_length=0.1389546
        tendon_slack_length=0.04623678 pennation_angle_at_optimal=0
      PathPoint PathPoint_pelvis: pelvis (-0.162829 -0.0509545 -0.017863)
      PathPoint PathPoint_lumbar3: lumbar3 (-0.0574837 6.7547e-5 -0.0112848)
    Thelen2003Muscle MF_m3t_2_l: max_isometric_force=189.245 optimal_fiber_length=0.1138632
        tendon_slack_length=0.03788768 pennation_angle_at_optimal=0
      PathPoint PathPoint_pelvis: pelvis (-0.152307 -0.0233991 -0.0228249)
      PathPoint PathPoint_lumbar3: lumbar3 (-0.057465 5.95846e-5 -0.0110234)
    Thelen2003Muscle MF_m3t_3_l: max_isometric_force=189.245 optimal_fiber_length=0.1138632
        tendon_slack_length=0.03788768 pennation_angle_at_optimal=0
      PathPoint PathPoint_pelvis: pelvis (-0.152307 -0.0233991 -0.0228249)
      PathPoint PathPoint_lumbar3: lumbar3 (-0.057465 5.95846e-5 -0.0110234)
    Thelen2003Muscle MF_m4s_l: max_isometric_force=210.2282 optimal_fiber_length=0.05018435
        tendon_slack_length=0.03170837 pennation_angle_at_optimal=0
      PathPoint PathPoint_sacrum: sacrum (-0.150101 0.0609556 -0.0169019)
      PathPoint PathPoint_lumbar4: lumbar4 (-0.0524274 -0.000544059 -0.0122442)
    Thelen2003Muscle MF_m4t_1_l: max_isometric_force=187.4535 optimal_fiber_length=0.07146191
        tendon_slack_length=0.02892417 pennation_angle_at_optimal=0
      PathPoint PathPoint_sacrum: sacrum (-0.159022 0.0462665 -0.0160453)
      PathPoint PathPoint_lumbar4: lumbar4 (-0.0587545 -0.000489921 -0.0117702)
    Thelen2003Muscle MF_m4t_2_l: max_isometric_force=187.4535 optimal_fiber_length=0.09927346
        tendon_slack_length=0.04018087 pennation_angle_at_optimal=0
      PathPoint PathPoint_pelvis: pelvis (-0.160641 -0.041749 -0.0158782)
      PathPoint PathPoint_lumbar4: lumbar4 (-0.0597412 -0.000545966 -0.0124386)
    Thelen2003Muscle MF_m4t_3_l: max_isometric_force=187.4535 optimal_fiber_length=0.1152685
        tendon_slack_length=0.04665485 pennation_angle_at_optimal=0
      PathPoint PathPoint_pelvis: pelvis (-0.169095 -0.0599925 -0.0132876)
      PathPoint PathPoint_lumbar4: lumbar4 (-0.061026 -0.000621853 -0.0124386)
    Thelen2003Muscle MF_m5s_l: max_isometric_force=72.54656 optimal_fiber_length=0.01570517
        tendon_slack_length=0.009923123 pennation_angle_at_optimal=0
      PathPoint PathPoint_sacrum: sacrum (-0.136281 0.0738352 -0.0108954)
      PathPoint PathPoint_lumbar5: lumbar5 (-0.0333339 0.00424621 -0.00410535)
    Thelen2003Muscle MF_m5t_1_l: max_isometric_force=72.54656 optimal_fiber_length=0.08324073
        tendon_slack_length=0.03369164 pennation_angle_at_optimal=0
      PathPoint PathPoint_sacrum: sacrum (-0.181837 0.00582615 -0.0104775)
      PathPoint PathPoint_lumbar5: lumbar5 (-0.0387969 0.0036008 -0.00306073)
    Thelen2003Muscle MF_m5t_2_l: max_isometric_force=72.54656 optimal_fiber_length=0.06209632
        tendon_slack_length=0.02513345 pennation_angle_at_optimal=0
      PathPoint PathPoint_sacrum: sacrum (-0.170398 0.0285915 -0.0122325)
      PathPoint PathPoint_lumbar5: lumbar5 (-0.0375794 0.00296984 -0.00306073)
    Thelen2003Muscle MF_m5t_3_l: max_isometric_force=72.54656 optimal_fiber_length=0.04438163
        tendon_slack_length=0.01796344 pennation_angle_at_optimal=0
      PathPoint PathPoint_sacrum: sacrum (-0.159075 0.0474453 -0.0121176)
      PathPoint PathPoint_lumbar5: lumbar5 (-0.0357402 0.00294967 -0.00289359)
    Thelen2003Muscle MF_m1_laminar_l: max_isometric_force=81.23688 optimal_fiber_length=0.04444115
        tendon_slack_length=0.01687705 pennation_angle_at_optimal=0
      PathPoint PathPoint_lumbar3: lumbar3 (-0.0456794 0.0384771 -0.0266732)
      PathPoint PathPoint_lumbar1: lumbar1 (-0.0419707 0.0182454 -0.0155568)
    Thelen2003Muscle MF_m2_laminar_l: max_isometric_force=64.43043 optimal_fiber_length=0.03675655
        tendon_slack_length=0.01395874 pennation_angle_at_optimal=0
      PathPoint PathPoint_lumbar4: lumbar4 (-0.0472099 0.037431 -0.0261697)
      PathPoint PathPoint_lumbar2: lumbar2 (-0.0419114 0.012013 -0.0160611)
    Thelen2003Muscle MF_m3_laminar_l: max_isometric_force=74.42075 optimal_fiber_length=0.0403714
        tendon_slack_length=0.01533152 pennation_angle_at_optimal=0
      PathPoint PathPoint_lumbar5: lumbar5 (-0.0460117 0.0265684 -0.026522)
      PathPoint PathPoint_lumbar3: lumbar3 (-0.0481664 0.010853 -0.0151801)
    Thelen2003Muscle MF_m4_laminar_l: max_isometric_force=53.97183 optimal_fiber_length=0.04056514
        tendon_slack_length=0.0154051 pennation_angle_at_optimal=0
      PathPoint PathPoint_sacrum: sacrum (-0.130953 0.0863338 -0.0202029)
      PathPoint PathPoint_lumbar4: lumbar4 (-0.0489048 0.00639777 -0.0161611)
    Thelen2003Muscle MF_m5_laminar_l: max_isometric_force=116.3549 optimal_fiber_length=0.02343378
        tendon_slack_length=0.008899256 pennation_angle_at_optimal=0
      PathPoint PathPoint_pelvis: pelvis (-0.132847 0.016185 -0.0129324)
      PathPoint PathPoint_lumbar5: lumbar5 (-0.0299823 0.00791945 -0.00589165)
    Thelen2003Muscle E0_R5_r: max_isometric_force=99.33994 optimal_fiber_length=0.09175868
        tendon_slack_length=0.01019541 pennation_angle_at_optimal=0
      PathPoint PathPoint_Abdomen: Abdomen (0.0197968 0.166009 0)
      PathPoint PathPoint_rib5_R: rib5_R (0.149151 -0.137441 0.071124)
    Thelen2003Muscle E0_R6_r: max_isometric_force=122.192 optimal_fiber_length=0.1538205 tendon_slack_length=0.01709117
        pennation_angle_at_optimal=0
      PathPoint PathPoint_Abdomen: Abdomen (0.0151972 0.0847976 0)
      PathPoint PathPoint_rib6_R: rib6_R (0.128949 -0.136907 0.115229)
    Thelen2003Muscle E0_R7_r: max_isometric_force=241.5452 optimal_fiber_length=0.2063059
        tendon_slack_length=0.02292287 pennation_angle_at_optimal=0
      PathPoint PathPoint_Abdomen: Abdomen (0.0101943 0.00439619 0)
      PathPoint PathPoint_rib7_R: rib7_R (0.111337 -0.130463 0.138181)
    Thelen2003Muscle E0_R8_r: max_isometric_force=325.9131 optimal_fiber_length=0.2538348
        tendon_slack_length=0.02820386 pennation_angle_at_optimal=0
      PathPoint PathPoint_Abdomen: Abdomen (0.00433705 -0.0767401 0)
      PathPoint PathPoint_rib8_R: rib8_R (0.089879 -0.123684 0.148259)
    Thelen2003Muscle E0_R9_r: max_isometric_force=372.1591 optimal_fiber_length=0.3006785
        tendon_slack_length=0.03340873 pennation_angle_at_optimal=0
      PathPoint PathPoint_Abdomen: Abdomen (-0.00197968 -0.157096 0)
      PathPoint PathPoint_rib9_R: rib9_R (0.0680715 -0.117124 0.150464)
    Thelen2003Muscle E0_R10_r: max_isometric_force=265.966 optimal_fiber_length=0.1504845 tendon_slack_length=0.0167205
        pennation_angle_at_optimal=0
      PathPoint PathPoint_pelvis: pelvis (-0.0346445 0.07284 0.1358)
      PathPoint PathPoint_rib10_R: rib10_R (0.0437422 -0.111807 0.142543)
    Thelen2003Muscle E0_R11_r: max_isometric_force=264.2213 optimal_fiber_length=0.1132649
        tendon_slack_length=0.01258499 pennation_angle_at_optimal=0
      PathPoint PathPoint_pelvis: pelvis (-0.0693642 0.0905211 0.108766)
      PathPoint PathPoint_rib11_R: rib11_R (0.0113363 -0.0908525 0.115992)
    Thelen2003Muscle E0_R12_r: max_isometric_force=287.4008 optimal_fiber_length=0.08919105
        tendon_slack_length=0.009910117 pennation_angle_at_optimal=0
      PathPoint PathPoint_pelvis: pelvis (-0.0989842 0.094692 0.079391)
      PathPoint PathPoint_rib12_R: rib12_R (-0.00863378 -0.0710673 0.0771145)
    Thelen2003Muscle E0_R5_l: max_isometric_force=99.33994 optimal_fiber_length=0.09175939
        tendon_slack_length=0.01019549 pennation_angle_at_optimal=0
      PathPoint PathPoint_Abdomen: Abdomen (0.0197968 0.166009 0)
      PathPoint PathPoint_rib5_L: rib5_L (0.149151 -0.137441 -0.071124)
    Thelen2003Muscle E0_R6_l: max_isometric_force=122.1919 optimal_fiber_length=0.1538215
        tendon_slack_length=0.01709128 pennation_angle_at_optimal=0
      PathPoint PathPoint_Abdomen: Abdomen (0.0151972 0.0847976 0)
      PathPoint PathPoint_rib6_L: rib6_L (0.128949 -0.136907 -0.115229)
    Thelen2003Muscle E0_R7_l: max_isometric_force=241.5466 optimal_fiber_length=0.206307 tendon_slack_length=0.022923
        pennation_angle_at_optimal=0
      PathPoint PathPoint_Abdomen: Abdomen (0.0101943 0.00439619 0)
      PathPoint PathPoint_rib7_L: rib7_L (0.111337 -0.130463 -0.138181)
    Thelen2003Muscle E0_R8_l: max_isometric_force=325.913 optimal_fiber_length=0.253836 tendon_slack_length=0.028204
        pennation_angle_at_optimal=0
      PathPoint PathPoint_Abdomen: Abdomen (0.00433705 -0.0767401 0)
      PathPoint PathPoint_rib8_L: rib8_L (0.089879 -0.123684 -0.148259)
    Thelen2003Muscle E0_R9_l: max_isometric_force=372.1599 optimal_fiber_length=0.3006798
        tendon_slack_length=0.03340887 pennation_angle_at_optimal=0
      PathPoint PathPoint_Abdomen: Abdomen (-0.00197968 -0.157096 0)
      PathPoint PathPoint_rib9_L: rib9_L (0.0680715 -0.117124 -0.150464)
    Thelen2003Muscle E0_R10_l: max_isometric_force=265.9659 optimal_fiber_length=0.1504855
        tendon_slack_length=0.01672061 pennation_angle_at_optimal=0
      PathPoint PathPoint_pelvis: pelvis (-0.0346445 0.07284 -0.1358)
      PathPoint PathPoint_rib10_L: rib10_L (0.0437422 -0.111807 -0.142543)
    Thelen2003Muscle E0_R11_l: max_isometric_force=264.2212 optimal_fiber_length=0.1132658
        tendon_slack_length=0.01258509 pennation_angle_at_optimal=0
      PathPoint PathPoint_pelvis: pelvis (-0.0693642 0.0905211 -0.108766)
      PathPoint PathPoint_rib11_L: rib11_L (0.0113363 -0.0908525 -0.115992)
    Thelen2003Muscle E0_R12_l: max_isometric_force=287.4009 optimal_fiber_length=0.08919162
        tendon_slack_length=0.00991018 pennation_angle_at_optimal=0
      PathPoint PathPoint_pelvis: pelvis (-0.0989842 0.094692 -0.079391)
      PathPoint PathPoint_rib12_L: rib12_L (-0.00863378 -0.0710673 -0.0771145)
    Thelen2003Muscle IO1_r: max_isometric_force=404.381 optimal_fiber_length=0.1063387 tendon_slack_length=0.01181541
        pennation_angle_at_optimal=0
      PathPoint PathPoint_Abdomen: Abdomen (0.00303832 -0.0452994 0.0473996)
      PathPoint PathPoint_pelvis: pelvis (-0.0253885 0.000886696 0.127924)
    Thelen2003Muscle IO2_r: max_isometric_force=416.2857 optimal_fiber_length=0.1050995 tendon_slack_length=0.01167772
        pennation_angle_at_optimal=0
      PathPoint PathPoint_Abdomen: Abdomen (0.000673617 -0.0128462 0.0536819)
      PathPoint PathPoint_pelvis: pelvis (-0.0342377 0.037246 0.13274)
    Thelen2003Muscle IO3_r: max_isometric_force=396.595 optimal_fiber_length=0.1211798 tendon_slack_length=0.01346442
        pennation_angle_at_optimal=0
      PathPoint PathPoint_Abdomen: Abdomen (0.00334666 0.0326504 0.0437455)
      PathPoint PathPoint_pelvis: pelvis (-0.0442261 0.0679728 0.127893)
    Thelen2003Muscle IO4_r: max_isometric_force=480.747 optimal_fiber_length=0.1081456 tendon_slack_length=0.01201618
        pennation_angle_at_optimal=0
      PathPoint PathPoint_rib9_R: rib9_R (0.109432 -0.154343 0.124967)
      PathPoint PathPoint_pelvis: pelvis (-0.0567971 0.085804 0.11542)
    Thelen2003Muscle IO5_r: max_isometric_force=421.7764 optimal_fiber_length=0.1097328 tendon_slack_length=0.01219253
        pennation_angle_at_optimal=0
      PathPoint PathPoint_rib10_R: rib10_R (0.0642811 -0.130491 0.14218)
      PathPoint PathPoint_pelvis: pelvis (-0.0840267 0.0949163 0.0955304)
    Thelen2003Muscle IO6_r: max_isometric_force=372.1786 optimal_fiber_length=0.103522 tendon_slack_length=0.01150245
        pennation_angle_at_optimal=0
      PathPoint PathPoint_rib11_R: rib11_R (0.0245947 -0.105553 0.126792)
      PathPoint PathPoint_pelvis: pelvis (-0.108487 0.088655 0.0728078)
    Thelen2003Muscle IO1_l: max_isometric_force=404.381 optimal_fiber_length=0.1063355 tendon_slack_length=0.01181506
        pennation_angle_at_optimal=0
      PathPoint PathPoint_Abdomen: Abdomen (0.00303832 -0.0452994 -0.0474048)
      PathPoint PathPoint_pelvis: pelvis (-0.0253885 0.000886696 -0.127924)
    Thelen2003Muscle IO2_l: max_isometric_force=416.2857 optimal_fiber_length=0.1050989 tendon_slack_length=0.01167765
        pennation_angle_at_optimal=0
      PathPoint PathPoint_Abdomen: Abdomen (0.000673617 -0.0128462 -0.053683)
      PathPoint PathPoint_pelvis: pelvis (-0.0342377 0.037246 -0.13274)
    Thelen2003Muscle IO3_l: max_isometric_force=396.595 optimal_fiber_length=0.121178 tendon_slack_length=0.01346423
        pennation_angle_at_optimal=0
      PathPoint PathPoint_Abdomen: Abdomen (0.00334666 0.0326504 -0.0437486)
      PathPoint PathPoint_pelvis: pelvis (-0.0442261 0.0679728 -0.127893)
    Thelen2003Muscle IO4_l: max_isometric_force=480.747 optimal_fiber_length=0.1081466 tendon_slack_length=0.01201629
        pennation_angle_at_optimal=0
      PathPoint PathPoint_rib9_L: rib9_L (0.109432 -0.154343 -0.124967)
      PathPoint PathPoint_pelvis: pelvis (-0.0567971 0.085804 -0.11542)
    Thelen2003Muscle IO5_l: max_isometric_force=421.7764 optimal_fiber_length=0.1097341 tendon_slack_length=0.01219268
        pennation_angle_at_optimal=0
      PathPoint PathPoint_rib10_L: rib10_L (0.0642811 -0.130491 -0.14218)
      PathPoint PathPoint_pelvis: pelvis (-0.0840267 0.0949163 -0.0955304)
    Thelen2003Muscle IO6_l: max_isometric_force=372.1786 optimal_fiber_length=0.103522 tendon_slack_length=0.01150244
        pennation_angle_at_optimal=0
      PathPoint PathPoint_rib11_L: rib11_L (0.0245947 -0.105553 -0.126792)
      PathPoint PathPoint_pelvis: pelvis (-0.108487 0.088655 -0.0728099)
    Thelen2003Muscle LD_L1_r: max_isometric_force=122.7837 optimal_fiber_length=0.3730683
        tendon_slack_length=0.08146111 pennation_angle_at_optimal=0
      PathPoint PathPoint_humerus_R: humerus_R (-0.0105455 -0.0169542 0.00298857)
      ConditionalPathPoint ConditionalPathPoint_rib5_R: rib5_R (0.0342509 -0.0597561 0.132964)
          socket_coordinate=/jointset/L5_S1_IVDjnt/L5_S1_FE range=(-99999.9 99999.9)
      ConditionalPathPoint ConditionalPathPoint_rib6_R: rib6_R (0.0299223 -0.0595068 0.133049)
          socket_coordinate=/jointset/L5_S1_IVDjnt/L5_S1_FE range=(-99999.9 99999.9)
      ConditionalPathPoint ConditionalPathPoint_rib7_R: rib7_R (0.0236927 -0.0587854 0.128194)
          socket_coordinate=/jointset/L5_S1_IVDjnt/L5_S1_FE range=(-99999.9 99999.9)
      ConditionalPathPoint ConditionalPathPoint_rib8_R: rib8_R (0.0108982 -0.0594562 0.123554)
          socket_coordinate=/jointset/L5_S1_IVDjnt/L5_S1_FE range=(-99999.9 99999.9)
      ConditionalPathPoint ConditionalPathPoint_rib9_R: rib9_R (-0.00262294 -0.0596868 0.114894)
          socket_coordinate=/jointset/L5_S1_IVDjnt/L5_S1_FE range=(-99999.9 99999.9)
      ConditionalPathPoint ConditionalPathPoint_rib10_R: rib10_R (-0.0160061 -0.0571733 0.102348)
          socket_coordinate=/jointset/L5_S1_IVDjnt/L5_S1_FE range=(-99999.9 99999.9)
      ConditionalPathPoint ConditionalPathPoint_rib11_R: rib11_R (-0.026868 -0.0413248 0.0750843)
          socket_coordinate=/jointset/L5_S1_IVDjnt/L5_S1_FE range=(-99999.9 99999.9)
      ConditionalPathPoint ConditionalPathPoint_rib12_R: rib12_R (-0.0250131 -0.0292073 0.0416787)
          socket_coordinate=/jointset/L5_S1_IVDjnt/L5_S1_FE range=(-99999.9 99999.9)
      PathPoint PathPoint_lumbar1: lumbar1 (-0.0418713 0.0108648 0.00452487)
    Thelen2003Muscle LD_L2_r: max_isometric_force=114.8253 optimal_fiber_length=0.4042499
        tendon_slack_length=0.08826975 pennation_angle_at_optimal=0
      PathPoint PathPoint_humerus_R: humerus_R (-0.0105484 -0.0169508 0.00299002)
      ConditionalPathPoint ConditionalPathPoint_rib5_R: rib5_R (0.037047 -0.0615325 0.133825)
          socket_coordinate=/jointset/L5_S1_IVDjnt/L5_S1_FE range=(-99999.9 99999.9)
      ConditionalPathPoint ConditionalPathPoint_rib6_R: rib6_R (0.0341259 -0.0622678 0.134804)
          socket_coordinate=/jointset/L5_S1_IVDjnt/L5_S1_FE range=(-99999.9 99999.9)
      ConditionalPathPoint ConditionalPathPoint_rib7_R: rib7_R (0.0292654 -0.062654 0.131201)
          socket_coordinate=/jointset/L5_S1_IVDjnt/L5_S1_FE range=(-99999.9 99999.9)
      ConditionalPathPoint ConditionalPathPoint_rib8_R: rib8_R (0.0177121 -0.0647191 0.128282)
          socket_coordinate=/jointset/L5_S1_IVDjnt/L5_S1_FE range=(-99999.9 99999.9)
      ConditionalPathPoint ConditionalPathPoint_rib9_R: rib9_R (0.00513085 -0.0663348 0.121428)
          socket_coordinate=/jointset/L5_S1_IVDjnt/L5_S1_FE range=(-99999.9 99999.9)
      ConditionalPathPoint ConditionalPathPoint_rib10_R: rib10_R (-0.00753723 -0.0657205 0.110525)
          socket_coordinate=/jointset/L5_S1_IVDjnt/L5_S1_FE range=(-99999.9 99999.9)
      ConditionalPathPoint ConditionalPathPoint_rib11_R: rib11_R (-0.0192792 -0.0535677 0.086489)
          socket_coordinate=/jointset/L5_S1_IVDjnt/L5_S1_FE range=(-99999.9 99999.9)
      ConditionalPathPoint ConditionalPathPoint_rib12_R: rib12_R (-0.0219694 -0.0447281 0.0562274)
          socket_coordinate=/jointset/L5_S1_IVDjnt/L5_S1_FE range=(-99999.9 99999.9)
      PathPoint PathPoint_lumbar2: lumbar2 (-0.0405707 0.00214982 0.00433078)
    Thelen2003Muscle LD_L3_r: max_isometric_force=141.9602 optimal_fiber_length=0.4291877
        tendon_slack_length=0.09371503 pennation_angle_at_optimal=0
      PathPoint PathPoint_humerus_R: humerus_R (-0.0105484 -0.0169508 0.00481293)
      ConditionalPathPoint ConditionalPathPoint_rib5_R: rib5_R (0.0394979 -0.0631 0.134496)
          socket_coordinate=/jointset/L5_S1_IVDjnt/L5_S1_FE range=(-99999.9 99999.9)
      ConditionalPathPoint ConditionalPathPoint_rib6_R: rib6_R (0.0376482 -0.0646084 0.136127)
          socket_coordinate=/jointset/L5_S1_IVDjnt/L5_S1_FE range=(-99999.9 99999.9)
      ConditionalPathPoint ConditionalPathPoint_rib7_R: rib7_R (0.0334864 -0.0656086 0.133304)
          socket_coordinate=/jointset/L5_S1_IVDjnt/L5_S1_FE range=(-99999.9 99999.9)
      ConditionalPathPoint ConditionalPathPoint_rib8_R: rib8_R (0.022665 -0.0685233 0.131448)
          socket_coordinate=/jointset/L5_S1_IVDjnt/L5_S1_FE range=(-99999.9 99999.9)
      ConditionalPathPoint ConditionalPathPoint_rib9_R: rib9_R (0.0106928 -0.0709834 0.125697)
          socket_coordinate=/jointset/L5_S1_IVDjnt/L5_S1_FE range=(-99999.9 99999.9)
      ConditionalPathPoint ConditionalPathPoint_rib10_R: rib10_R (-0.00135267 -0.07167 0.115856)
          socket_coordinate=/jointset/L5_S1_IVDjnt/L5_S1_FE range=(-99999.9 99999.9)
      ConditionalPathPoint ConditionalPathPoint_rib11_R: rib11_R (-0.0130472 -0.0620203 0.0936731)
          socket_coordinate=/jointset/L5_S1_IVDjnt/L5_S1_FE range=(-99999.9 99999.9)
      ConditionalPathPoint ConditionalPathPoint_rib12_R: rib12_R (-0.0170652 -0.055639 0.065168)
          socket_coordinate=/jointset/L5_S1_IVDjnt/L5_S1_FE range=(-99999.9 99999.9)
      PathPoint PathPoint_lumbar3: lumbar3 (-0.0400223 0.00486538 0.00403192)
    Thelen2003Muscle LD_L4_r: max_isometric_force=136.8125 optimal_fiber_length=0.4502437 tendon_slack_length=0.0983127
        pennation_angle_at_optimal=0
      PathPoint PathPoint_humerus_R: humerus_R (-0.0105484 -0.0169508 0.00299002)
      ConditionalPathPoint ConditionalPathPoint_rib5_R: rib5_R (0.039845 -0.0633245 0.134581)
          socket_coordinate=/jointset/L5_S1_IVDjnt/L5_S1_FE range=(-99999.9 99999.9)
      ConditionalPathPoint ConditionalPathPoint_rib6_R: rib6_R (0.0387074 -0.0653176 0.136499)
          socket_coordinate=/jointset/L5_S1_IVDjnt/L5_S1_FE range=(-99999.9 99999.9)
      ConditionalPathPoint ConditionalPathPoint_rib7_R: rib7_R (0.0352533 -0.0668535 0.134143)
          socket_coordinate=/jointset/L5_S1_IVDjnt/L5_S1_FE range=(-99999.9 99999.9)
      ConditionalPathPoint ConditionalPathPoint_rib8_R: rib8_R (0.0253285 -0.0705625 0.133061)
          socket_coordinate=/jointset/L5_S1_IVDjnt/L5_S1_FE range=(-99999.9 99999.9)
      ConditionalPathPoint ConditionalPathPoint_rib9_R: rib9_R (0.0141517 -0.0738326 0.128196)
          socket_coordinate=/jointset/L5_S1_IVDjnt/L5_S1_FE range=(-99999.9 99999.9)
      ConditionalPathPoint ConditionalPathPoint_rib10_R: rib10_R (0.00268771 -0.0754588 0.1191)
          socket_coordinate=/jointset/L5_S1_IVDjnt/L5_S1_FE range=(-99999.9 99999.9)
      ConditionalPathPoint ConditionalPathPoint_rib11_R: rib11_R (-0.00867281 -0.0675499 0.0981632)
          socket_coordinate=/jointset/L5_S1_IVDjnt/L5_S1_FE range=(-99999.9 99999.9)
      ConditionalPathPoint ConditionalPathPoint_rib12_R: rib12_R (-0.012947 -0.0633802 0.0712144)
          socket_coordinate=/jointset/L5_S1_IVDjnt/L5_S1_FE range=(-99999.9 99999.9)
      PathPoint PathPoint_lumbar4: lumbar4 (-0.0420218 0.00446622 0.00482906)
    Thelen2003Muscle LD_L5_r: max_isometric_force=138.1162 optimal_fiber_length=0.4791067
        tendon_slack_length=0.09838799 pennation_angle_at_optimal=0
      PathPoint PathPoint_humerus_R: humerus_R (-0.0105484 -0.0169508 0.00299002)
      ConditionalPathPoint ConditionalPathPoint_rib5_R: rib5_R (0.0401995 -0.0635502 0.134674)
          socket_coordinate=/jointset/L5_S1_IVDjnt/L5_S1_FE range=(-99999.9 99999.9)
      ConditionalPathPoint ConditionalPathPoint_rib6_R: rib6_R (0.0390612 -0.0655553 0.136623)
          socket_coordinate=/jointset/L5_S1_IVDjnt/L5_S1_FE range=(-99999.9 99999.9)
      ConditionalPathPoint ConditionalPathPoint_rib7_R: rib7_R (0.0356091 -0.0671026 0.134311)
          socket_coordinate=/jointset/L5_S1_IVDjnt/L5_S1_FE range=(-99999.9 99999.9)
      ConditionalPathPoint ConditionalPathPoint_rib8_R: rib8_R (0.0259977 -0.0710735 0.13346)
          socket_coordinate=/jointset/L5_S1_IVDjnt/L5_S1_FE range=(-99999.9 99999.9)
      ConditionalPathPoint ConditionalPathPoint_rib9_R: rib9_R (0.0151005 -0.0746107 0.12886)
          socket_coordinate=/jointset/L5_S1_IVDjnt/L5_S1_FE range=(-99999.9 99999.9)
      ConditionalPathPoint ConditionalPathPoint_rib10_R: rib10_R (0.00414301 -0.07681 0.12022)
          socket_coordinate=/jointset/L5_S1_IVDjnt/L5_S1_FE range=(-99999.9 99999.9)
      ConditionalPathPoint ConditionalPathPoint_rib11_R: rib11_R (-0.00700636 -0.0695969 0.0997923)
          socket_coordinate=/jointset/L5_S1_IVDjnt/L5_S1_FE range=(-99999.9 99999.9)
      ConditionalPathPoint ConditionalPathPoint_rib12_R: rib12_R (-0.0111587 -0.0665923 0.0736856)
          socket_coordinate=/jointset/L5_S1_IVDjnt/L5_S1_FE range=(-99999.9 99999.9)
      PathPoint PathPoint_lumbar5: lumbar5 (-0.0384039 0.00579551 0.00429412)
    Thelen2003Muscle LD_T12_r: max_isometric_force=72.94537 optimal_fiber_length=0.3541307
        tendon_slack_length=0.07272327 pennation_angle_at_optimal=0
      PathPoint PathPoint_humerus_R: humerus_R (-0.0105484 -0.0169508 0.00299002)
      ConditionalPathPoint ConditionalPathPoint_rib6_R: rib6_R (0.0285288 -0.0585978 0.132424)
          socket_coordinate=/jointset/L5_S1_IVDjnt/L5_S1_FE range=(-99999.9 99999.9)
      ConditionalPathPoint ConditionalPathPoint_rib7_R: rib7_R (0.0219671 -0.0575942 0.127206)
          socket_coordinate=/jointset/L5_S1_IVDjnt/L5_S1_FE range=(-99999.9 99999.9)
      ConditionalPathPoint ConditionalPathPoint_rib8_R: rib8_R (0.00866965 -0.0577222 0.12191)
          socket_coordinate=/jointset/L5_S1_IVDjnt/L5_S1_FE range=(-99999.9 99999.9)
      ConditionalPathPoint ConditionalPathPoint_rib9_R: rib9_R (-0.00520883 -0.0574152 0.112546)
          socket_coordinate=/jointset/L5_S1_IVDjnt/L5_S1_FE range=(-99999.9 99999.9)
      ConditionalPathPoint ConditionalPathPoint_rib10_R: rib10_R (-0.0189706 -0.0540298 0.0991811)
          socket_coordinate=/jointset/L5_S1_IVDjnt/L5_S1_FE range=(-99999.9 99999.9)
      ConditionalPathPoint ConditionalPathPoint_rib11_R: rib11_R (-0.0294978 -0.0356737 0.0692116)
          socket_coordinate=/jointset/L5_S1_IVDjnt/L5_S1_FE range=(-99999.9 99999.9)
      ConditionalPathPoint ConditionalPathPoint_rib12_R: rib12_R (-0.0228649 -0.0211761 0.0324192)
          socket_coordinate=/jointset/L5_S1_IVDjnt/L5_S1_FE range=(-99999.9 99999.9)
      PathPoint PathPoint_thoracic12: thoracic12 (-0.0458267 0.0124383 0.00501354)
    Thelen2003Muscle LD_T11_r: max_isometric_force=85.4572 optimal_fiber_length=0.32909 tendon_slack_length=0.06758099
        pennation_angle_at_optimal=0
      PathPoint PathPoint_humerus_R: humerus_R (-0.0105484 -0.0169508 0.00299002)
      ConditionalPathPoint ConditionalPathPoint_rib6_R: rib6_R (0.0233536 -0.0552481 0.12994)
          socket_coordinate=/jointset/L5_S1_IVDjnt/L5_S1_FE range=(-99999.9 99999.9)
      ConditionalPathPoint ConditionalPathPoint_rib7_R: rib7_R (0.0151706 -0.0529156 0.123064)
          socket_coordinate=/jointset/L5_S1_IVDjnt/L5_S1_FE range=(-99999.9 99999.9)
      ConditionalPathPoint ConditionalPathPoint_rib8_R: rib8_R (0.000933534 -0.0516315 0.115796)
          socket_coordinate=/jointset/L5_S1_IVDjnt/L5_S1_FE range=(-99999.9 99999.9)
      ConditionalPathPoint ConditionalPathPoint_rib9_R: rib9_R (-0.0141382 -0.0492728 0.103631)
          socket_coordinate=/jointset/L5_S1_IVDjnt/L5_S1_FE range=(-99999.9 99999.9)
      ConditionalPathPoint ConditionalPathPoint_rib10_R: rib10_R (-0.0283507 -0.0432077 0.0875488)
          socket_coordinate=/jointset/L5_S1_IVDjnt/L5_S1_FE range=(-99999.9 99999.9)
      ConditionalPathPoint ConditionalPathPoint_rib11_R: rib11_R (-0.0308274 -0.0200876 0.0488836)
          socket_coordinate=/jointset/L5_S1_IVDjnt/L5_S1_FE range=(-99999.9 99999.9)
      PathPoint PathPoint_thoracic11: thoracic11 (-0.0462137 0.0124556 0.00397321)
    Thelen2003Muscle LD_T10_r: max_isometric_force=87.57785 optimal_fiber_length=0.3232647
        tendon_slack_length=0.05057883 pennation_angle_at_optimal=0
      PathPoint PathPoint_humerus_R: humerus_R (-0.0105484 -0.0169508 0.00299002)
      ConditionalPathPoint ConditionalPathPoint_rib6_R: rib6_R (0.0179212 -0.0517702 0.12702)
          socket_coordinate=/jointset/L5_S1_IVDjnt/L5_S1_FE range=(-99999.9 99999.9)
      ConditionalPathPoint ConditionalPathPoint_rib7_R: rib7_R (0.00826208 -0.0481657 0.118412)
          socket_coordinate=/jointset/L5_S1_IVDjnt/L5_S1_FE range=(-99999.9 99999.9)
      ConditionalPathPoint ConditionalPathPoint_rib8_R: rib8_R (-0.00721212 -0.0450442 0.108554)
          socket_coordinate=/jointset/L5_S1_IVDjnt/L5_S1_FE range=(-99999.9 99999.9)
      ConditionalPathPoint ConditionalPathPoint_rib9_R: rib9_R (-0.0228641 -0.0406175 0.0932416)
          socket_coordinate=/jointset/L5_S1_IVDjnt/L5_S1_FE range=(-99999.9 99999.9)
      ConditionalPathPoint ConditionalPathPoint_rib10_R: rib10_R (-0.0369659 -0.0302581 0.0716871)
          socket_coordinate=/jointset/L5_S1_IVDjnt/L5_S1_FE range=(-99999.9 99999.9)
      PathPoint PathPoint_thoracic10: thoracic10 (-0.042782 0.0135514 0.00440046)
    Thelen2003Muscle LD_T9_r: max_isometric_force=55.17785 optimal_fiber_length=0.2823283
        tendon_slack_length=0.04417381 pennation_angle_at_optimal=0
      PathPoint PathPoint_humerus_R: humerus_R (-0.0105484 -0.0169508 0.00299002)
      ConditionalPathPoint ConditionalPathPoint_rib6_R: rib6_R (0.00872776 -0.0459338 0.121337)
          socket_coordinate=/jointset/L5_S1_IVDjnt/L5_S1_FE range=(-99999.9 99999.9)
      ConditionalPathPoint ConditionalPathPoint_rib7_R: rib7_R (-0.00317114 -0.0402361 0.109554)
          socket_coordinate=/jointset/L5_S1_IVDjnt/L5_S1_FE range=(-99999.9 99999.9)
      ConditionalPathPoint ConditionalPathPoint_rib8_R: rib8_R (-0.0203594 -0.0336734 0.0943482)
          socket_coordinate=/jointset/L5_S1_IVDjnt/L5_S1_FE range=(-99999.9 99999.9)
      PathPoint PathPoint_thoracic9: thoracic9 (-0.0466018 0.0204178 0.00468376)
    Thelen2003Muscle LD_T8_r: max_isometric_force=55.40895 optimal_fiber_length=0.2615537
        tendon_slack_length=0.05371192 pennation_angle_at_optimal=0
      PathPoint PathPoint_humerus_R: humerus_R (-0.0105484 -0.0169508 0.00299002)
      ConditionalPathPoint ConditionalPathPoint_rib6_R: rib6_R (0.00245456 -0.0419634 0.116868)
          socket_coordinate=/jointset/L5_S1_IVDjnt/L5_S1_FE range=(-99999.9 99999.9)
      ConditionalPathPoint ConditionalPathPoint_rib7_R: rib7_R (-0.0104862 -0.0350331 0.102934)
          socket_coordinate=/jointset/L5_S1_IVDjnt/L5_S1_FE range=(-99999.9 99999.9)
      ConditionalPathPoint ConditionalPathPoint_rib8_R: rib8_R (-0.0281901 -0.025902 0.0830959)
          socket_coordinate=/jointset/L5_S1_IVDjnt/L5_S1_FE range=(-99999.9 99999.9)
      PathPoint PathPoint_thoracic8: thoracic8 (-0.0464335 0.0141496 0.00491232)
    Thelen2003Muscle LD_T7_r: max_isometric_force=50.35669 optimal_fiber_length=0.2447376
        tendon_slack_length=0.05025861 pennation_angle_at_optimal=0
      PathPoint PathPoint_humerus_R: humerus_R (-0.0105484 -0.0169508 0.00299002)
      ConditionalPathPoint ConditionalPathPoint_rib6_R: rib6_R (-0.00637104 -0.0363323 0.109647)
          socket_coordinate=/jointset/L5_S1_IVDjnt/L5_S1_FE range=(-99999.9 99999.9)
      ConditionalPathPoint ConditionalPathPoint_rib7_R: rib7_R (-0.0213591 -0.0268271 0.0909558)
          socket_coordinate=/jointset/L5_S1_IVDjnt/L5_S1_FE range=(-99999.9 99999.9)
      PathPoint PathPoint_thoracic7: thoracic7 (-0.0551372 0.00906258 0.00468042)
    Thelen2003Muscle LD_R12_r: max_isometric_force=58.26884 optimal_fiber_length=0.3095408
        tendon_slack_length=0.06356642 pennation_angle_at_optimal=0
      PathPoint PathPoint_humerus_R: humerus_R (-0.0105484 -0.0169508 0.00299002)
      ConditionalPathPoint ConditionalPathPoint_rib5_R: rib5_R (0.0359962 -0.0608641 0.133513)
          socket_coordinate=/jointset/L5_S1_IVDjnt/L5_S1_FE range=(-99999.9 99999.9)
      ConditionalPathPoint ConditionalPathPoint_rib6_R: rib6_R (0.0327214 -0.0613408 0.134239)
          socket_coordinate=/jointset/L5_S1_IVDjnt/L5_S1_FE range=(-99999.9 99999.9)
      ConditionalPathPoint ConditionalPathPoint_rib7_R: rib7_R (0.0271689 -0.0611933 0.130104)
          socket_coordinate=/jointset/L5_S1_IVDjnt/L5_S1_FE range=(-99999.9 99999.9)
      ConditionalPathPoint ConditionalPathPoint_rib8_R: rib8_R (0.0150981 -0.0627048 0.126522)
          socket_coordinate=/jointset/L5_S1_IVDjnt/L5_S1_FE range=(-99999.9 99999.9)
      ConditionalPathPoint ConditionalPathPoint_rib9_R: rib9_R (0.00210599 -0.0637647 0.118967)
          socket_coordinate=/jointset/L5_S1_IVDjnt/L5_S1_FE range=(-99999.9 99999.9)
      ConditionalPathPoint ConditionalPathPoint_rib10_R: rib10_R (-0.0110657 -0.0622259 0.107256)
          socket_coordinate=/jointset/L5_S1_IVDjnt/L5_S1_FE range=(-99999.9 99999.9)
      ConditionalPathPoint ConditionalPathPoint_rib11_R: rib11_R (-0.0237873 -0.0467146 0.0802878)
          socket_coordinate=/jointset/L5_S1_IVDjnt/L5_S1_FE range=(-99999.9 99999.9)
      PathPoint PathPoint_rib12_R: rib12_R (-0.0248418 -0.0274642 0.0398061)
    Thelen2003Muscle LD_R11_r: max_isometric_force=86.0221 optimal_fiber_length=0.2701679 tendon_slack_length=0.0554809
        pennation_angle_at_optimal=0
      PathPoint PathPoint_humerus_R: humerus_R (-0.0105484 -0.0169508 0.00481293)
      ConditionalPathPoint ConditionalPathPoint_rib5_R: rib5_R (0.0314687 -0.0579969 0.132014)
          socket_coordinate=/jointset/L5_S1_IVDjnt/L5_S1_FE range=(-99999.9 99999.9)
      ConditionalPathPoint ConditionalPathPoint_rib6_R: rib6_R (0.0257562 -0.0567996 0.131127)
          socket_coordinate=/jointset/L5_S1_IVDjnt/L5_S1_FE range=(-99999.9 99999.9)
      ConditionalPathPoint ConditionalPathPoint_rib7_R: rib7_R (0.0185469 -0.0552375 0.125174)
          socket_coordinate=/jointset/L5_S1_IVDjnt/L5_S1_FE range=(-99999.9 99999.9)
      ConditionalPathPoint ConditionalPathPoint_rib8_R: rib8_R (0.00522212 -0.0550216 0.119271)
          socket_coordinate=/jointset/L5_S1_IVDjnt/L5_S1_FE range=(-99999.9 99999.9)
      ConditionalPathPoint ConditionalPathPoint_rib9_R: rib9_R (-0.00883712 -0.0541686 0.109086)
          socket_coordinate=/jointset/L5_S1_IVDjnt/L5_S1_FE range=(-99999.9 99999.9)
      ConditionalPathPoint ConditionalPathPoint_rib10_R: rib10_R (-0.0224795 -0.0501667 0.0951649)
          socket_coordinate=/jointset/L5_S1_IVDjnt/L5_S1_FE range=(-99999.9 99999.9)
      PathPoint PathPoint_rib11_R: rib11_R (-0.0317818 -0.0260696 0.0577064)
    Thelen2003Muscle LD_Il_r: max_isometric_force=88.78297 optimal_fiber_length=0.5236133
        tendon_slack_length=0.02263742 pennation_angle_at_optimal=0
      PathPoint PathPoint_humerus_R: humerus_R (-0.0105484 -0.0169508 0.00299002)
      ConditionalPathPoint ConditionalPathPoint_rib5_R: rib5_R (0.0419568 -0.0646806 0.135095)
          socket_coordinate=/jointset/L5_S1_IVDjnt/L5_S1_FE range=(-99999.9 99999.9)
      ConditionalPathPoint ConditionalPathPoint_rib6_R: rib6_R (0.042601 -0.0679469 0.137767)
          socket_coordinate=/jointset/L5_S1_IVDjnt/L5_S1_FE range=(-99999.9 99999.9)
      ConditionalPathPoint ConditionalPathPoint_rib7_R: rib7_R (0.0409258 -0.0708828 0.136655)
          socket_coordinate=/jointset/L5_S1_IVDjnt/L5_S1_FE range=(-99999.9 99999.9)
      ConditionalPathPoint ConditionalPathPoint_rib8_R: rib8_R (0.0333582 -0.0767129 0.13755)
          socket_coordinate=/jointset/L5_S1_IVDjnt/L5_S1_FE range=(-99999.9 99999.9)
      ConditionalPathPoint ConditionalPathPoint_rib9_R: rib9_R (0.0246623 -0.0823637 0.135066)
          socket_coordinate=/jointset/L5_S1_IVDjnt/L5_S1_FE range=(-99999.9 99999.9)
      ConditionalPathPoint ConditionalPathPoint_rib10_R: rib10_R (0.0156153 -0.0872141 0.128354)
          socket_coordinate=/jointset/L5_S1_IVDjnt/L5_S1_FE range=(-99999.9 99999.9)
      ConditionalPathPoint ConditionalPathPoint_rib11_R: rib11_R (0.00534017 -0.0840849 0.110944)
          socket_coordinate=/jointset/L5_S1_IVDjnt/L5_S1_FE range=(-99999.9 99999.9)
      PathPoint PathPoint_pelvis: pelvis (-0.124948 0.0633402 0.0508552)
    Thelen2003Muscle LD_L1_l: max_isometric_force=122.783 optimal_fiber_length=0.3730693 tendon_slack_length=0.08146134
        pennation_angle_at_optimal=0
      PathPoint PathPoint_humerus_L: humerus_L (-0.0105455 -0.0169508 -0.00299002)
      ConditionalPathPoint ConditionalPathPoint_rib5_L: rib5_L (0.0342509 -0.0597561 -0.132964)
          socket_coordinate=/jointset/L5_S1_IVDjnt/L5_S1_FE range=(-99999.9 99999.9)
      ConditionalPathPoint ConditionalPathPoint_rib6_L: rib6_L (0.0299223 -0.0595068 -0.133049)
          socket_coordinate=/jointset/L5_S1_IVDjnt/L5_S1_FE range=(-99999.9 99999.9)
      ConditionalPathPoint ConditionalPathPoint_rib7_L: rib7_L (0.0236927 -0.0587854 -0.128194)
          socket_coordinate=/jointset/L5_S1_IVDjnt/L5_S1_FE range=(-99999.9 99999.9)
      ConditionalPathPoint ConditionalPathPoint_rib8_L: rib8_L (0.0108982 -0.0594562 -0.123554)
          socket_coordinate=/jointset/L5_S1_IVDjnt/L5_S1_FE range=(-99999.9 99999.9)
      ConditionalPathPoint ConditionalPathPoint_rib9_L: rib9_L (-0.00262294 -0.0596868 -0.114894)
          socket_coordinate=/jointset/L5_S1_IVDjnt/L5_S1_FE range=(-99999.9 99999.9)
      ConditionalPathPoint ConditionalPathPoint_rib10_L: rib10_L (-0.0160061 -0.0571733 -0.102348)
          socket_coordinate=/jointset/L5_S1_IVDjnt/L5_S1_FE range=(-99999.9 99999.9)
      ConditionalPathPoint ConditionalPathPoint_rib11_L: rib11_L (-0.026868 -0.0413248 -0.0750843)
          socket_coordinate=/jointset/L5_S1_IVDjnt/L5_S1_FE range=(-99999.9 99999.9)
      ConditionalPathPoint ConditionalPathPoint_rib12_L: rib12_L (-0.0250131 -0.0292073 -0.0416787)
          socket_coordinate=/jointset/L5_S1_IVDjnt/L5_S1_FE range=(-99999.9 99999.9)
      PathPoint PathPoint_lumbar1: lumbar1 (-0.0418703 0.0108681 -0.0045232)
    Thelen2003Muscle LD_L2_l: max_isometric_force=114.825 optimal_fiber_length=0.4042409 tendon_slack_length=0.08826779
        pennation_angle_at_optimal=0
      PathPoint PathPoint_humerus_L: humerus_L (-0.0105484 -0.0169508 -0.00299002)
      ConditionalPathPoint ConditionalPathPoint_rib5_L: rib5_L (0.037047 -0.0615325 -0.133825)
          socket_coordinate=/jointset/L5_S1_IVDjnt/L5_S1_FE range=(-99999.9 99999.9)
      ConditionalPathPoint ConditionalPathPoint_rib6_L: rib6_L (0.0341259 -0.0622678 -0.134804)
          socket_coordinate=/jointset/L5_S1_IVDjnt/L5_S1_FE range=(-99999.9 99999.9)
      ConditionalPathPoint ConditionalPathPoint_rib7_L: rib7_L (0.0292654 -0.062654 -0.131201)
          socket_coordinate=/jointset/L5_S1_IVDjnt/L5_S1_FE range=(-99999.9 99999.9)
      ConditionalPathPoint ConditionalPathPoint_rib8_L: rib8_L (0.0177121 -0.0647191 -0.128282)
          socket_coordinate=/jointset/L5_S1_IVDjnt/L5_S1_FE range=(-99999.9 99999.9)
      ConditionalPathPoint ConditionalPathPoint_rib9_L: rib9_L (0.00513085 -0.0663348 -0.121428)
          socket_coordinate=/jointset/L5_S1_IVDjnt/L5_S1_FE range=(-99999.9 99999.9)
      ConditionalPathPoint ConditionalPathPoint_rib10_L: rib10_L (-0.00753723 -0.0657205 -0.110525)
          socket_coordinate=/jointset/L5_S1_IVDjnt/L5_S1_FE range=(-99999.9 99999.9)
      ConditionalPathPoint ConditionalPathPoint_rib11_L: rib11_L (-0.0192792 -0.0535677 -0.086489)
          socket_coordinate=/jointset/L5_S1_IVDjnt/L5_S1_FE range=(-99999.9 99999.9)
      ConditionalPathPoint ConditionalPathPoint_rib12_L: rib12_L (-0.0219694 -0.0447281 -0.0562274)
          socket_coordinate=/jointset/L5_S1_IVDjnt/L5_S1_FE range=(-99999.9 99999.9)
      PathPoint PathPoint_lumbar2: lumbar2 (-0.0405687 0.00215515 -0.00433517)
    Thelen2003Muscle LD_L3_l: max_isometric_force=141.9602 optimal_fiber_length=0.4291839 tendon_slack_length=0.0937142
        pennation_angle_at_optimal=0
      PathPoint PathPoint_humerus_L: humerus_L (-0.0105484 -0.0169508 -0.00481293)
      ConditionalPathPoint ConditionalPathPoint_rib5_L: rib5_L (0.0394979 -0.0631 -0.134496)
          socket_coordinate=/jointset/L5_S1_IVDjnt/L5_S1_FE range=(-99999.9 99999.9)
      ConditionalPathPoint ConditionalPathPoint_rib6_L: rib6_L (0.0376482 -0.0646084 -0.136127)
          socket_coordinate=/jointset/L5_S1_IVDjnt/L5_S1_FE range=(-99999.9 99999.9)
      ConditionalPathPoint ConditionalPathPoint_rib7_L: rib7_L (0.0334864 -0.0656086 -0.133304)
          socket_coordinate=/jointset/L5_S1_IVDjnt/L5_S1_FE range=(-99999.9 99999.9)
      ConditionalPathPoint ConditionalPathPoint_rib8_L: rib8_L (0.022665 -0.0685233 -0.131448)
          socket_coordinate=/jointset/L5_S1_IVDjnt/L5_S1_FE range=(-99999.9 99999.9)
      ConditionalPathPoint ConditionalPathPoint_rib9_L: rib9_L (0.0106928 -0.0709834 -0.125697)
          socket_coordinate=/jointset/L5_S1_IVDjnt/L5_S1_FE range=(-99999.9 99999.9)
      ConditionalPathPoint ConditionalPathPoint_rib10_L: rib10_L (-0.00135267 -0.07167 -0.115856)
          socket_coordinate=/jointset/L5_S1_IVDjnt/L5_S1_FE range=(-99999.9 99999.9)
      ConditionalPathPoint ConditionalPathPoint_rib11_L: rib11_L (-0.0130472 -0.0620203 -0.0936731)
          socket_coordinate=/jointset/L5_S1_IVDjnt/L5_S1_FE range=(-99999.9 99999.9)
      ConditionalPathPoint ConditionalPathPoint_rib12_L: rib12_L (-0.0170652 -0.055639 -0.065168)
          socket_coordinate=/jointset/L5_S1_IVDjnt/L5_S1_FE range=(-99999.9 99999.9)
      PathPoint PathPoint_lumbar3: lumbar3 (-0.0400223 0.00486538 -0.00403223)
    Thelen2003Muscle LD_L4_l: max_isometric_force=136.8122 optimal_fiber_length=0.4502416
        tendon_slack_length=0.09831225 pennation_angle_at_optimal=0
      PathPoint PathPoint_humerus_L: humerus_L (-0.0105484 -0.0169508 -0.00299002)
      ConditionalPathPoint ConditionalPathPoint_rib5_L: rib5_L (0.039845 -0.0633245 -0.134581)
          socket_coordinate=/jointset/L5_S1_IVDjnt/L5_S1_FE range=(-99999.9 99999.9)
      ConditionalPathPoint ConditionalPathPoint_rib6_L: rib6_L (0.0387074 -0.0653176 -0.136499)
          socket_coordinate=/jointset/L5_S1_IVDjnt/L5_S1_FE range=(-99999.9 99999.9)
      ConditionalPathPoint ConditionalPathPoint_rib7_L: rib7_L (0.0352533 -0.0668535 -0.134143)
          socket_coordinate=/jointset/L5_S1_IVDjnt/L5_S1_FE range=(-99999.9 99999.9)
      ConditionalPathPoint ConditionalPathPoint_rib8_L: rib8_L (0.0253285 -0.0705625 -0.133061)
          socket_coordinate=/jointset/L5_S1_IVDjnt/L5_S1_FE range=(-99999.9 99999.9)
      ConditionalPathPoint ConditionalPathPoint_rib9_L: rib9_L (0.0141517 -0.0738326 -0.128196)
          socket_coordinate=/jointset/L5_S1_IVDjnt/L5_S1_FE range=(-99999.9 99999.9)
      ConditionalPathPoint ConditionalPathPoint_rib10_L: rib10_L (0.00268771 -0.0754588 -0.1191)
          socket_coordinate=/jointset/L5_S1_IVDjnt/L5_S1_FE range=(-99999.9 99999.9)
      ConditionalPathPoint ConditionalPathPoint_rib11_L: rib11_L (-0.00867281 -0.0675499 -0.0981632)
          socket_coordinate=/jointset/L5_S1_IVDjnt/L5_S1_FE range=(-99999.9 99999.9)
      ConditionalPathPoint ConditionalPathPoint_rib12_L: rib12_L (-0.012947 -0.0633802 -0.0712144)
          socket_coordinate=/jointset/L5_S1_IVDjnt/L5_S1_FE range=(-99999.9 99999.9)
      PathPoint PathPoint_lumbar4: lumbar4 (-0.0420218 0.00446622 -0.00482614)
    Thelen2003Muscle LD_L5_l: max_isometric_force=138.1162 optimal_fiber_length=0.4791031
        tendon_slack_length=0.09838724 pennation_angle_at_optimal=0
      PathPoint PathPoint_humerus_L: humerus_L (-0.0105484 -0.0169508 -0.00299002)
      ConditionalPathPoint ConditionalPathPoint_rib5_L: rib5_L (0.0401995 -0.0635502 -0.134674)
          socket_coordinate=/jointset/L5_S1_IVDjnt/L5_S1_FE range=(-99999.9 99999.9)
      ConditionalPathPoint ConditionalPathPoint_rib6_L: rib6_L (0.0390612 -0.0655553 -0.136623)
          socket_coordinate=/jointset/L5_S1_IVDjnt/L5_S1_FE range=(-99999.9 99999.9)
      ConditionalPathPoint ConditionalPathPoint_rib7_L: rib7_L (0.0356091 -0.0671026 -0.134311)
          socket_coordinate=/jointset/L5_S1_IVDjnt/L5_S1_FE range=(-99999.9 99999.9)
      ConditionalPathPoint ConditionalPathPoint_rib8_L: rib8_L (0.0259977 -0.0710735 -0.13346)
          socket_coordinate=/jointset/L5_S1_IVDjnt/L5_S1_FE range=(-99999.9 99999.9)
      ConditionalPathPoint ConditionalPathPoint_rib9_L: rib9_L (0.0151005 -0.0746107 -0.12886)
          socket_coordinate=/jointset/L5_S1_IVDjnt/L5_S1_FE range=(-99999.9 99999.9)
      ConditionalPathPoint ConditionalPathPoint_rib10_L: rib10_L (0.00414301 -0.07681 -0.12022)
          socket_coordinate=/jointset/L5_S1_IVDjnt/L5_S1_FE range=(-99999.9 99999.9)
      ConditionalPathPoint ConditionalPathPoint_rib11_L: rib11_L (-0.00700636 -0.0695969 -0.0997923)
          socket_coordinate=/jointset/L5_S1_IVDjnt/L5_S1_FE range=(-99999.9 99999.9)
      ConditionalPathPoint ConditionalPathPoint_rib12_L: rib12_L (-0.0111587 -0.0665923 -0.0736856)
          socket_coordinate=/jointset/L5_S1_IVDjnt/L5_S1_FE range=(-99999.9 99999.9)
      PathPoint PathPoint_lumbar5: lumbar5 (-0.0384039 0.00579551 -0.00429338)
    Thelen2003Muscle LD_T12_l: max_isometric_force=72.94534 optimal_fiber_length=0.3541331
        tendon_slack_length=0.07272377 pennation_angle_at_optimal=0
      PathPoint PathPoint_humerus_L: humerus_L (-0.0105484 -0.0169508 -0.00299002)
      ConditionalPathPoint ConditionalPathPoint_rib6_L: rib6_L (0.0285288 -0.0585978 -0.132424)
          socket_coordinate=/jointset/L5_S1_IVDjnt/L5_S1_FE range=(-99999.9 99999.9)
      ConditionalPathPoint ConditionalPathPoint_rib7_L: rib7_L (0.0219671 -0.0575942 -0.127206)
          socket_coordinate=/jointset/L5_S1_IVDjnt/L5_S1_FE range=(-99999.9 99999.9)
      ConditionalPathPoint ConditionalPathPoint_rib8_L: rib8_L (0.00866965 -0.0577222 -0.12191)
          socket_coordinate=/jointset/L5_S1_IVDjnt/L5_S1_FE range=(-99999.9 99999.9)
      ConditionalPathPoint ConditionalPathPoint_rib9_L: rib9_L (-0.00520883 -0.0574152 -0.112546)
          socket_coordinate=/jointset/L5_S1_IVDjnt/L5_S1_FE range=(-99999.9 99999.9)
      ConditionalPathPoint ConditionalPathPoint_rib10_L: rib10_L (-0.0189706 -0.0540298 -0.0991811)
          socket_coordinate=/jointset/L5_S1_IVDjnt/L5_S1_FE range=(-99999.9 99999.9)
      ConditionalPathPoint ConditionalPathPoint_rib11_L: rib11_L (-0.0294978 -0.0356737 -0.0692116)
          socket_coordinate=/jointset/L5_S1_IVDjnt/L5_S1_FE range=(-99999.9 99999.9)
      ConditionalPathPoint ConditionalPathPoint_rib12_L: rib12_L (-0.0228649 -0.0211761 -0.0324192)
          socket_coordinate=/jointset/L5_S1_IVDjnt/L5_S1_FE range=(-99999.9 99999.9)
      PathPoint PathPoint_thoracic12: thoracic12 (-0.0458267 0.0124383 -0.00500957)
    Thelen2003Muscle LD_T11_l: max_isometric_force=85.45725 optimal_fiber_length=0.3290876
        tendon_slack_length=0.0675805 pennation_angle_at_optimal=0
      PathPoint PathPoint_humerus_L: humerus_L (-0.0105484 -0.0169508 -0.00299002)
      ConditionalPathPoint ConditionalPathPoint_rib6_L: rib6_L (0.0233536 -0.0552481 -0.12994)
          socket_coordinate=/jointset/L5_S1_IVDjnt/L5_S1_FE range=(-99999.9 99999.9)
      ConditionalPathPoint ConditionalPathPoint_rib7_L: rib7_L (0.0151706 -0.0529156 -0.123064)
          socket_coordinate=/jointset/L5_S1_IVDjnt/L5_S1_FE range=(-99999.9 99999.9)
      ConditionalPathPoint ConditionalPathPoint_rib8_L: rib8_L (0.000933534 -0.0516315 -0.115796)
          socket_coordinate=/jointset/L5_S1_IVDjnt/L5_S1_FE range=(-99999.9 99999.9)
      ConditionalPathPoint ConditionalPathPoint_rib9_L: rib9_L (-0.0141382 -0.0492728 -0.103631)
          socket_coordinate=/jointset/L5_S1_IVDjnt/L5_S1_FE range=(-99999.9 99999.9)
      ConditionalPathPoint ConditionalPathPoint_rib10_L: rib10_L (-0.0283507 -0.0432077 -0.0875488)
          socket_coordinate=/jointset/L5_S1_IVDjnt/L5_S1_FE range=(-99999.9 99999.9)
      ConditionalPathPoint ConditionalPathPoint_rib11_L: rib11_L (-0.0308274 -0.0200876 -0.0488836)
          socket_coordinate=/jointset/L5_S1_IVDjnt/L5_S1_FE range=(-99999.9 99999.9)
      PathPoint PathPoint_thoracic11: thoracic11 (-0.0462137 0.0124556 -0.0039754)
    Thelen2003Muscle LD_T10_l: max_isometric_force=87.57788 optimal_fiber_length=0.3232657
        tendon_slack_length=0.05057898 pennation_angle_at_optimal=0
      PathPoint PathPoint_humerus_L: humerus_L (-0.0105484 -0.0169508 -0.00299002)
      ConditionalPathPoint ConditionalPathPoint_rib6_L: rib6_L (0.0179212 -0.0517702 -0.12702)
          socket_coordinate=/jointset/L5_S1_IVDjnt/L5_S1_FE range=(-99999.9 99999.9)
      ConditionalPathPoint ConditionalPathPoint_rib7_L: rib7_L (0.00826208 -0.0481657 -0.118412)
          socket_coordinate=/jointset/L5_S1_IVDjnt/L5_S1_FE range=(-99999.9 99999.9)
      ConditionalPathPoint ConditionalPathPoint_rib8_L: rib8_L (-0.00721212 -0.0450442 -0.108554)
          socket_coordinate=/jointset/L5_S1_IVDjnt/L5_S1_FE range=(-99999.9 99999.9)
      ConditionalPathPoint ConditionalPathPoint_rib9_L: rib9_L (-0.0228641 -0.0406175 -0.0932416)
          socket_coordinate=/jointset/L5_S1_IVDjnt/L5_S1_FE range=(-99999.9 99999.9)
      ConditionalPathPoint ConditionalPathPoint_rib10_L: rib10_L (-0.0369659 -0.0302581 -0.0716871)
          socket_coordinate=/jointset/L5_S1_IVDjnt/L5_S1_FE range=(-99999.9 99999.9)
      PathPoint PathPoint_thoracic10: thoracic10 (-0.042782 0.0135514 -0.00440056)
    Thelen2003Muscle LD_T9_l: max_isometric_force=55.17784 optimal_fiber_length=0.2823275
        tendon_slack_length=0.04417369 pennation_angle_at_optimal=0
      PathPoint PathPoint_humerus_L: humerus_L (-0.0105484 -0.0169508 -0.00299002)
      ConditionalPathPoint ConditionalPathPoint_rib6_L: rib6_L (0.00872776 -0.0459338 -0.121337)
          socket_coordinate=/jointset/L5_S1_IVDjnt/L5_S1_FE range=(-99999.9 99999.9)
      ConditionalPathPoint ConditionalPathPoint_rib7_L: rib7_L (-0.00317114 -0.0402361 -0.109554)
          socket_coordinate=/jointset/L5_S1_IVDjnt/L5_S1_FE range=(-99999.9 99999.9)
      ConditionalPathPoint ConditionalPathPoint_rib8_L: rib8_L (-0.0203594 -0.0336734 -0.0943482)
          socket_coordinate=/jointset/L5_S1_IVDjnt/L5_S1_FE range=(-99999.9 99999.9)
      PathPoint PathPoint_thoracic9: thoracic9 (-0.0466018 0.0204178 -0.00468783)
    Thelen2003Muscle LD_T8_l: max_isometric_force=55.40886 optimal_fiber_length=0.261553 tendon_slack_length=0.05371179
        pennation_angle_at_optimal=0
      PathPoint PathPoint_humerus_L: humerus_L (-0.0105484 -0.0169508 -0.00299002)
      ConditionalPathPoint ConditionalPathPoint_rib6_L: rib6_L (0.00245456 -0.0419634 -0.116868)
          socket_coordinate=/jointset/L5_S1_IVDjnt/L5_S1_FE range=(-99999.9 99999.9)
      ConditionalPathPoint ConditionalPathPoint_rib7_L: rib7_L (-0.0104862 -0.0350331 -0.102934)
          socket_coordinate=/jointset/L5_S1_IVDjnt/L5_S1_FE range=(-99999.9 99999.9)
      ConditionalPathPoint ConditionalPathPoint_rib8_L: rib8_L (-0.0281901 -0.025902 -0.0830959)
          socket_coordinate=/jointset/L5_S1_IVDjnt/L5_S1_FE range=(-99999.9 99999.9)
      PathPoint PathPoint_thoracic8: thoracic8 (-0.0464335 0.0141496 -0.00491765)
    Thelen2003Muscle LD_T7_l: max_isometric_force=50.35663 optimal_fiber_length=0.2447476
        tendon_slack_length=0.05026066 pennation_angle_at_optimal=0
      PathPoint PathPoint_humerus_L: humerus_L (-0.0105484 -0.0169508 -0.00299002)
      ConditionalPathPoint ConditionalPathPoint_rib6_L: rib6_L (-0.00637104 -0.0363323 -0.109647)
          socket_coordinate=/jointset/L5_S1_IVDjnt/L5_S1_FE range=(-99999.9 99999.9)
      ConditionalPathPoint ConditionalPathPoint_rib7_L: rib7_L (-0.0213591 -0.0268271 -0.0909558)
          socket_coordinate=/jointset/L5_S1_IVDjnt/L5_S1_FE range=(-99999.9 99999.9)
      PathPoint PathPoint_thoracic7: thoracic7 (-0.0551372 0.00906258 -0.00467634)
    Thelen2003Muscle LD_R12_l: max_isometric_force=58.26883 optimal_fiber_length=0.3095379
        tendon_slack_length=0.06356581 pennation_angle_at_optimal=0
      PathPoint PathPoint_humerus_L: humerus_L (-0.0105484 -0.0169508 -0.00299002)
      ConditionalPathPoint ConditionalPathPoint_rib5_L: rib5_L (0.0359962 -0.0608641 -0.133513)
          socket_coordinate=/jointset/L5_S1_IVDjnt/L5_S1_FE range=(-99999.9 99999.9)
      ConditionalPathPoint ConditionalPathPoint_rib6_L: rib6_L (0.0327214 -0.0613408 -0.134239)
          socket_coordinate=/jointset/L5_S1_IVDjnt/L5_S1_FE range=(-99999.9 99999.9)
      ConditionalPathPoint ConditionalPathPoint_rib7_L: rib7_L (0.0271689 -0.0611933 -0.130104)
          socket_coordinate=/jointset/L5_S1_IVDjnt/L5_S1_FE range=(-99999.9 99999.9)
      ConditionalPathPoint ConditionalPathPoint_rib8_L: rib8_L (0.0150981 -0.0627048 -0.126522)
          socket_coordinate=/jointset/L5_S1_IVDjnt/L5_S1_FE range=(-99999.9 99999.9)
      ConditionalPathPoint ConditionalPathPoint_rib9_L: rib9_L (0.00210599 -0.0637647 -0.118967)
          socket_coordinate=/jointset/L5_S1_IVDjnt/L5_S1_FE range=(-99999.9 99999.9)
      ConditionalPathPoint ConditionalPathPoint_rib10_L: rib10_L (-0.0110657 -0.0622259 -0.107256)
          socket_coordinate=/jointset/L5_S1_IVDjnt/L5_S1_FE range=(-99999.9 99999.9)
      ConditionalPathPoint ConditionalPathPoint_rib11_L: rib11_L (-0.0237873 -0.0467146 -0.0802878)
          socket_coordinate=/jointset/L5_S1_IVDjnt/L5_S1_FE range=(-99999.9 99999.9)
      PathPoint PathPoint_rib12_L: rib12_L (-0.0248418 -0.0274642 -0.0398061)
    Thelen2003Muscle LD_R11_l: max_isometric_force=86.02212 optimal_fiber_length=0.2701665
        tendon_slack_length=0.05548062 pennation_angle_at_optimal=0
      PathPoint PathPoint_humerus_L: humerus_L (-0.0105484 -0.0169508 -0.00481293)
      ConditionalPathPoint ConditionalPathPoint_rib5_L: rib5_L (0.0314687 -0.0579969 -0.132014)
          socket_coordinate=/jointset/L5_S1_IVDjnt/L5_S1_FE range=(-99999.9 99999.9)
      ConditionalPathPoint ConditionalPathPoint_rib6_L: rib6_L (0.0257562 -0.0567996 -0.131127)
          socket_coordinate=/jointset/L5_S1_IVDjnt/L5_S1_FE range=(-99999.9 99999.9)
      ConditionalPathPoint ConditionalPathPoint_rib7_L: rib7_L (0.0185469 -0.0552375 -0.125174)
          socket_coordinate=/jointset/L5_S1_IVDjnt/L5_S1_FE range=(-99999.9 99999.9)
      ConditionalPathPoint ConditionalPathPoint_rib8_L: rib8_L (0.00522212 -0.0550216 -0.119271)
          socket_coordinate=/jointset/L5_S1_IVDjnt/L5_S1_FE range=(-99999.9 99999.9)
      ConditionalPathPoint ConditionalPathPoint_rib9_L: rib9_L (-0.00883712 -0.0541686 -0.109086)
          socket_coordinate=/jointset/L5_S1_IVDjnt/L5_S1_FE range=(-99999.9 99999.9)
      ConditionalPathPoint ConditionalPathPoint_rib10_L: rib10_L (-0.0224795 -0.0501667 -0.0951649)
          socket_coordinate=/jointset/L5_S1_IVDjnt/L5_S1_FE range=(-99999.9 99999.9)
      PathPoint PathPoint_rib11_L: rib11_L (-0.0317818 -0.0260696 -0.0577064)
    Thelen2003Muscle LD_Il_l: max_isometric_force=88.78291 optimal_fiber_length=0.5236098
        tendon_slack_length=0.02263727 pennation_angle_at_optimal=0
      PathPoint PathPoint_humerus_L: humerus_L (-0.0105484 -0.0169508 -0.00299002)
      ConditionalPathPoint ConditionalPathPoint_rib5_L: rib5_L (0.0419568 -0.0646806 -0.135095)
          socket_coordinate=/jointset/L5_S1_IVDjnt/L5_S1_FE range=(-99999.9 99999.9)
      ConditionalPathPoint ConditionalPathPoint_rib6_L: rib6_L (0.042601 -0.0679469 -0.137767)
          socket_coordinate=/jointset/L5_S1_IVDjnt/L5_S1_FE range=(-99999.9 99999.9)
      ConditionalPathPoint ConditionalPathPoint_rib7_L: rib7_L (0.0409258 -0.0708828 -0.136655)
          socket_coordinate=/jointset/L5_S1_IVDjnt/L5_S1_FE range=(-99999.9 99999.9)
      ConditionalPathPoint ConditionalPathPoint_rib8_L: rib8_L (0.0333582 -0.0767129 -0.13755)
          socket_coordinate=/jointset/L5_S1_IVDjnt/L5_S1_FE range=(-99999.9 99999.9)
      ConditionalPathPoint ConditionalPathPoint_rib9_L: rib9_L (0.0246623 -0.0823637 -0.135066)
          socket_coordinate=/jointset/L5_S1_IVDjnt/L5_S1_FE range=(-99999.9 99999.9)
      ConditionalPathPoint ConditionalPathPoint_rib10_L: rib10_L (0.0156153 -0.0872141 -0.128354)
          socket_coordinate=/jointset/L5_S1_IVDjnt/L5_S1_FE range=(-99999.9 99999.9)
      ConditionalPathPoint ConditionalPathPoint_rib11_L: rib11_L (0.00534017 -0.0840849 -0.110944)
          socket_coordinate=/jointset/L5_S1_IVDjnt/L5_S1_FE range=(-99999.9 99999.9)
      PathPoint PathPoint_pelvis: pelvis (-0.124948 0.0633402 -0.050852)
    Thelen2003Muscle stern_mast: max_isometric_force=275.8 optimal_fiber_length=0.1190478
        tendon_slack_length=0.06186409 pennation_angle_at_optimal=0.2618
      PathPoint P1: sternum (0 0 0)
      PathPoint P2: head_neck (0.0163789 0.139069 0.067169)
    Thelen2003Muscle cleid_mast: max_isometric_force=137.9 optimal_fiber_length=0.1192638
        tendon_slack_length=0.03886897 pennation_angle_at_optimal=0.2618
      PathPoint P1: clavicle_R (0.00384059 0.00603873 0.0367706)
      PathPoint P2: head_neck (0.0163789 0.139069 0.067169)
    Thelen2003Muscle cleid_occ: max_isometric_force=137.9 optimal_fiber_length=0.1183274 tendon_slack_length=0.07610974
        pennation_angle_at_optimal=0.2618
      PathPoint P1: clavicle_R (0.00384059 0.00603873 0.0367706)
      PathPoint P2: head_neck (-0.0132174 0.156974 0.0693627)
    Thelen2003Muscle scalenus_ant: max_isometric_force=205.8 optimal_fiber_length=0.04613104
        tendon_slack_length=0.05867539 pennation_angle_at_optimal=0.17453
      PathPoint P1: rib1_R (0.0481139 -0.0493685 0.0403635)
      PathPoint P2: head_neck (0.0183685 0.068426 0.0242665)
    Thelen2003Muscle scalenus_med: max_isometric_force=288.4 optimal_fiber_length=0.05487756
        tendon_slack_length=0.06750818 pennation_angle_at_optimal=0.17453
      PathPoint P1: rib1_R (0.0133697 -0.0340831 0.0647772)
      PathPoint P2: head_neck (0.00496604 0.0877121 0.0221355)
    Thelen2003Muscle scalenus_post: max_isometric_force=219.8 optimal_fiber_length=0.06850325
        tendon_slack_length=0.0804858 pennation_angle_at_optimal=0.17453
      PathPoint P1: rib2_R (0.0196611 -0.0395459 0.0963731)
      PathPoint P2: head_neck (0.00476807 0.0535408 0.0268467)
    Thelen2003Muscle long_col_c1thx: max_isometric_force=38.28 optimal_fiber_length=0.1027466
        tendon_slack_length=0.1008895 pennation_angle_at_optimal=0.087266
      PathPoint P1: thoracic3 (0.0182586 0.0103537 0.00386509)
      PathPoint P2: head_neck (0.0229643 0.00122557 0.00417848)
      PathPoint P3: head_neck (0.026703 0.020896 0.00419937)
      PathPoint P4: head_neck (0.0299892 0.040806 0.00407401)
      PathPoint P5: head_neck (0.0331369 0.063312 0.00395911)
      PathPoint P6: head_neck (0.0357897 0.0835005 0.0038442)
      PathPoint P7: head_neck (0.0347207 0.105773 0.00371884)
      PathPoint P8: head_neck (0.0361758 0.120095 0.00323832)
    Thelen2003Muscle long_col_c5thx: max_isometric_force=38.28 optimal_fiber_length=0.06771444
        tendon_slack_length=0.06443809 pennation_angle_at_optimal=0.087266
      PathPoint P1: thoracic3 (0.0175964 0.00942666 0.00710341)
      PathPoint P2: thoracic2 (0.0163076 0.00353931 0.010676)
      PathPoint P3: thoracic2 (0.0166076 0.021137 0.0139666)
      PathPoint P4: thoracic1 (0.0130867 0.00627127 0.0157529)
      PathPoint P5: thoracic1 (0.00798951 0.0235498 0.0185733)
      PathPoint P6: head_neck (0.0109971 0.00814449 0.020673)
      PathPoint P7: head_neck (0.0133104 0.0262663 0.0231488)
      PathPoint P8: head_neck (0.0145576 0.0481706 0.0248619)
    Thelen2003Muscle trap_cl: max_isometric_force=212.9959 optimal_fiber_length=0.09106674
        tendon_slack_length=0.1292497 pennation_angle_at_optimal=0.5236
      PathPoint P1: clavicle_R (-0.0473025 0.0258483 0.0792559)
      PathPoint P2: head_neck (-0.0728223 0.160361 -0.00227007)
    Thelen2003Muscle trap_acr_scap: max_isometric_force=258.6624 optimal_fiber_length=0.1294915
        tendon_slack_length=0.04785098 pennation_angle_at_optimal=0
      PathPoint trap_acr-P1: scapula_R (-0.0369177 2.03037e-7 -0.0247089)
      PathPoint trap_acr-P2: head_neck (-0.0472155 0.021169 0)
    Thelen2003Muscle trap_acr_T1: max_isometric_force=258.6624 optimal_fiber_length=0.1247723
        tendon_slack_length=0.04603452 pennation_angle_at_optimal=0
      PathPoint PathPoint_scapula_R: scapula_R (-0.0369177 2.03037e-7 -0.0247089)
      ConditionalPathPoint default: scapula_R (-0.0579122 0.0167125 -0.100966)
          socket_coordinate=/jointset/Abdjnt/Abs_FE range=(-1.57 1.57)
      PathPoint PathPoint_thoracic1: thoracic1 (-0.0346445 -0.0192579 0)
    Thelen2003Muscle trap_acr_T2: max_isometric_force=258.6624 optimal_fiber_length=0.130107
        tendon_slack_length=0.04807842 pennation_angle_at_optimal=0
      PathPoint PathPoint_scapula_R: scapula_R (-0.0369177 2.03037e-7 -0.0247089)
      ConditionalPathPoint default: scapula_R (-0.0727599 0.0144842 -0.109324)
          socket_coordinate=/jointset/Abdjnt/Abs_FE range=(-1.57 1.57)
      PathPoint PathPoint_thoracic2: thoracic2 (-0.0356343 -0.0203804 0)
    Thelen2003Muscle trap_acr_T3: max_isometric_force=258.6624 optimal_fiber_length=0.1378423
        tendon_slack_length=0.05095337 pennation_angle_at_optimal=0
      PathPoint PathPoint_scapula_R: scapula_R (-0.0369177 2.03037e-7 -0.0247089)
      ConditionalPathPoint default: scapula_R (-0.0826583 0.00222849 -0.115591)
          socket_coordinate=/jointset/Abdjnt/Abs_FE range=(-1.57 1.57)
      PathPoint PathPoint_thoracic3: thoracic3 (-0.0395937 -0.0210348 0)
    Thelen2003Muscle trap_inf_T4: max_isometric_force=115.9774 optimal_fiber_length=0.1100271
        tendon_slack_length=0.01967965 pennation_angle_at_optimal=0
      PathPoint PathPoint_thoracic4: thoracic4 (-0.0415734 -0.0203956 0)
      ConditionalPathPoint default: scapula_R (-0.0955262 -0.0211688 -0.121337)
          socket_coordinate=/jointset/Abdjnt/Abs_FE range=(-1.57 1.57)
      PathPoint PathPoint_scapula_R: scapula_R (-0.0876076 -0.00668462 -0.0800738)
    Thelen2003Muscle trap_inf_T5: max_isometric_force=115.9774 optimal_fiber_length=0.1275383
        tendon_slack_length=0.02284439 pennation_angle_at_optimal=0
      PathPoint PathPoint_thoracic5: thoracic5 (-0.0425632 -0.0185489 0)
      ConditionalPathPoint default: scapula_R (-0.100476 -0.0311962 -0.123948)
          socket_coordinate=/jointset/Abdjnt/Abs_FE range=(-1.57 1.57)
      PathPoint PathPoint_scapula_R: scapula_R (-0.0876076 -0.00668462 -0.0800738)
    Thelen2003Muscle trap_inf_T6: max_isometric_force=135.1934 optimal_fiber_length=0.1454263
        tendon_slack_length=0.02607244 pennation_angle_at_optimal=0
      PathPoint PathPoint_thoracic6: thoracic6 (-0.0465226 -0.0169568 0)
      ConditionalPathPoint default: scapula_R (-0.101466 -0.0445661 -0.123948)
          socket_coordinate=/jointset/Abdjnt/Abs_FE range=(-1.57 1.57)
      PathPoint PathPoint_scapula_R: scapula_R (-0.0876076 -0.00668462 -0.0800738)
    Thelen2003Muscle trap_inf_T7: max_isometric_force=132.2957 optimal_fiber_length=0.1673636
        tendon_slack_length=0.02987399 pennation_angle_at_optimal=0
      PathPoint PathPoint_thoracic7: thoracic7 (-0.0465226 -0.0167534 0)
      ConditionalPathPoint default: scapula_R (-0.105425 -0.0579359 -0.123948)
          socket_coordinate=/jointset/Abdjnt/Abs_FE range=(-1.57 1.57)
      PathPoint PathPoint_scapula_R: scapula_R (-0.0876076 -0.00668462 -0.0800738)
    Thelen2003Muscle trap_inf_T8: max_isometric_force=123.5146 optimal_fiber_length=0.1850323
        tendon_slack_length=0.03312307 pennation_angle_at_optimal=0
      PathPoint PathPoint_thoracic8: thoracic8 (-0.0425632 -0.0122632 0)
      ConditionalPathPoint default: scapula_R (-0.110374 -0.0779907 -0.123948)
          socket_coordinate=/jointset/Abdjnt/Abs_FE range=(-1.57 1.57)
      PathPoint PathPoint_scapula_R: scapula_R (-0.0876076 -0.00668462 -0.0800738)
    Thelen2003Muscle trap_inf_T9: max_isometric_force=113.2336 optimal_fiber_length=0.2012354
        tendon_slack_length=0.03597948 pennation_angle_at_optimal=0
      PathPoint PathPoint_thoracic9: thoracic9 (-0.0455327 -0.00224446 0)
      ConditionalPathPoint default: scapula_R (-0.116281 -0.0969314 -0.123028)
          socket_coordinate=/jointset/Abdjnt/Abs_FE range=(-1.57 1.57)
      PathPoint PathPoint_scapula_R: scapula_R (-0.0876076 -0.00668462 -0.0800738)
    Thelen2003Muscle trap_inf_T10: max_isometric_force=105.4512 optimal_fiber_length=0.2316858
        tendon_slack_length=0.04149084 pennation_angle_at_optimal=0
      PathPoint PathPoint_thoracic10: thoracic10 (-0.0465226 -0.00567288 0)
      ConditionalPathPoint default: rib8_R (-0.0460309 -0.00683785 0.0254685) socket_coordinate=/jointset/Abdjnt/Abs_FE
          range=(-1.57 1.57)
      ConditionalPathPoint default_0: scapula_R (-0.115689 -0.111415 -0.118829)
          socket_coordinate=/jointset/Abdjnt/Abs_FE range=(-1.57 1.57)
      PathPoint PathPoint_scapula_R: scapula_R (-0.0876076 -0.00668462 -0.0800738)
    Thelen2003Muscle trap_inf_T11: max_isometric_force=101.1725 optimal_fiber_length=0.262265
        tendon_slack_length=0.0468905 pennation_angle_at_optimal=0
      PathPoint PathPoint_thoracic11: thoracic11 (-0.0494921 -0.00231861 0)
      ConditionalPathPoint default: rib9_R (-0.0488678 -0.00934257 0.0248017) socket_coordinate=/jointset/Abdjnt/Abs_FE
          range=(-1.57 1.57)
      ConditionalPathPoint default_0: rib8_R (-0.0499949 -0.00811014 0.0372971)
          socket_coordinate=/jointset/Abdjnt/Abs_FE range=(-1.57 1.57)
      ConditionalPathPoint default_1: scapula_R (-0.115132 -0.124786 -0.114193)
          socket_coordinate=/jointset/Abdjnt/Abs_FE range=(-1.57 1.57)
      PathPoint PathPoint_scapula_R: scapula_R (-0.0876076 -0.00668462 -0.0800738)
    Thelen2003Muscle trap_inf_T12: max_isometric_force=100.9804 optimal_fiber_length=0.2960286
        tendon_slack_length=0.05292002 pennation_angle_at_optimal=0
      PathPoint PathPoint_thoracic12: thoracic12 (-0.0494921 0 0)
      ConditionalPathPoint default: rib10_R (-0.0481679 -0.0110737 0.0285724) socket_coordinate=/jointset/Abdjnt/Abs_FE
          range=(-1.57 1.57)
      ConditionalPathPoint default_0: rib9_R (-0.0506882 -0.0140877 0.0371928)
          socket_coordinate=/jointset/Abdjnt/Abs_FE range=(-1.57 1.57)
      ConditionalPathPoint default_1: rib8_R (-0.0500473 -0.0159237 0.0497193)
          socket_coordinate=/jointset/Abdjnt/Abs_FE range=(-1.57 1.57)
      ConditionalPathPoint default_2: scapula_R (-0.11475 -0.133699 -0.107886)
          socket_coordinate=/jointset/Abdjnt/Abs_FE range=(-1.57 1.57)
      PathPoint PathPoint_scapula_R: scapula_R (-0.0876076 -0.00668462 -0.0800738)
    Thelen2003Muscle splen_cap_skl_T1: max_isometric_force=99.02 optimal_fiber_length=0.1562323
        tendon_slack_length=0.04609944 pennation_angle_at_optimal=0
      PathPoint splen_cap_sklthx-P1: thoracic1 (-0.0346445 -0.0192579 0)
      PathPoint splen_cap_sklthx-P2: head_neck (-0.0183249 0.143604 0.0566497)
    Thelen2003Muscle splen_cap_skl_T2: max_isometric_force=99.02 optimal_fiber_length=0.141262
        tendon_slack_length=0.04157506 pennation_angle_at_optimal=0
      PathPoint PathPoint_thoracic2: thoracic2 (-0.0371191 -0.0206351 0)
      PathPoint PathPoint_head_neck: head_neck (-0.0183249 0.143604 0.0566497)
    Thelen2003Muscle splen_cerv_c3_T3: max_isometric_force=49.51 optimal_fiber_length=0.1200533
        tendon_slack_length=0.06564493 pennation_angle_at_optimal=0
      PathPoint PathPoint_thoracic3: thoracic3 (-0.0390988 -0.0222721 0)
      PathPoint PathPoint_head_neck: head_neck (0.00610436 0.0879795 0.0247052)
    Thelen2003Muscle splen_cerv_c3_T4: max_isometric_force=49.51 optimal_fiber_length=0.1394416
        tendon_slack_length=0.07626263 pennation_angle_at_optimal=0
      PathPoint splen_cerv_c3thx-P1: thoracic4 (-0.0415734 -0.0203956 0)
      PathPoint splen_cerv_c3thx-P2: head_neck (0.00610436 0.0879795 0.0247052)
    Thelen2003Muscle splen_cerv_c3_T5: max_isometric_force=49.51 optimal_fiber_length=0.1603122
        tendon_slack_length=0.08776213 pennation_angle_at_optimal=0
      PathPoint PathPoint_thoracic5: thoracic5 (-0.0426622 -0.0186648 0)
      PathPoint PathPoint_head_neck: head_neck (0.00610436 0.0879795 0.0247052)
    Thelen2003Muscle splen_cerv_c3_T6: max_isometric_force=49.51 optimal_fiber_length=0.180857
        tendon_slack_length=0.09890257 pennation_angle_at_optimal=0
      PathPoint PathPoint_thoracic6: thoracic6 (-0.0469185 -0.0179742 0)
      PathPoint PathPoint_head_neck: head_neck (0.00610436 0.0879795 0.0247052)
    Thelen2003Muscle semi_cap_sklthx: max_isometric_force=256.2 optimal_fiber_length=0.07619329
        tendon_slack_length=0.07719052 pennation_angle_at_optimal=0.087266
      PathPoint P1: thoracic1 (-0.0356343 0.0243933 0.0365617)
      PathPoint P2: head_neck (-0.0545037 0.153631 0.0115953)
    Thelen2003Muscle semi_cerv_c3thx: max_isometric_force=256.2 optimal_fiber_length=0.07954538
        tendon_slack_length=0.03202169 pennation_angle_at_optimal=0.087266
      PathPoint P1: thoracic2 (-0.0306851 0.0216542 0.0282047)
      PathPoint P2: head_neck (-0.0263328 0.0731946 0.00250709)
    Thelen2003Muscle levator_scap: max_isometric_force=305.2 optimal_fiber_length=0.1235728
        tendon_slack_length=0.02392173 pennation_angle_at_optimal=0
      PathPoint P1: scapula_R (-0.0653296 0.00557079 -0.0950603)
      PathPoint P2: head_neck (0.00197671 0.103009 0.0221564)
    Thelen2003Muscle longissi_cerv_c4thx: max_isometric_force=80.2 optimal_fiber_length=0.1551889
        tendon_slack_length=0.0498368 pennation_angle_at_optimal=0
      PathPoint P1: thoracic5 (-0.0326648 0.0220268 0.0292493)
      PathPoint P2: thoracic4 (-0.0366242 0.0203956 0.030294)
      PathPoint P3: thoracic3 (-0.0346445 0.0197974 0.030294)
      PathPoint P4: thoracic1 (-0.0356343 0.0243933 0.0365617)
      PathPoint P5: head_neck (0.00429295 0.0725149 0.0272646)
    Thelen2003Muscle iliocost_cerv_c5rib: max_isometric_force=80.2 optimal_fiber_length=0.09330607
        tendon_slack_length=0.02964986 pennation_angle_at_optimal=0
      PathPoint P1: rib3_R (-0.0286189 0.00207564 0.0414005)
      PathPoint P2: thoracic1 (-0.0356343 0.0243933 0.0365617)
      PathPoint P3: head_neck (-0.00136895 0.0522818 0.0271601)
    Thelen2003Muscle supmult-T1-C4: max_isometric_force=590.0453 optimal_fiber_length=0.07663024
        tendon_slack_length=0.03084367 pennation_angle_at_optimal=0.087266
      PathPoint P1: head_neck (-0.0217963 0.0605269 0.00731227)
      PathPoint P2: thoracic1 (-0.0378319 0.0224437 0.0391836)
    Thelen2003Muscle supmult-T1-C5: max_isometric_force=590.0453 optimal_fiber_length=0.07630205
        tendon_slack_length=0.03071158 pennation_angle_at_optimal=0.087266
      PathPoint P1: head_neck (-0.0302001 0.0492182 0.00791815)
      PathPoint P2: thoracic1 (-0.0382378 0.0224437 0.0391836)
    Thelen2003Muscle supmult-T2-C6: max_isometric_force=590.0453 optimal_fiber_length=0.08207734
        tendon_slack_length=0.03303613 pennation_angle_at_optimal=0.087266
      PathPoint P1: head_neck (-0.035872 0.0307232 0.00775101)
      PathPoint P2: thoracic2 (-0.0333144 0.0197789 0.0308266)
    Thelen2003Muscle deepmult-T1-C5: max_isometric_force=590.0453 optimal_fiber_length=0.07638109
        tendon_slack_length=0.03074339 pennation_angle_at_optimal=0.087266
      PathPoint P1: head_neck (-0.0225981 0.0495414 0.00865983)
      PathPoint P2: thoracic1 (-0.0382378 0.0224437 0.0391836)
    Thelen2003Muscle deepmult-T1-C6: max_isometric_force=590.0453 optimal_fiber_length=0.07433817
        tendon_slack_length=0.02992111 pennation_angle_at_optimal=0.087266
      PathPoint P1: head_neck (-0.0264883 0.0303667 0.00867027)
      PathPoint P2: thoracic1 (-0.0382378 0.0224437 0.0391836)
    Thelen2003Muscle deepmult-T2-C7: max_isometric_force=590.0453 optimal_fiber_length=0.08365784
        tendon_slack_length=0.03367228 pennation_angle_at_optimal=0.087266
      PathPoint P1: head_neck (-0.0297023 0.0136376 0.00867027)
      PathPoint P2: thoracic2 (-0.0333144 0.0197789 0.0308266)
    Thelen2003Muscle deepmult-T2-T1: max_isometric_force=590.0453 optimal_fiber_length=0.07234064
        tendon_slack_length=0.02911711 pennation_angle_at_optimal=0.087266
      PathPoint P1: thoracic2 (-0.0333144 0.0197789 0.0308266)
      PathPoint P2: thoracic1 (-0.0273496 0.00447009 0.00262193)
    Thelen2003Muscle multifidus_L2_T12: max_isometric_force=477.0779 optimal_fiber_length=0.05796596
        tendon_slack_length=0.02217993 pennation_angle_at_optimal=0.087266
      PathPoint PathPoint_lumbar2: lumbar2 (-0.0327049 0.0275338 0.0377697)
      PathPoint PathPoint_thoracic12: thoracic12 (-0.0478194 0.00746939 0.0093653)
    Thelen2003Muscle multifidus_L1_T11: max_isometric_force=501.5705 optimal_fiber_length=0.0561309
        tendon_slack_length=0.02147777 pennation_angle_at_optimal=0.087266
      PathPoint PathPoint_lumbar1: lumbar1 (-0.0283687 0.0349646 0.0378722)
      PathPoint PathPoint_thoracic11: thoracic11 (-0.0500528 0.00528406 0.0098992)
    Thelen2003Muscle multifidus_T12_T10: max_isometric_force=467.4553 optimal_fiber_length=0.05469978
        tendon_slack_length=0.02093017 pennation_angle_at_optimal=0.087266
      PathPoint PathPoint_thoracic12: thoracic12 (-0.0319371 0.0259847 0.0327895)
      PathPoint PathPoint_thoracic10: thoracic10 (-0.049027 0.00458816 0.00722872)
    Thelen2003Muscle multifidus_T11_T9: max_isometric_force=456.5864 optimal_fiber_length=0.05111013
        tendon_slack_length=0.01955663 pennation_angle_at_optimal=0.087266
      PathPoint PathPoint_thoracic11: thoracic11 (-0.0334883 0.0247655 0.030225)
      PathPoint PathPoint_thoracic9: thoracic9 (-0.0497926 0.00621424 0.00625307)
    Thelen2003Muscle multifidus_T10_T8: max_isometric_force=383.98 optimal_fiber_length=0.04028352
        tendon_slack_length=0.01541397 pennation_angle_at_optimal=0.087266
      PathPoint PathPoint_thoracic10: thoracic10 (-0.0347124 0.0236297 0.0275995)
      PathPoint PathPoint_thoracic8: thoracic8 (-0.0454838 -0.00465318 0.00643856)
    Thelen2003Muscle multifidus_T9_T7: max_isometric_force=320.3404 optimal_fiber_length=0.02859488
        tendon_slack_length=0.01094146 pennation_angle_at_optimal=0.087266
      PathPoint PathPoint_thoracic9: thoracic9 (-0.0433641 0.0325263 0.0310183)
      PathPoint PathPoint_thoracic7: thoracic7 (-0.0439689 -0.00964168 0.00368517)
    Thelen2003Muscle multifidus_T8_T6: max_isometric_force=413.8681 optimal_fiber_length=0.03773242
        tendon_slack_length=0.01443782 pennation_angle_at_optimal=0.087266
      PathPoint PathPoint_thoracic8: thoracic8 (-0.0433309 0.0209828 0.0332029)
      PathPoint PathPoint_thoracic6: thoracic6 (-0.0424411 -0.0104415 0.00210756)
    Thelen2003Muscle multifidus_T7_T5: max_isometric_force=523.2496 optimal_fiber_length=0.03793571
        tendon_slack_length=0.01451561 pennation_angle_at_optimal=0.087266
      PathPoint PathPoint_thoracic7: thoracic7 (-0.0407349 0.0211489 0.030628)
      PathPoint PathPoint_thoracic5: thoracic5 (-0.038722 -0.0101289 0.00262193)
    Thelen2003Muscle multifidus_T6_T4: max_isometric_force=590.0453 optimal_fiber_length=0.03776176
        tendon_slack_length=0.01444905 pennation_angle_at_optimal=0.087266
      PathPoint PathPoint_thoracic6: thoracic6 (-0.0412674 0.0200912 0.0321846)
      PathPoint PathPoint_thoracic4: thoracic4 (-0.0401044 -0.014082 0.00262193)
    Thelen2003Muscle multifidus_T5_T3: max_isometric_force=590.0453 optimal_fiber_length=0.03733021
        tendon_slack_length=0.01428393 pennation_angle_at_optimal=0.087266
      PathPoint PathPoint_thoracic5: thoracic5 (-0.0356534 0.0209402 0.0321846)
      PathPoint PathPoint_thoracic3: thoracic3 (-0.0377425 -0.0122881 0.00262193)
    Thelen2003Muscle multifidus_T4_T2: max_isometric_force=590.0453 optimal_fiber_length=0.03592175
        tendon_slack_length=0.013745 pennation_angle_at_optimal=0.087266
      PathPoint PathPoint_thoracic4: thoracic4 (-0.0397083 0.0185504 0.0331248)
      PathPoint PathPoint_thoracic2: thoracic2 (-0.0352939 -0.013085 0.00262193)
    Thelen2003Muscle multifidus_T3_T1: max_isometric_force=590.0453 optimal_fiber_length=0.0340316
        tendon_slack_length=0.01302176 pennation_angle_at_optimal=0.087266
      PathPoint PathPoint_thoracic3: thoracic3 (-0.0371486 0.0183977 0.0328114)
      PathPoint PathPoint_thoracic1: thoracic1 (-0.0337833 -0.0105517 0.00262193)
    Thelen2003Muscle stern_mast_L: max_isometric_force=275.8 optimal_fiber_length=0.1190478
        tendon_slack_length=0.06186409 pennation_angle_at_optimal=0.2618
      PathPoint stern_mast-P1: sternum (0 0 -0.0700925)
      PathPoint stern_mast-P2: head_neck (0.0163789 0.139069 -0.067169)
    Thelen2003Muscle cleid_mast_L: max_isometric_force=137.9 optimal_fiber_length=0.1192639
        tendon_slack_length=0.03886897 pennation_angle_at_optimal=0.2618
      PathPoint cleid_mast-P1: clavicle_L (0.00384059 0.00603873 -0.0367706)
      PathPoint cleid_mast-P2: head_neck (0.0163789 0.139069 -0.067169)
    Thelen2003Muscle cleid_occ_L: max_isometric_force=137.9 optimal_fiber_length=0.1183274
        tendon_slack_length=0.07610974 pennation_angle_at_optimal=0.2618
      PathPoint cleid_occ-P1: clavicle_L (0.00384059 0.00603873 -0.0367706)
      PathPoint cleid_occ-P2: head_neck (-0.0132174 0.156974 -0.0693627)
    Thelen2003Muscle scalenus_ant_L: max_isometric_force=205.8 optimal_fiber_length=0.04613104
        tendon_slack_length=0.05867539 pennation_angle_at_optimal=0.17453
      PathPoint scalenus_ant-P1: rib1_L (0.0481139 -0.0493685 -0.0403635)
      PathPoint scalenus_ant-P2: head_neck (0.0183685 0.068426 -0.0242665)
    Thelen2003Muscle scalenus_med_L: max_isometric_force=288.4 optimal_fiber_length=0.05487756
        tendon_slack_length=0.06750818 pennation_angle_at_optimal=0.17453
      PathPoint scalenus_med-P1: rib1_L (0.0133697 -0.0340831 -0.0647772)
      PathPoint scalenus_med-P2: head_neck (0.00496604 0.0877121 -0.0221355)
    Thelen2003Muscle scalenus_post_L: max_isometric_force=219.8 optimal_fiber_length=0.06850326
        tendon_slack_length=0.0804858 pennation_angle_at_optimal=0.17453
      PathPoint scalenus_post-P1: rib2_L (0.0196611 -0.0395459 -0.0963731)
      PathPoint scalenus_post-P2: head_neck (0.00476807 0.0535408 -0.0268467)
    Thelen2003Muscle long_col_c1thx_L: max_isometric_force=38.28 optimal_fiber_length=0.1027466
        tendon_slack_length=0.1008895 pennation_angle_at_optimal=0.087266
      PathPoint long_col_c1thx-P1: thoracic3 (0.0182586 0.0103537 -0.00386509)
      PathPoint long_col_c1thx-P2: head_neck (0.0229643 0.00122557 -0.00417848)
      PathPoint long_col_c1thx-P3: head_neck (0.026703 0.020896 -0.00419937)
      PathPoint long_col_c1thx-P4: head_neck (0.0299892 0.040806 -0.00407401)
      PathPoint long_col_c1thx-P5: head_neck (0.0331369 0.063312 -0.00395911)
      PathPoint long_col_c1thx-P6: head_neck (0.0357897 0.0835005 -0.0038442)
      PathPoint long_col_c1thx-P7: head_neck (0.0347207 0.105773 -0.00371884)
      PathPoint long_col_c1thx-P8: head_neck (0.0361758 0.120095 -0.00323832)
    Thelen2003Muscle long_col_c5thx_L: max_isometric_force=38.28 optimal_fiber_length=0.06771444
        tendon_slack_length=0.06443809 pennation_angle_at_optimal=0.087266
      PathPoint long_col_c5thx-P1: thoracic3 (0.0175964 0.00942666 -0.00710341)
      PathPoint long_col_c5thx-P2: thoracic2 (0.0163076 0.00353931 -0.010676)
      PathPoint long_col_c5thx-P3: thoracic2 (0.0166076 0.021137 -0.0139666)
      PathPoint long_col_c5thx-P4: thoracic1 (0.0130867 0.00627127 -0.0157529)
      PathPoint long_col_c5thx-P5: thoracic1 (0.00798951 0.0235498 -0.0185733)
      PathPoint long_col_c5thx-P6: head_neck (0.0109971 0.00814449 -0.020673)
      PathPoint long_col_c5thx-P7: head_neck (0.0133104 0.0262663 -0.0231488)
      PathPoint long_col_c5thx-P8: head_neck (0.0145576 0.0481706 -0.0248619)
    Thelen2003Muscle trap_cl_L: max_isometric_force=212.9959 optimal_fiber_length=0.09106673
        tendon_slack_length=0.1292497 pennation_angle_at_optimal=0.5236
      PathPoint trap_cl-P1: clavicle_L (-0.0473026 0.0258487 -0.0792552)
      PathPoint trap_cl-P2: head_neck (-0.0728223 0.160361 0.00227007)
    Thelen2003Muscle trap_acr_scap_L: max_isometric_force=258.6624 optimal_fiber_length=0.1294946
        tendon_slack_length=0.04785212 pennation_angle_at_optimal=0
      PathPoint trap_acr-P1: scapula_L (-0.0369177 1.79973e-7 0.025085)
      PathPoint trap_acr-P2: head_neck (-0.0472155 0.021169 0)
    Thelen2003Muscle trap_acr_T1_L: max_isometric_force=258.6624 optimal_fiber_length=0.1247724
        tendon_slack_length=0.04603455 pennation_angle_at_optimal=0
      PathPoint PathPoint_scapula_L: scapula_L (-0.0369176 1.78342e-7 0.0247096)
      ConditionalPathPoint default: scapula_L (-0.0579122 0.016713 0.100966) socket_coordinate=/jointset/Abdjnt/Abs_FE
          range=(-1.57 1.57)
      PathPoint PathPoint_thoracic1: thoracic1 (-0.0346445 -0.0192579 0)
    Thelen2003Muscle trap_acr_T2_L: max_isometric_force=258.6624 optimal_fiber_length=0.1301069
        tendon_slack_length=0.04807842 pennation_angle_at_optimal=0
      PathPoint PathPoint_scapula_R: scapula_L (-0.0369176 1.78342e-7 0.0247096)
      ConditionalPathPoint default: scapula_L (-0.0727598 0.0144837 0.109324) socket_coordinate=/jointset/Abdjnt/Abs_FE
          range=(-1.57 1.57)
      PathPoint PathPoint_thoracic2: thoracic2 (-0.0356343 -0.0203804 0)
    Thelen2003Muscle trap_acr_T3_L: max_isometric_force=258.6624 optimal_fiber_length=0.1378422
        tendon_slack_length=0.05095335 pennation_angle_at_optimal=0
      PathPoint PathPoint_scapula_L: scapula_L (-0.0369176 1.78342e-7 0.0247096)
      ConditionalPathPoint default: scapula_L (-0.0826583 0.00222803 0.115591)
          socket_coordinate=/jointset/Abdjnt/Abs_FE range=(-1.57 1.57)
      PathPoint PathPoint_thoracic3: thoracic3 (-0.0395937 -0.0210348 0)
    Thelen2003Muscle trap_inf_T4_L: max_isometric_force=115.9774 optimal_fiber_length=0.110027
        tendon_slack_length=0.01967962 pennation_angle_at_optimal=0
      PathPoint PathPoint_thoracic4: thoracic4 (-0.0415734 -0.0203956 0)
      ConditionalPathPoint default: scapula_L (-0.0955262 -0.0211692 0.121337)
          socket_coordinate=/jointset/Abdjnt/Abs_FE range=(-1.57 1.57)
      PathPoint PathPoint_scapula_L: scapula_L (-0.0876076 -0.00668426 0.0800736)
    Thelen2003Muscle trap_inf_T5_L: max_isometric_force=115.9774 optimal_fiber_length=0.1275381
        tendon_slack_length=0.02284436 pennation_angle_at_optimal=0
      PathPoint PathPoint_thoracic5: thoracic5 (-0.0425632 -0.0185489 0)
      ConditionalPathPoint default: scapula_L (-0.100476 -0.0311965 0.123948) socket_coordinate=/jointset/Abdjnt/Abs_FE
          range=(-1.57 1.57)
      PathPoint PathPoint_scapula_L: scapula_L (-0.0876076 -0.00668426 0.0800736)
    Thelen2003Muscle trap_inf_T6_L: max_isometric_force=135.1934 optimal_fiber_length=0.1454262
        tendon_slack_length=0.02607243 pennation_angle_at_optimal=0
      PathPoint PathPoint_thoracic6: thoracic6 (-0.0465226 -0.0169568 0)
      ConditionalPathPoint default: scapula_L (-0.101465 -0.0445664 0.123948) socket_coordinate=/jointset/Abdjnt/Abs_FE
          range=(-1.57 1.57)
      PathPoint PathPoint_scapula_L: scapula_L (-0.0876076 -0.00668426 0.0800736)
    Thelen2003Muscle trap_inf_T7_L: max_isometric_force=132.2957 optimal_fiber_length=0.1673634
        tendon_slack_length=0.02987396 pennation_angle_at_optimal=0
      PathPoint PathPoint_thoracic7: thoracic7 (-0.0465226 -0.0167534 0)
      ConditionalPathPoint default: scapula_L (-0.105425 -0.0579363 0.123948) socket_coordinate=/jointset/Abdjnt/Abs_FE
          range=(-1.57 1.57)
      PathPoint PathPoint_scapula_L: scapula_L (-0.0876076 -0.00668426 0.0800736)
    Thelen2003Muscle trap_inf_T8_L: max_isometric_force=123.5146 optimal_fiber_length=0.1850323
        tendon_slack_length=0.03312307 pennation_angle_at_optimal=0
      PathPoint PathPoint_thoracic8: thoracic8 (-0.0425632 -0.0122632 0)
      ConditionalPathPoint default: scapula_L (-0.110373 -0.0779911 0.123948) socket_coordinate=/jointset/Abdjnt/Abs_FE
          range=(-1.57 1.57)
      PathPoint PathPoint_scapula_L: scapula_L (-0.0876076 -0.00668426 0.0800736)
    Thelen2003Muscle trap_inf_T9_L: max_isometric_force=113.2336 optimal_fiber_length=0.2012353
        tendon_slack_length=0.03597946 pennation_angle_at_optimal=0
      PathPoint PathPoint_thoracic9: thoracic9 (-0.0455327 -0.00224446 0)
      ConditionalPathPoint default: scapula_L (-0.116281 -0.0969318 0.123028) socket_coordinate=/jointset/Abdjnt/Abs_FE
          range=(-1.57 1.57)
      PathPoint PathPoint_scapula_L: scapula_L (-0.0876076 -0.00668426 0.0800736)
    Thelen2003Muscle trap_inf_T10_L: max_isometric_force=105.4514 optimal_fiber_length=0.2316857
        tendon_slack_length=0.04149083 pennation_angle_at_optimal=0
      PathPoint PathPoint_thoracic10: thoracic10 (-0.0465226 -0.00567288 0)
      ConditionalPathPoint default: rib8_L (-0.046031 -0.00683694 -0.0254685) socket_coordinate=/jointset/Abdjnt/Abs_FE
          range=(-1.57 1.57)
      ConditionalPathPoint default_0: scapula_L (-0.115688 -0.111416 0.118829)
          socket_coordinate=/jointset/Abdjnt/Abs_FE range=(-1.57 1.57)
      PathPoint PathPoint_scapula_L: scapula_L (-0.0876076 -0.00668426 0.0800736)
    Thelen2003Muscle trap_inf_T11_L: max_isometric_force=101.1725 optimal_fiber_length=0.2622648
        tendon_slack_length=0.04689047 pennation_angle_at_optimal=0
      PathPoint PathPoint_thoracic11: thoracic11 (-0.0494921 -0.00231861 0)
      ConditionalPathPoint default: rib9_L (-0.0488678 -0.00934276 -0.0248017)
          socket_coordinate=/jointset/Abdjnt/Abs_FE range=(-1.57 1.57)
      ConditionalPathPoint default_0: rib8_L (-0.0499949 -0.00811044 -0.0372972)
          socket_coordinate=/jointset/Abdjnt/Abs_FE range=(-1.57 1.57)
      ConditionalPathPoint default_1: scapula_L (-0.115131 -0.124786 0.114193)
          socket_coordinate=/jointset/Abdjnt/Abs_FE range=(-1.57 1.57)
      PathPoint PathPoint_scapula_L: scapula_L (-0.0876076 -0.00668426 0.0800736)
    Thelen2003Muscle trap_inf_T12_L: max_isometric_force=100.9804 optimal_fiber_length=0.2960284
        tendon_slack_length=0.05291999 pennation_angle_at_optimal=0
      PathPoint PathPoint_thoracic12: thoracic12 (-0.0494921 0 0)
      ConditionalPathPoint default: rib10_L (-0.0481679 -0.0110739 -0.0285724)
          socket_coordinate=/jointset/Abdjnt/Abs_FE range=(-1.57 1.57)
      ConditionalPathPoint default_0: rib9_L (-0.0506881 -0.014088 -0.0371929)
          socket_coordinate=/jointset/Abdjnt/Abs_FE range=(-1.57 1.57)
      ConditionalPathPoint default_1: rib8_L (-0.0500473 -0.0159241 -0.0497193)
          socket_coordinate=/jointset/Abdjnt/Abs_FE range=(-1.57 1.57)
      ConditionalPathPoint default_2: scapula_L (-0.114749 -0.133699 0.107886)
          socket_coordinate=/jointset/Abdjnt/Abs_FE range=(-1.57 1.57)
      PathPoint PathPoint_scapula_L: scapula_L (-0.0876076 -0.00668426 0.0800736)
    Thelen2003Muscle splen_cap_skl_T1_L: max_isometric_force=99.02 optimal_fiber_length=0.1562323
        tendon_slack_length=0.04609944 pennation_angle_at_optimal=0
      PathPoint splen_cap_sklthx-P1: thoracic1 (-0.0346445 -0.0192579 0)
      PathPoint splen_cap_sklthx-P2: head_neck (-0.0183249 0.143604 -0.0566497)
    Thelen2003Muscle splen_cap_skl_T2_L: max_isometric_force=99.02 optimal_fiber_length=0.141262
        tendon_slack_length=0.04157506 pennation_angle_at_optimal=0
      PathPoint PathPoint_thoracic2: thoracic2 (-0.0371191 -0.0206351 0)
      PathPoint PathPoint_head_neck: head_neck (-0.0183249 0.143604 -0.0566497)
    Thelen2003Muscle splen_cerv_c3_T3_L: max_isometric_force=49.51 optimal_fiber_length=0.1200533
        tendon_slack_length=0.06564493 pennation_angle_at_optimal=0
      PathPoint PathPoint_thoracic3: thoracic3 (-0.0390988 -0.0222721 0)
      PathPoint PathPoint_head_neck: head_neck (0.00610436 0.0879795 -0.0247052)
    Thelen2003Muscle splen_cerv_c3_T4_L: max_isometric_force=49.51 optimal_fiber_length=0.1394416
        tendon_slack_length=0.07626263 pennation_angle_at_optimal=0
      PathPoint splen_cerv_c3thx-P1: thoracic4 (-0.0415734 -0.0203956 0)
      PathPoint splen_cerv_c3thx-P2: head_neck (0.00610436 0.0879795 -0.0247052)
    Thelen2003Muscle splen_cerv_c3_T5_L: max_isometric_force=49.51 optimal_fiber_length=0.1603122
        tendon_slack_length=0.08776213 pennation_angle_at_optimal=0
      PathPoint PathPoint_thoracic5: thoracic5 (-0.0426622 -0.0186648 0)
      PathPoint PathPoint_head_neck: head_neck (0.00610436 0.0879795 -0.0247052)
    Thelen2003Muscle splen_cerv_c3_T6_L: max_isometric_force=49.51 optimal_fiber_length=0.180857
        tendon_slack_length=0.09890257 pennation_angle_at_optimal=0
      PathPoint PathPoint_thoracic6: thoracic6 (-0.0469185 -0.0179742 0)
      PathPoint PathPoint_head_neck: head_neck (0.00610436 0.0879795 -0.0247052)
    Thelen2003Muscle semi_cap_sklthx_L: max_isometric_force=256.2 optimal_fiber_length=0.07619329
        tendon_slack_length=0.07719052 pennation_angle_at_optimal=0.087266
      PathPoint semi_cap_sklthx-P1: thoracic1 (-0.0356343 0.0243933 -0.0365617)
      PathPoint semi_cap_sklthx-P2: head_neck (-0.0545037 0.153631 -0.0115953)
    Thelen2003Muscle semi_cerv_c3thx_L: max_isometric_force=256.2 optimal_fiber_length=0.07954538
        tendon_slack_length=0.03202169 pennation_angle_at_optimal=0.087266
      PathPoint semi_cerv_c3thx-P1: thoracic2 (-0.0306851 0.0216542 -0.0282047)
      PathPoint semi_cerv_c3thx-P2: head_neck (-0.0263328 0.0731946 -0.00250709)
    Thelen2003Muscle levator_scap_L: max_isometric_force=305.2 optimal_fiber_length=0.1235728
        tendon_slack_length=0.02392173 pennation_angle_at_optimal=0
      PathPoint levator_scap-P1: scapula_L (-0.0653296 0.00557079 0.0950603)
      PathPoint levator_scap-P2: head_neck (0.00197671 0.103009 -0.0221564)
    Thelen2003Muscle longissi_cerv_c4thx_L: max_isometric_force=80.2 optimal_fiber_length=0.1551889
        tendon_slack_length=0.0498368 pennation_angle_at_optimal=0
      PathPoint longissi_cerv_c4thx-P1: thoracic5 (-0.0326648 0.0220268 -0.0292493)
      PathPoint longissi_cerv_c4thx-P2: thoracic4 (-0.0366242 0.0203956 -0.030294)
      PathPoint longissi_cerv_c4thx-P3: thoracic3 (-0.0346445 0.0197974 -0.030294)
      PathPoint longissi_cerv_c4thx-P4: thoracic1 (-0.0356343 0.0243933 -0.0365617)
      PathPoint longissi_cerv_c4thx-P5: head_neck (0.00429295 0.0725149 -0.0272646)
    Thelen2003Muscle iliocost_cerv_c5rib_L: max_isometric_force=80.2 optimal_fiber_length=0.09330608
        tendon_slack_length=0.02964987 pennation_angle_at_optimal=0
      PathPoint iliocost_cerv_c5rib-P1: rib3_L (-0.0286189 0.00207564 -0.0414005)
      PathPoint iliocost_cerv_c5rib-P2: thoracic1 (-0.0356343 0.0243933 -0.0365617)
      PathPoint iliocost_cerv_c5rib-P3: head_neck (-0.00136895 0.0522818 -0.0271601)
    Thelen2003Muscle supmult-T1-C4_L: max_isometric_force=590.0453 optimal_fiber_length=0.07663024
        tendon_slack_length=0.03084367 pennation_angle_at_optimal=0.087266
      PathPoint supmult-T1-C4-P1: head_neck (-0.0217963 0.0605269 -0.00731227)
      PathPoint supmult-T1-C4-P2: thoracic1 (-0.0378319 0.0224437 -0.0391836)
    Thelen2003Muscle supmult-T1-C5_L: max_isometric_force=590.0453 optimal_fiber_length=0.07630205
        tendon_slack_length=0.03071158 pennation_angle_at_optimal=0.087266
      PathPoint supmult-T1-C5-P1: head_neck (-0.0302001 0.0492182 -0.00791815)
      PathPoint supmult-T1-C5-P2: thoracic1 (-0.0382378 0.0224437 -0.0391836)
    Thelen2003Muscle supmult-T2-C6_L: max_isometric_force=590.0453 optimal_fiber_length=0.08207734
        tendon_slack_length=0.03303613 pennation_angle_at_optimal=0.087266
      PathPoint supmult-T2-C6-P1: head_neck (-0.035872 0.0307232 -0.00775101)
      PathPoint supmult-T2-C6-P2: thoracic2 (-0.0333144 0.0197789 -0.0308266)
    Thelen2003Muscle deepmult-T1-C5_L: max_isometric_force=590.0453 optimal_fiber_length=0.07638109
        tendon_slack_length=0.03074339 pennation_angle_at_optimal=0.087266
      PathPoint deepmult-T1-C5-P1: head_neck (-0.0225981 0.0495414 -0.00865983)
      PathPoint deepmult-T1-C5-P2: thoracic1 (-0.0382378 0.0224437 -0.0391836)
    Thelen2003Muscle deepmult-T1-C6_L: max_isometric_force=590.0453 optimal_fiber_length=0.07433817
        tendon_slack_length=0.02992111 pennation_angle_at_optimal=0.087266
      PathPoint deepmult-T1-C6-P1: head_neck (-0.0264883 0.0303667 -0.00867027)
      PathPoint deepmult-T1-C6-P2: thoracic1 (-0.0382378 0.0224437 -0.0391836)
    Thelen2003Muscle deepmult-T2-C7_L: max_isometric_force=590.0453 optimal_fiber_length=0.08365784
        tendon_slack_length=0.03367228 pennation_angle_at_optimal=0.087266
      PathPoint deepmult-T2-C7-P1: head_neck (-0.0297023 0.0136376 -0.00867027)
      PathPoint deepmult-T2-C7-P2: thoracic2 (-0.0333144 0.0197789 -0.0308266)
    Thelen2003Muscle deepmult-T2-T1_L: max_isometric_force=590.0453 optimal_fiber_length=0.07234064
        tendon_slack_length=0.02911711 pennation_angle_at_optimal=0.087266
      PathPoint deepmult-T2-T1-P1: thoracic2 (-0.0333144 0.0197789 -0.0308266)
      PathPoint deepmult-T2-T1-P2: thoracic1 (-0.0273496 0.00447009 -0.00262193)
    Thelen2003Muscle multifidus_L2_T12_L: max_isometric_force=477.0779 optimal_fiber_length=0.05796596
        tendon_slack_length=0.02217993 pennation_angle_at_optimal=0.087266
      PathPoint PathPoint_lumbar2: lumbar2 (-0.0327049 0.0275338 -0.0377697)
      PathPoint PathPoint_thoracic12: thoracic12 (-0.0478194 0.00746939 -0.0093653)
    Thelen2003Muscle multifidus_L1_T11_L: max_isometric_force=501.5705 optimal_fiber_length=0.0561309
        tendon_slack_length=0.02147777 pennation_angle_at_optimal=0.087266
      PathPoint PathPoint_lumbar1: lumbar1 (-0.0283687 0.0349646 -0.0378722)
      PathPoint PathPoint_thoracic11: thoracic11 (-0.0500528 0.00528406 -0.0098992)
    Thelen2003Muscle multifidus_T12_T10_L: max_isometric_force=467.4553 optimal_fiber_length=0.05469978
        tendon_slack_length=0.02093017 pennation_angle_at_optimal=0.087266
      PathPoint PathPoint_thoracic12: thoracic12 (-0.0319371 0.0259847 -0.0327895)
      PathPoint PathPoint_thoracic10: thoracic10 (-0.049027 0.00458816 -0.00722872)
    Thelen2003Muscle multifidus_T11_T9_L: max_isometric_force=456.5864 optimal_fiber_length=0.05111013
        tendon_slack_length=0.01955663 pennation_angle_at_optimal=0.087266
      PathPoint PathPoint_thoracic11: thoracic11 (-0.0334883 0.0247655 -0.030225)
      PathPoint PathPoint_thoracic9: thoracic9 (-0.0497926 0.00621424 -0.00625307)
    Thelen2003Muscle multifidus_T10_T8_L: max_isometric_force=383.98 optimal_fiber_length=0.04028352
        tendon_slack_length=0.01541397 pennation_angle_at_optimal=0.087266
      PathPoint PathPoint_thoracic10: thoracic10 (-0.0347124 0.0236297 -0.0275995)
      PathPoint PathPoint_thoracic8: thoracic8 (-0.0454838 -0.00465318 -0.00643856)
    Thelen2003Muscle multifidus_T9_T7_L: max_isometric_force=320.3404 optimal_fiber_length=0.02859488
        tendon_slack_length=0.01094146 pennation_angle_at_optimal=0.087266
      PathPoint PathPoint_thoracic9: thoracic9 (-0.0433641 0.0325263 -0.0310183)
      PathPoint PathPoint_thoracic7: thoracic7 (-0.0439689 -0.00964168 -0.00368517)
    Thelen2003Muscle multifidus_T8_T6_L: max_isometric_force=413.8681 optimal_fiber_length=0.03773242
        tendon_slack_length=0.01443782 pennation_angle_at_optimal=0.087266
      PathPoint PathPoint_thoracic8: thoracic8 (-0.0433309 0.0209828 -0.0332029)
      PathPoint PathPoint_thoracic6: thoracic6 (-0.0424411 -0.0104415 -0.00210756)
    Thelen2003Muscle multifidus_T7_T5_L: max_isometric_force=523.2496 optimal_fiber_length=0.03793571
        tendon_slack_length=0.01451561 pennation_angle_at_optimal=0.087266
      PathPoint PathPoint_thoracic7: thoracic7 (-0.0407349 0.0211489 -0.030628)
      PathPoint PathPoint_thoracic5: thoracic5 (-0.038722 -0.0101289 -0.00262193)
    Thelen2003Muscle multifidus_T6_T4_L: max_isometric_force=590.0453 optimal_fiber_length=0.03776176
        tendon_slack_length=0.01444905 pennation_angle_at_optimal=0.087266
      PathPoint PathPoint_thoracic6: thoracic6 (-0.0412674 0.0200912 -0.0321846)
      PathPoint PathPoint_thoracic4: thoracic4 (-0.0401044 -0.014082 -0.00262193)
    Thelen2003Muscle multifidus_T5_T3_L: max_isometric_force=590.0453 optimal_fiber_length=0.03733021
        tendon_slack_length=0.01428393 pennation_angle_at_optimal=0.087266
      PathPoint PathPoint_thoracic5: thoracic5 (-0.0356534 0.0209402 -0.0321846)
      PathPoint PathPoint_thoracic3: thoracic3 (-0.0377425 -0.0122881 -0.00262193)
    Thelen2003Muscle multifidus_T4_T2_L: max_isometric_force=590.0453 optimal_fiber_length=0.03592175
        tendon_slack_length=0.013745 pennation_angle_at_optimal=0.087266
      PathPoint PathPoint_thoracic4: thoracic4 (-0.0397083 0.0185504 -0.0331248)
      PathPoint PathPoint_thoracic2: thoracic2 (-0.0352939 -0.013085 -0.00262193)
    Thelen2003Muscle multifidus_T3_T1_L: max_isometric_force=590.0453 optimal_fiber_length=0.0340316
        tendon_slack_length=0.01302176 pennation_angle_at_optimal=0.087266
      PathPoint PathPoint_thoracic3: thoracic3 (-0.0371486 0.0183977 -0.0328114)
      PathPoint PathPoint_thoracic1: thoracic1 (-0.0337833 -0.0105517 -0.00262193)
    Thelen2003Muscle SerrAnt1_1_R: max_isometric_force=196.8423 optimal_fiber_length=0.1170743
        tendon_slack_length=0.002857232 pennation_angle_at_optimal=0
      PathPoint PathPoint_rib1_R: rib1_R (0.0317747 -0.0442825 0.0565973)
      ConditionalPathPoint ConditionalPathPoint_rib1_R_1: rib1_R (0.0211902 -0.0370116 0.0605444)
          socket_coordinate=/jointset/L5_S1_IVDjnt/L5_S1_FE range=(-99999.9 99999.9)
      ConditionalPathPoint ConditionalPathPoint_rib1_R_2: rib1_R (0.00634271 -0.0303269 0.0663595)
          socket_coordinate=/jointset/L5_S1_IVDjnt/L5_S1_FE range=(-99999.9 99999.9)
      ConditionalPathPoint ConditionalPathPoint_rib1_R_3: rib1_R (-0.0114745 -0.0269846 0.0696874)
          socket_coordinate=/jointset/L5_S1_IVDjnt/L5_S1_FE range=(-99999.9 99999.9)
      ConditionalPathPoint ConditionalPathPoint_rib1_R_4: rib1_R (-0.0283015 -0.0280989 0.0653673)
          socket_coordinate=/jointset/L5_S1_IVDjnt/L5_S1_FE range=(-99999.9 99999.9)
      PathPoint PathPoint_scapula_R: scapula_R (-0.0544413 0.0111416 -0.0887926)
    Thelen2003Muscle SerrAnt2_1_R: max_isometric_force=261.174 optimal_fiber_length=0.1136477
        tendon_slack_length=0.002773606 pennation_angle_at_optimal=0
      PathPoint PathPoint_rib2_R: rib2_R (0.0620726 -0.0633935 0.0756019)
      ConditionalPathPoint ConditionalPathPoint_rib2_R_1: rib2_R (0.0474527 -0.0525279 0.0837809)
          socket_coordinate=/jointset/L5_S1_IVDjnt/L5_S1_FE range=(-99999.9 99999.9)
      ConditionalPathPoint ConditionalPathPoint_rib2_R_2: rib2_R (0.0256782 -0.03916 0.0922173)
          socket_coordinate=/jointset/L5_S1_IVDjnt/L5_S1_FE range=(-99999.9 99999.9)
      ConditionalPathPoint ConditionalPathPoint_rib2_R_3: rib2_R (-0.0267828 -0.0391605 0.0936279)
          socket_coordinate=/jointset/L5_S1_IVDjnt/L5_S1_FE range=(-99999.9 99999.9)
      ConditionalPathPoint ConditionalPathPoint_rib2_R_4: rib2_R (-0.0525187 -0.0458445 0.0731291)
          socket_coordinate=/jointset/L5_S1_IVDjnt/L5_S1_FE range=(-99999.9 99999.9)
      PathPoint PathPoint_scapula_R: scapula_R (-0.0871061 -0.035653 -0.100283)
    Thelen2003Muscle SerrAnt2_2_R: max_isometric_force=240.3687 optimal_fiber_length=0.1170395
        tendon_slack_length=0.002856382 pennation_angle_at_optimal=0
      PathPoint PathPoint_rib2_R: rib2_R (0.041107 -0.0525138 0.0903646)
      ConditionalPathPoint ConditionalPathPoint_rib2_R_1: rib2_R (0.0296383 -0.040274 0.0901732)
          socket_coordinate=/jointset/L5_S1_IVDjnt/L5_S1_FE range=(-99999.9 99999.9)
      ConditionalPathPoint ConditionalPathPoint_rib2_R_2: rib2_R (0.01578 -0.029132 0.0894557)
          socket_coordinate=/jointset/L5_S1_IVDjnt/L5_S1_FE range=(-99999.9 99999.9)
      ConditionalPathPoint ConditionalPathPoint_rib2_R_3: rib2_R (-0.00302687 -0.0202196 0.086924)
          socket_coordinate=/jointset/L5_S1_IVDjnt/L5_S1_FE range=(-99999.9 99999.9)
      ConditionalPathPoint ConditionalPathPoint_rib2_R_4: rib2_R (-0.0178743 -0.0146488 0.0784217)
          socket_coordinate=/jointset/L5_S1_IVDjnt/L5_S1_FE range=(-99999.9 99999.9)
      PathPoint PathPoint_scapula_R: scapula_R (-0.0544413 0.0111416 -0.0887926)
    Thelen2003Muscle SerrAnt3_1_R: max_isometric_force=216.5426 optimal_fiber_length=0.1791997
        tendon_slack_length=0.007504174 pennation_angle_at_optimal=0
      PathPoint PathPoint_rib3_R: rib3_R (0.0830052 -0.0826977 0.0951546)
      ConditionalPathPoint ConditionalPathPoint_rib3_R_1: rib3_R (0.0753087 -0.0778563 0.100965)
          socket_coordinate=/jointset/L5_S1_IVDjnt/L5_S1_FE range=(-99999.9 99999.9)
      ConditionalPathPoint ConditionalPathPoint_rib3_R_2: rib3_R (0.0634293 -0.0711711 0.108602)
          socket_coordinate=/jointset/L5_S1_IVDjnt/L5_S1_FE range=(-99999.9 99999.9)
      ConditionalPathPoint ConditionalPathPoint_rib3_R_3: rib3_R (0.0446213 -0.0689428 0.120674)
          socket_coordinate=/jointset/L5_S1_IVDjnt/L5_S1_FE range=(-99999.9 99999.9)
      ConditionalPathPoint ConditionalPathPoint_rib3_R_4: rib3_R (-0.00684635 -0.0767432 0.122927)
          socket_coordinate=/jointset/L5_S1_IVDjnt/L5_S1_FE range=(-99999.9 99999.9)
      ConditionalPathPoint ConditionalPathPoint_rib3_R_5: rib3_R (-0.0335745 -0.0834271 0.109107)
          socket_coordinate=/jointset/L5_S1_IVDjnt/L5_S1_FE range=(-99999.9 99999.9)
      ConditionalPathPoint ConditionalPathPoint_rib3_R_6: rib3_R (-0.0523809 -0.0889982 0.0924443)
          socket_coordinate=/jointset/L5_S1_IVDjnt/L5_S1_FE range=(-99999.9 99999.9)
      ConditionalPathPoint ConditionalPathPoint_rib3_R_7: rib3_R (-0.0632694 -0.0923387 0.0768153)
          socket_coordinate=/jointset/L5_S1_IVDjnt/L5_S1_FE range=(-99999.9 99999.9)
      PathPoint PathPoint_scapula_R: scapula_R (-0.0989842 -0.100274 -0.100283)
    Thelen2003Muscle SerrAnt4_1_R: max_isometric_force=295.2639 optimal_fiber_length=0.1777328
        tendon_slack_length=0.007442749 pennation_angle_at_optimal=0
      PathPoint PathPoint_rib4_R: rib4_R (0.0996237 -0.0998718 0.107806)
      ConditionalPathPoint ConditionalPathPoint_rib4_R_1: rib4_R (0.0905703 -0.0961102 0.115284)
          socket_coordinate=/jointset/L5_S1_IVDjnt/L5_S1_FE range=(-99999.9 99999.9)
      ConditionalPathPoint ConditionalPathPoint_rib4_R_2: rib4_R (0.0777028 -0.0949966 0.125007)
          socket_coordinate=/jointset/L5_S1_IVDjnt/L5_S1_FE range=(-99999.9 99999.9)
      ConditionalPathPoint ConditionalPathPoint_rib4_R_3: rib4_R (0.0509771 -0.0949962 0.136631)
          socket_coordinate=/jointset/L5_S1_IVDjnt/L5_S1_FE range=(-99999.9 99999.9)
      ConditionalPathPoint ConditionalPathPoint_rib4_R_4: rib4_R (0.0123692 -0.100566 0.133298)
          socket_coordinate=/jointset/L5_S1_IVDjnt/L5_S1_FE range=(-99999.9 99999.9)
      ConditionalPathPoint ConditionalPathPoint_rib4_R_5: rib4_R (-0.0113863 -0.105022 0.121916)
          socket_coordinate=/jointset/L5_S1_IVDjnt/L5_S1_FE range=(-99999.9 99999.9)
      ConditionalPathPoint ConditionalPathPoint_rib4_R_6: rib4_R (-0.0282112 -0.107252 0.109644)
          socket_coordinate=/jointset/L5_S1_IVDjnt/L5_S1_FE range=(-99999.9 99999.9)
      ConditionalPathPoint ConditionalPathPoint_rib4_R_7: rib4_R (-0.0420696 -0.109481 0.0965484)
          socket_coordinate=/jointset/L5_S1_IVDjnt/L5_S1_FE range=(-99999.9 99999.9)
      PathPoint PathPoint_scapula_R: scapula_R (-0.100964 -0.133699 -0.0814803)
    Thelen2003Muscle SerrAnt5_1_R: max_isometric_force=232.6403 optimal_fiber_length=0.1810309
        tendon_slack_length=0.007580859 pennation_angle_at_optimal=0
      PathPoint PathPoint_rib5_R: rib5_R (0.112927 -0.114661 0.116991)
      ConditionalPathPoint ConditionalPathPoint_rib5_R_1: rib5_R (0.102519 -0.108574 0.124368)
          socket_coordinate=/jointset/L5_S1_IVDjnt/L5_S1_FE range=(-99999.9 99999.9)
      ConditionalPathPoint ConditionalPathPoint_rib5_R_2: rib5_R (0.0847012 -0.104117 0.134075)
          socket_coordinate=/jointset/L5_S1_IVDjnt/L5_S1_FE range=(-99999.9 99999.9)
      ConditionalPathPoint ConditionalPathPoint_rib5_R_3: rib5_R (0.054014 -0.100774 0.140252)
          socket_coordinate=/jointset/L5_S1_IVDjnt/L5_S1_FE range=(-99999.9 99999.9)
      ConditionalPathPoint ConditionalPathPoint_rib5_R_4: rib5_R (0.0213514 -0.09966 0.132935)
          socket_coordinate=/jointset/L5_S1_IVDjnt/L5_S1_FE range=(-99999.9 99999.9)
      ConditionalPathPoint ConditionalPathPoint_rib5_R_5: rib5_R (-0.00141603 -0.0963174 0.120527)
          socket_coordinate=/jointset/L5_S1_IVDjnt/L5_S1_FE range=(-99999.9 99999.9)
      ConditionalPathPoint ConditionalPathPoint_rib5_R_6: rib5_R (-0.0192338 -0.092975 0.107105)
          socket_coordinate=/jointset/L5_S1_IVDjnt/L5_S1_FE range=(-99999.9 99999.9)
      ConditionalPathPoint ConditionalPathPoint_rib5_R_7: rib5_R (-0.0340812 -0.0885178 0.0918649)
          socket_coordinate=/jointset/L5_S1_IVDjnt/L5_S1_FE range=(-99999.9 99999.9)
      PathPoint PathPoint_scapula_R: scapula_R (-0.100964 -0.133699 -0.0814803)
    Thelen2003Muscle SerrAnt6_1_R: max_isometric_force=324.5034 optimal_fiber_length=0.185171
        tendon_slack_length=0.00775423 pennation_angle_at_optimal=0
      PathPoint PathPoint_rib6_R: rib6_R (0.117194 -0.127135 0.124955)
      ConditionalPathPoint ConditionalPathPoint_rib6_R_1: rib6_R (0.105863 -0.117614 0.131961)
          socket_coordinate=/jointset/L5_S1_IVDjnt/L5_S1_FE range=(-99999.9 99999.9)
      ConditionalPathPoint ConditionalPathPoint_rib6_R_2: rib6_R (0.0890322 -0.107586 0.139209)
          socket_coordinate=/jointset/L5_S1_IVDjnt/L5_S1_FE range=(-99999.9 99999.9)
      ConditionalPathPoint ConditionalPathPoint_rib6_R_3: rib6_R (0.0583489 -0.0997871 0.142438)
          socket_coordinate=/jointset/L5_S1_IVDjnt/L5_S1_FE range=(-99999.9 99999.9)
      ConditionalPathPoint ConditionalPathPoint_rib6_R_4: rib6_R (0.0316226 -0.0919881 0.13478)
          socket_coordinate=/jointset/L5_S1_IVDjnt/L5_S1_FE range=(-99999.9 99999.9)
      ConditionalPathPoint ConditionalPathPoint_rib6_R_5: rib6_R (0.00984395 -0.084189 0.123424)
          socket_coordinate=/jointset/L5_S1_IVDjnt/L5_S1_FE range=(-99999.9 99999.9)
      ConditionalPathPoint ConditionalPathPoint_rib6_R_6: rib6_R (-0.00797085 -0.0752759 0.110687)
          socket_coordinate=/jointset/L5_S1_IVDjnt/L5_S1_FE range=(-99999.9 99999.9)
      ConditionalPathPoint ConditionalPathPoint_rib6_R_7: rib6_R (-0.0228184 -0.0674767 0.0966383)
          socket_coordinate=/jointset/L5_S1_IVDjnt/L5_S1_FE range=(-99999.9 99999.9)
      PathPoint PathPoint_scapula_R: scapula_R (-0.100964 -0.133699 -0.0814803)
    Thelen2003Muscle SerrAnt7_1_R: max_isometric_force=411.66 optimal_fiber_length=0.2442796
        tendon_slack_length=0.0001055203 pennation_angle_at_optimal=0
      PathPoint PathPoint_rib7_R: rib7_R (0.118092 -0.136921 0.134108)
      ConditionalPathPoint ConditionalPathPoint_rib7_R_1: rib7_R (0.107629 -0.123052 0.139599)
          socket_coordinate=/jointset/L5_S1_IVDjnt/L5_S1_FE range=(-99999.9 99999.9)
      ConditionalPathPoint ConditionalPathPoint_rib7_R_2: rib7_R (0.0888217 -0.108571 0.145138)
          socket_coordinate=/jointset/L5_S1_IVDjnt/L5_S1_FE range=(-99999.9 99999.9)
      ConditionalPathPoint ConditionalPathPoint_rib7_R_3: rib7_R (0.062096 -0.0952005 0.144497)
          socket_coordinate=/jointset/L5_S1_IVDjnt/L5_S1_FE range=(-99999.9 99999.9)
      ConditionalPathPoint ConditionalPathPoint_rib7_R_4: rib7_R (0.0383395 -0.0829448 0.136883)
          socket_coordinate=/jointset/L5_S1_IVDjnt/L5_S1_FE range=(-99999.9 99999.9)
      ConditionalPathPoint ConditionalPathPoint_rib7_R_5: rib7_R (0.0175504 -0.0706893 0.125902)
          socket_coordinate=/jointset/L5_S1_IVDjnt/L5_S1_FE range=(-99999.9 99999.9)
      ConditionalPathPoint ConditionalPathPoint_rib7_R_6: rib7_R (0.000724065 -0.058434 0.113971)
          socket_coordinate=/jointset/L5_S1_IVDjnt/L5_S1_FE range=(-99999.9 99999.9)
      ConditionalPathPoint ConditionalPathPoint_rib7_R_7: rib7_R (-0.0151135 -0.0461784 0.0995823)
          socket_coordinate=/jointset/L5_S1_IVDjnt/L5_S1_FE range=(-99999.9 99999.9)
      PathPoint PathPoint_scapula_R: scapula_R (-0.100964 -0.133699 -0.0814803)
    Thelen2003Muscle SerrAnt8_1_R: max_isometric_force=453.307 optimal_fiber_length=0.2500329
        tendon_slack_length=0.0001080056 pennation_angle_at_optimal=0
      PathPoint PathPoint_rib8_R: rib8_R (0.104244 -0.138178 0.141424)
      ConditionalPathPoint ConditionalPathPoint_rib8_R_1: rib8_R (0.09303 -0.123122 0.147356)
          socket_coordinate=/jointset/L5_S1_IVDjnt/L5_S1_FE range=(-99999.9 99999.9)
      ConditionalPathPoint ConditionalPathPoint_rib8_R_2: rib8_R (0.0732341 -0.105295 0.150056)
          socket_coordinate=/jointset/L5_S1_IVDjnt/L5_S1_FE range=(-99999.9 99999.9)
      ConditionalPathPoint ConditionalPathPoint_rib8_R_3: rib8_R (0.0514577 -0.0863549 0.145147)
          socket_coordinate=/jointset/L5_S1_IVDjnt/L5_S1_FE range=(-99999.9 99999.9)
      ConditionalPathPoint ConditionalPathPoint_rib8_R_4: rib8_R (0.0326501 -0.0707563 0.136673)
          socket_coordinate=/jointset/L5_S1_IVDjnt/L5_S1_FE range=(-99999.9 99999.9)
      ConditionalPathPoint ConditionalPathPoint_rib8_R_5: rib8_R (0.0148313 -0.054044 0.12557)
          socket_coordinate=/jointset/L5_S1_IVDjnt/L5_S1_FE range=(-99999.9 99999.9)
      ConditionalPathPoint ConditionalPathPoint_rib8_R_6: rib8_R (-1.38578e-5 -0.0384457 0.113947)
          socket_coordinate=/jointset/L5_S1_IVDjnt/L5_S1_FE range=(-99999.9 99999.9)
      ConditionalPathPoint ConditionalPathPoint_rib8_R_7: rib8_R (-0.0138718 -0.0228476 0.100561)
          socket_coordinate=/jointset/L5_S1_IVDjnt/L5_S1_FE range=(-99999.9 99999.9)
      PathPoint PathPoint_scapula_R: scapula_R (-0.100964 -0.133699 -0.0814803)
    Thelen2003Muscle SerrAnt9_1_R: max_isometric_force=350.0698 optimal_fiber_length=0.2551514
        tendon_slack_length=0.0001102166 pennation_angle_at_optimal=0
      PathPoint PathPoint_rib9_R: rib9_R (0.0893104 -0.13547 0.143993)
      ConditionalPathPoint ConditionalPathPoint_rib9_R_1: rib9_R (0.0774587 -0.116814 0.149957)
          socket_coordinate=/jointset/L5_S1_IVDjnt/L5_S1_FE range=(-99999.9 99999.9)
      ConditionalPathPoint ConditionalPathPoint_rib9_R_2: rib9_R (0.0566701 -0.094532 0.148697)
          socket_coordinate=/jointset/L5_S1_IVDjnt/L5_S1_FE range=(-99999.9 99999.9)
      ConditionalPathPoint ConditionalPathPoint_rib9_R_3: rib9_R (0.0378641 -0.0733628 0.141175)
          socket_coordinate=/jointset/L5_S1_IVDjnt/L5_S1_FE range=(-99999.9 99999.9)
      ConditionalPathPoint ConditionalPathPoint_rib9_R_4: rib9_R (0.0210383 -0.0521937 0.131171)
          socket_coordinate=/jointset/L5_S1_IVDjnt/L5_S1_FE range=(-99999.9 99999.9)
      ConditionalPathPoint ConditionalPathPoint_rib9_R_5: rib9_R (0.00618838 -0.0321391 0.120085)
          socket_coordinate=/jointset/L5_S1_IVDjnt/L5_S1_FE range=(-99999.9 99999.9)
      ConditionalPathPoint ConditionalPathPoint_rib9_R_6: rib9_R (-0.00766816 -0.0109704 0.107411)
          socket_coordinate=/jointset/L5_S1_IVDjnt/L5_S1_FE range=(-99999.9 99999.9)
      ConditionalPathPoint ConditionalPathPoint_rib9_R_7: rib9_R (-0.0185563 0.00908386 0.0947097)
          socket_coordinate=/jointset/L5_S1_IVDjnt/L5_S1_FE range=(-99999.9 99999.9)
      PathPoint PathPoint_scapula_R: scapula_R (-0.100964 -0.133699 -0.0814803)
    Thelen2003Muscle SerrAnt1_1_L: max_isometric_force=196.8423 optimal_fiber_length=0.1170743
        tendon_slack_length=0.002857232 pennation_angle_at_optimal=0
      PathPoint PathPoint_rib1_L: rib1_L (0.0317747 -0.0442825 -0.0565973)
      ConditionalPathPoint ConditionalPathPoint_rib1_L_1: rib1_L (0.0211902 -0.0370116 -0.0605444)
          socket_coordinate=/jointset/L5_S1_IVDjnt/L5_S1_FE range=(-99999.9 99999.9)
      ConditionalPathPoint ConditionalPathPoint_rib1_L_2: rib1_L (0.00634271 -0.0303269 -0.0663595)
          socket_coordinate=/jointset/L5_S1_IVDjnt/L5_S1_FE range=(-99999.9 99999.9)
      ConditionalPathPoint ConditionalPathPoint_rib1_L_3: rib1_L (-0.0114745 -0.0269846 -0.0696874)
          socket_coordinate=/jointset/L5_S1_IVDjnt/L5_S1_FE range=(-99999.9 99999.9)
      ConditionalPathPoint ConditionalPathPoint_rib1_L_4: rib1_L (-0.0283015 -0.0280989 -0.0653673)
          socket_coordinate=/jointset/L5_S1_IVDjnt/L5_S1_FE range=(-99999.9 99999.9)
      PathPoint PathPoint_scapula_L: scapula_L (-0.0544413 0.0111416 0.0887926)
    Thelen2003Muscle SerrAnt2_1_L: max_isometric_force=261.174 optimal_fiber_length=0.1136477
        tendon_slack_length=0.002773605 pennation_angle_at_optimal=0
      PathPoint PathPoint_rib2_L: rib2_L (0.0620726 -0.0633935 -0.0756019)
      ConditionalPathPoint ConditionalPathPoint_rib2_L_1: rib2_L (0.0474527 -0.0525279 -0.0837809)
          socket_coordinate=/jointset/L5_S1_IVDjnt/L5_S1_FE range=(-99999.9 99999.9)
      ConditionalPathPoint ConditionalPathPoint_rib2_L_2: rib2_L (0.0256782 -0.03916 -0.0922173)
          socket_coordinate=/jointset/L5_S1_IVDjnt/L5_S1_FE range=(-99999.9 99999.9)
      ConditionalPathPoint ConditionalPathPoint_rib2_L_3: rib2_L (-0.0267828 -0.0391605 -0.0936279)
          socket_coordinate=/jointset/L5_S1_IVDjnt/L5_S1_FE range=(-99999.9 99999.9)
      ConditionalPathPoint ConditionalPathPoint_rib2_L_4: rib2_L (-0.0525187 -0.0458445 -0.0731291)
          socket_coordinate=/jointset/L5_S1_IVDjnt/L5_S1_FE range=(-99999.9 99999.9)
      PathPoint PathPoint_scapula_L: scapula_L (-0.0871061 -0.035653 0.100283)
    Thelen2003Muscle SerrAnt2_2_L: max_isometric_force=240.3687 optimal_fiber_length=0.1170395
        tendon_slack_length=0.002856382 pennation_angle_at_optimal=0
      PathPoint PathPoint_rib2_L: rib2_L (0.041107 -0.0525138 -0.0903646)
      ConditionalPathPoint ConditionalPathPoint_rib2_L_1: rib2_L (0.0296383 -0.040274 -0.0901732)
          socket_coordinate=/jointset/L5_S1_IVDjnt/L5_S1_FE range=(-99999.9 99999.9)
      ConditionalPathPoint ConditionalPathPoint_rib2_L_2: rib2_L (0.01578 -0.029132 -0.0894557)
          socket_coordinate=/jointset/L5_S1_IVDjnt/L5_S1_FE range=(-99999.9 99999.9)
      ConditionalPathPoint ConditionalPathPoint_rib2_L_3: rib2_L (-0.00302687 -0.0202196 -0.086924)
          socket_coordinate=/jointset/L5_S1_IVDjnt/L5_S1_FE range=(-99999.9 99999.9)
      ConditionalPathPoint ConditionalPathPoint_rib2_L_4: rib2_L (-0.0178743 -0.0146488 -0.0784217)
          socket_coordinate=/jointset/L5_S1_IVDjnt/L5_S1_FE range=(-99999.9 99999.9)
      PathPoint PathPoint_scapula_L: scapula_L (-0.0544413 0.0111416 0.0887926)
    Thelen2003Muscle SerrAnt3_1_L: max_isometric_force=216.5426 optimal_fiber_length=0.1791995
        tendon_slack_length=0.007504168 pennation_angle_at_optimal=0
      PathPoint PathPoint_rib3_L: rib3_L (0.0830052 -0.0826977 -0.0951546)
      ConditionalPathPoint ConditionalPathPoint_rib3_L_1: rib3_L (0.0753087 -0.0778563 -0.100965)
          socket_coordinate=/jointset/L5_S1_IVDjnt/L5_S1_FE range=(-99999.9 99999.9)
      ConditionalPathPoint ConditionalPathPoint_rib3_L_2: rib3_L (0.0634293 -0.0711711 -0.108602)
          socket_coordinate=/jointset/L5_S1_IVDjnt/L5_S1_FE range=(-99999.9 99999.9)
      ConditionalPathPoint ConditionalPathPoint_rib3_L_3: rib3_L (0.0446213 -0.0689428 -0.120674)
          socket_coordinate=/jointset/L5_S1_IVDjnt/L5_S1_FE range=(-99999.9 99999.9)
      ConditionalPathPoint ConditionalPathPoint_rib3_L_4: rib3_L (-0.00684635 -0.0767432 -0.122927)
          socket_coordinate=/jointset/L5_S1_IVDjnt/L5_S1_FE range=(-99999.9 99999.9)
      ConditionalPathPoint ConditionalPathPoint_rib3_L_5: rib3_L (-0.0335745 -0.0834271 -0.109107)
          socket_coordinate=/jointset/L5_S1_IVDjnt/L5_S1_FE range=(-99999.9 99999.9)
      ConditionalPathPoint ConditionalPathPoint_rib3_L_6: rib3_L (-0.0523809 -0.0889982 -0.0924443)
          socket_coordinate=/jointset/L5_S1_IVDjnt/L5_S1_FE range=(-99999.9 99999.9)
      ConditionalPathPoint ConditionalPathPoint_rib3_L_7: rib3_L (-0.0632694 -0.0923387 -0.0768153)
          socket_coordinate=/jointset/L5_S1_IVDjnt/L5_S1_FE range=(-99999.9 99999.9)
      PathPoint PathPoint_scapula_L: scapula_L (-0.0989842 -0.100274 0.100283)
    Thelen2003Muscle SerrAnt4_1_L: max_isometric_force=295.2639 optimal_fiber_length=0.1777327
        tendon_slack_length=0.007442742 pennation_angle_at_optimal=0
      PathPoint PathPoint_rib4_L: rib4_L (0.0996237 -0.0998718 -0.107806)
      ConditionalPathPoint ConditionalPathPoint_rib4_L_1: rib4_L (0.0905703 -0.0961102 -0.115284)
          socket_coordinate=/jointset/L5_S1_IVDjnt/L5_S1_FE range=(-99999.9 99999.9)
      ConditionalPathPoint ConditionalPathPoint_rib4_L_2: rib4_L (0.0777028 -0.0949966 -0.125007)
          socket_coordinate=/jointset/L5_S1_IVDjnt/L5_S1_FE range=(-99999.9 99999.9)
      ConditionalPathPoint ConditionalPathPoint_rib4_L_3: rib4_L (0.0509771 -0.0949962 -0.136631)
          socket_coordinate=/jointset/L5_S1_IVDjnt/L5_S1_FE range=(-99999.9 99999.9)
      ConditionalPathPoint ConditionalPathPoint_rib4_L_4: rib4_L (0.0123692 -0.100566 -0.133298)
          socket_coordinate=/jointset/L5_S1_IVDjnt/L5_S1_FE range=(-99999.9 99999.9)
      ConditionalPathPoint ConditionalPathPoint_rib4_L_5: rib4_L (-0.0113863 -0.105022 -0.121916)
          socket_coordinate=/jointset/L5_S1_IVDjnt/L5_S1_FE range=(-99999.9 99999.9)
      ConditionalPathPoint ConditionalPathPoint_rib4_L_6: rib4_L (-0.0282112 -0.107252 -0.109644)
          socket_coordinate=/jointset/L5_S1_IVDjnt/L5_S1_FE range=(-99999.9 99999.9)
      ConditionalPathPoint ConditionalPathPoint_rib4_L_7: rib4_L (-0.0420696 -0.109481 -0.0965484)
          socket_coordinate=/jointset/L5_S1_IVDjnt/L5_S1_FE range=(-99999.9 99999.9)
      PathPoint PathPoint_scapula_L: scapula_L (-0.100964 -0.133699 0.0814803)
    Thelen2003Muscle SerrAnt5_1_L: max_isometric_force=232.6403 optimal_fiber_length=0.1810309
        tendon_slack_length=0.007580859 pennation_angle_at_optimal=0
      PathPoint PathPoint_rib5_L: rib5_L (0.112927 -0.114661 -0.116991)
      ConditionalPathPoint ConditionalPathPoint_rib5_L_1: rib5_L (0.102519 -0.108574 -0.124368)
          socket_coordinate=/jointset/L5_S1_IVDjnt/L5_S1_FE range=(-99999.9 99999.9)
      ConditionalPathPoint ConditionalPathPoint_rib5_L_2: rib5_L (0.0847012 -0.104117 -0.134075)
          socket_coordinate=/jointset/L5_S1_IVDjnt/L5_S1_FE range=(-99999.9 99999.9)
      ConditionalPathPoint ConditionalPathPoint_rib5_L_3: rib5_L (0.054014 -0.100774 -0.140252)
          socket_coordinate=/jointset/L5_S1_IVDjnt/L5_S1_FE range=(-99999.9 99999.9)
      ConditionalPathPoint ConditionalPathPoint_rib5_L_4: rib5_L (0.0213514 -0.09966 -0.132935)
          socket_coordinate=/jointset/L5_S1_IVDjnt/L5_S1_FE range=(-99999.9 99999.9)
      ConditionalPathPoint ConditionalPathPoint_rib5_L_5: rib5_L (-0.00141603 -0.0963174 -0.120527)
          socket_coordinate=/jointset/L5_S1_IVDjnt/L5_S1_FE range=(-99999.9 99999.9)
      ConditionalPathPoint ConditionalPathPoint_rib5_L_6: rib5_L (-0.0192338 -0.092975 -0.107105)
          socket_coordinate=/jointset/L5_S1_IVDjnt/L5_S1_FE range=(-99999.9 99999.9)
      ConditionalPathPoint ConditionalPathPoint_rib5_L_7: rib5_L (-0.0340812 -0.0885178 -0.0918649)
          socket_coordinate=/jointset/L5_S1_IVDjnt/L5_S1_FE range=(-99999.9 99999.9)
      PathPoint PathPoint_scapula_L: scapula_L (-0.100964 -0.133699 0.0814803)
    Thelen2003Muscle SerrAnt6_1_L: max_isometric_force=324.5034 optimal_fiber_length=0.1851711
        tendon_slack_length=0.007754234 pennation_angle_at_optimal=0
      PathPoint PathPoint_rib6_L: rib6_L (0.117194 -0.127135 -0.124955)
      ConditionalPathPoint ConditionalPathPoint_rib6_L_1: rib6_L (0.105863 -0.117614 -0.131961)
          socket_coordinate=/jointset/L5_S1_IVDjnt/L5_S1_FE range=(-99999.9 99999.9)
      ConditionalPathPoint ConditionalPathPoint_rib6_L_2: rib6_L (0.0890322 -0.107586 -0.139209)
          socket_coordinate=/jointset/L5_S1_IVDjnt/L5_S1_FE range=(-99999.9 99999.9)
      ConditionalPathPoint ConditionalPathPoint_rib6_L_3: rib6_L (0.0583489 -0.0997871 -0.142438)
          socket_coordinate=/jointset/L5_S1_IVDjnt/L5_S1_FE range=(-99999.9 99999.9)
      ConditionalPathPoint ConditionalPathPoint_rib6_L_4: rib6_L (0.0316226 -0.0919881 -0.13478)
          socket_coordinate=/jointset/L5_S1_IVDjnt/L5_S1_FE range=(-99999.9 99999.9)
      ConditionalPathPoint ConditionalPathPoint_rib6_L_5: rib6_L (0.00984395 -0.084189 -0.123424)
          socket_coordinate=/jointset/L5_S1_IVDjnt/L5_S1_FE range=(-99999.9 99999.9)
      ConditionalPathPoint ConditionalPathPoint_rib6_L_6: rib6_L (-0.00797085 -0.0752759 -0.110687)
          socket_coordinate=/jointset/L5_S1_IVDjnt/L5_S1_FE range=(-99999.9 99999.9)
      ConditionalPathPoint ConditionalPathPoint_rib6_L_7: rib6_L (-0.0228184 -0.0674767 -0.0966383)
          socket_coordinate=/jointset/L5_S1_IVDjnt/L5_S1_FE range=(-99999.9 99999.9)
      PathPoint PathPoint_scapula_L: scapula_L (-0.100964 -0.133699 0.0814803)
    Thelen2003Muscle SerrAnt7_1_L: max_isometric_force=411.66 optimal_fiber_length=0.2442798
        tendon_slack_length=0.0001055204 pennation_angle_at_optimal=0
      PathPoint PathPoint_rib7_L: rib7_L (0.118092 -0.136921 -0.134108)
      ConditionalPathPoint ConditionalPathPoint_rib7_L_1: rib7_L (0.107629 -0.123052 -0.139599)
          socket_coordinate=/jointset/L5_S1_IVDjnt/L5_S1_FE range=(-99999.9 99999.9)
      ConditionalPathPoint ConditionalPathPoint_rib7_L_2: rib7_L (0.0888217 -0.108571 -0.145138)
          socket_coordinate=/jointset/L5_S1_IVDjnt/L5_S1_FE range=(-99999.9 99999.9)
      ConditionalPathPoint ConditionalPathPoint_rib7_L_3: rib7_L (0.062096 -0.0952005 -0.144497)
          socket_coordinate=/jointset/L5_S1_IVDjnt/L5_S1_FE range=(-99999.9 99999.9)
      ConditionalPathPoint ConditionalPathPoint_rib7_L_4: rib7_L (0.0383395 -0.0829448 -0.136883)
          socket_coordinate=/jointset/L5_S1_IVDjnt/L5_S1_FE range=(-99999.9 99999.9)
      ConditionalPathPoint ConditionalPathPoint_rib7_L_5: rib7_L (0.0175504 -0.0706893 -0.125902)
          socket_coordinate=/jointset/L5_S1_IVDjnt/L5_S1_FE range=(-99999.9 99999.9)
      ConditionalPathPoint ConditionalPathPoint_rib7_L_6: rib7_L (0.000724065 -0.058434 -0.113971)
          socket_coordinate=/jointset/L5_S1_IVDjnt/L5_S1_FE range=(-99999.9 99999.9)
      ConditionalPathPoint ConditionalPathPoint_rib7_L_7: rib7_L (-0.0151135 -0.0461784 -0.0995823)
          socket_coordinate=/jointset/L5_S1_IVDjnt/L5_S1_FE range=(-99999.9 99999.9)
      PathPoint PathPoint_scapula_L: scapula_L (-0.100964 -0.133699 0.0814803)
    Thelen2003Muscle SerrAnt8_1_L: max_isometric_force=453.307 optimal_fiber_length=0.2500331
        tendon_slack_length=0.0001080057 pennation_angle_at_optimal=0
      PathPoint PathPoint_rib8_L: rib8_L (0.104244 -0.138178 -0.141424)
      ConditionalPathPoint ConditionalPathPoint_rib8_L_1: rib8_L (0.09303 -0.123122 -0.147356)
          socket_coordinate=/jointset/L5_S1_IVDjnt/L5_S1_FE range=(-99999.9 99999.9)
      ConditionalPathPoint ConditionalPathPoint_rib8_L_2: rib8_L (0.0732341 -0.105295 -0.150056)
          socket_coordinate=/jointset/L5_S1_IVDjnt/L5_S1_FE range=(-99999.9 99999.9)
      ConditionalPathPoint ConditionalPathPoint_rib8_L_3: rib8_L (0.0514577 -0.0863549 -0.145147)
          socket_coordinate=/jointset/L5_S1_IVDjnt/L5_S1_FE range=(-99999.9 99999.9)
      ConditionalPathPoint ConditionalPathPoint_rib8_L_4: rib8_L (0.0326501 -0.0707563 -0.136673)
          socket_coordinate=/jointset/L5_S1_IVDjnt/L5_S1_FE range=(-99999.9 99999.9)
      ConditionalPathPoint ConditionalPathPoint_rib8_L_5: rib8_L (0.0148313 -0.054044 -0.12557)
          socket_coordinate=/jointset/L5_S1_IVDjnt/L5_S1_FE range=(-99999.9 99999.9)
      ConditionalPathPoint ConditionalPathPoint_rib8_L_6: rib8_L (-1.38578e-5 -0.0384457 -0.113947)
          socket_coordinate=/jointset/L5_S1_IVDjnt/L5_S1_FE range=(-99999.9 99999.9)
      ConditionalPathPoint ConditionalPathPoint_rib8_L_7: rib8_L (-0.0138718 -0.0228476 -0.100561)
          socket_coordinate=/jointset/L5_S1_IVDjnt/L5_S1_FE range=(-99999.9 99999.9)
      PathPoint PathPoint_scapula_L: scapula_L (-0.100964 -0.133699 0.0814803)
    Thelen2003Muscle SerrAnt9_1_L: max_isometric_force=350.0698 optimal_fiber_length=0.2551518
        tendon_slack_length=0.0001102168 pennation_angle_at_optimal=0
      PathPoint PathPoint_rib9_L: rib9_L (0.0893104 -0.13547 -0.143993)
      ConditionalPathPoint ConditionalPathPoint_rib9_L_1: rib9_L (0.0774587 -0.116814 -0.149957)
          socket_coordinate=/jointset/L5_S1_IVDjnt/L5_S1_FE range=(-99999.9 99999.9)
      ConditionalPathPoint ConditionalPathPoint_rib9_L_2: rib9_L (0.0566701 -0.094532 -0.148697)
          socket_coordinate=/jointset/L5_S1_IVDjnt/L5_S1_FE range=(-99999.9 99999.9)
      ConditionalPathPoint ConditionalPathPoint_rib9_L_3: rib9_L (0.0378641 -0.0733628 -0.141175)
          socket_coordinate=/jointset/L5_S1_IVDjnt/L5_S1_FE range=(-99999.9 99999.9)
      ConditionalPathPoint ConditionalPathPoint_rib9_L_4: rib9_L (0.0210383 -0.0521937 -0.131171)
          socket_coordinate=/jointset/L5_S1_IVDjnt/L5_S1_FE range=(-99999.9 99999.9)
      ConditionalPathPoint ConditionalPathPoint_rib9_L_5: rib9_L (0.00618838 -0.0321391 -0.120085)
          socket_coordinate=/jointset/L5_S1_IVDjnt/L5_S1_FE range=(-99999.9 99999.9)
      ConditionalPathPoint ConditionalPathPoint_rib9_L_6: rib9_L (-0.00766816 -0.0109704 -0.107411)
          socket_coordinate=/jointset/L5_S1_IVDjnt/L5_S1_FE range=(-99999.9 99999.9)
      ConditionalPathPoint ConditionalPathPoint_rib9_L_7: rib9_L (-0.0185563 0.00908386 -0.0947097)
          socket_coordinate=/jointset/L5_S1_IVDjnt/L5_S1_FE range=(-99999.9 99999.9)
      PathPoint PathPoint_scapula_L: scapula_L (-0.100964 -0.133699 0.0814803)
    Thelen2003Muscle DELT1: optimal_force=1 max_isometric_force=1599.64 optimal_fiber_length=0.1048962
        tendon_slack_length=0.09995229 pennation_angle_at_optimal=0.38397 max_contraction_velocity=10
        default_activation=0.05 default_fiber_length=0.1 FmaxTendonStrain=0.033 FmaxMuscleStrain=0.6 KshapeActive=0.5
        KshapePassive=4 Af=0.3 Flen=1.8 activation_time_constant=0.01 [seconds]
        deactivation_time_constant=0.04 [seconds]
      PathPoint PathPoint_humerus_R: humerus_R (0.00995932 -0.132083 0.00650246)
      PathPoint PathPoint_humerus_R_0: humerus_R (0.0180401 -0.122635 0.00457951)
      PathPoint PathPoint_clavicle_R: clavicle_R (0.028844 -0.0138713 0.142622)
      PathPoint PathPoint_clavicle_R_0: clavicle_R (-0.0138578 0.0123226 0.0837889)
    Thelen2003Muscle DELT2: optimal_force=1 max_isometric_force=1599.64 optimal_fiber_length=0.1189316
        tendon_slack_length=0.1208071 pennation_angle_at_optimal=0.2618 max_contraction_velocity=10
        default_activation=0.05 default_fiber_length=0.1 FmaxTendonStrain=0.033 FmaxMuscleStrain=0.6 KshapeActive=0.5
        KshapePassive=4 Af=0.3 Flen=1.8 activation_time_constant=0.01 deactivation_time_constant=0.04
      PathPoint PathPoint_humerus_R: humerus_R (0.00512416 -0.15129 0.00622457)
      PathPoint PathPoint_humerus_R_0: humerus_R (-0.00231198 -0.0598115 0.0206634)
      PathPoint PathPoint_scapula_R: scapula_R (4.94921e-5 0.00327562 0.0233263)
      PathPoint PathPoint_scapula_R_0: scapula_R (-0.0106705 -0.000378814 0.00647664)
    Thelen2003Muscle DELT3: optimal_force=1 max_isometric_force=363.832 optimal_fiber_length=0.1457366
        tendon_slack_length=0.04051202 pennation_angle_at_optimal=0.31416 max_contraction_velocity=10
        default_activation=0.05 default_fiber_length=0.1 FmaxTendonStrain=0.033 FmaxMuscleStrain=0.6 KshapeActive=0.5
        KshapePassive=4 Af=0.3 Flen=1.8 activation_time_constant=0.01 deactivation_time_constant=0.04
      PathPoint PathPoint_scapula_R: scapula_R (-0.0551639 0.00135927 -0.0262408)
      PathPoint PathPoint_scapula_R_0: scapula_R (-0.0717339 -0.0366001 0.0128801)
      PathPoint PathPoint_humerus_R: humerus_R (0.00228975 -0.0844986 0.0116155)
    Thelen2003Muscle SUPSP: optimal_force=1 max_isometric_force=682.948 optimal_fiber_length=0.07247915
        tendon_slack_length=0.04197839 pennation_angle_at_optimal=0.12217 max_contraction_velocity=10
        default_activation=0.05 default_fiber_length=0.1 FmaxTendonStrain=0.033 FmaxMuscleStrain=0.6 KshapeActive=0.5
        KshapePassive=4 Af=0.3 Flen=1.8 activation_time_constant=0.01 deactivation_time_constant=0.04
      PathPoint PathPoint_humerus_R: humerus_R (0.00284552 0.0118156 0.028822)
      PathPoint PathPoint_scapula_R: scapula_R (-0.0189852 0.00141498 -0.0132771)
      PathPoint PathPoint_scapula_R_0: scapula_R (-0.0435531 -0.0168461 -0.0611624)
    Thelen2003Muscle INFSP: optimal_force=1 max_isometric_force=1695.176 optimal_fiber_length=0.07854376
        tendon_slack_length=0.03204169 pennation_angle_at_optimal=0.32289 max_contraction_velocity=10
        default_activation=0.05 default_fiber_length=0.1 FmaxTendonStrain=0.033 FmaxMuscleStrain=0.6 KshapeActive=0.5
        KshapePassive=4 Af=0.3 Flen=1.8 activation_time_constant=0.01 deactivation_time_constant=0.04
      PathPoint PathPoint_humerus_R: humerus_R (-0.00985928 0.00537981 0.0272103)
      PathPoint PathPoint_scapula_R: scapula_R (-0.0730701 -0.0610113 -0.0499432)
    Thelen2003Muscle SUBSC: optimal_force=1 max_isometric_force=1928.934 optimal_fiber_length=0.09036796
        tendon_slack_length=0.03415971 pennation_angle_at_optimal=0.34907 max_contraction_velocity=10
        default_activation=0.05 default_fiber_length=0.1 FmaxTendonStrain=0.033 FmaxMuscleStrain=0.6 KshapeActive=0.5
        KshapePassive=4 Af=0.3 Flen=1.8 activation_time_constant=0.01 deactivation_time_constant=0.04
      PathPoint PathPoint_humerus_R: humerus_R (0.0155948 0.00933686 -0.0147945)
      PathPoint PathPoint_scapula_R: scapula_R (-0.018124 -0.0581925 -0.0256663)
      PathPoint PathPoint_scapula_R_0: scapula_R (-0.071724 -0.0439312 -0.0676391)
    Thelen2003Muscle TMIN: optimal_force=1 max_isometric_force=495.95 optimal_fiber_length=0.076406
        tendon_slack_length=0.07351887 pennation_angle_at_optimal=0.41888 max_contraction_velocity=10
        default_activation=0.05 default_fiber_length=0.1 FmaxTendonStrain=0.033 FmaxMuscleStrain=0.6 KshapeActive=0.5
        KshapePassive=4 Af=0.3 Flen=1.8 activation_time_constant=0.01 deactivation_time_constant=0.04
      PathPoint PathPoint_humerus_R: humerus_R (-0.00122268 -0.0140498 0.0239646)
      PathPoint PathPoint_scapula_R: scapula_R (-0.0937677 -0.0890323 -0.0494836)
      PathPoint PathPoint_scapula_R_0: scapula_R (-0.0954505 -0.0904807 -0.0553439)
    Thelen2003Muscle TMAJ: optimal_force=1 max_isometric_force=595.546 optimal_fiber_length=0.1653744
        tendon_slack_length=0.0203663 pennation_angle_at_optimal=0.27925 max_contraction_velocity=10
        default_activation=0.05 default_fiber_length=0.1 FmaxTendonStrain=0.033 FmaxMuscleStrain=0.6 KshapeActive=0.5
        KshapePassive=4 Af=0.3 Flen=1.8 activation_time_constant=0.01 deactivation_time_constant=0.04
      PathPoint PathPoint_humerus_R: humerus_R (0.0110931 -0.0602339 -0.0063135)
      PathPoint PathPoint_scapula_R: scapula_R (-0.101597 -0.11497 -0.0608908)
      PathPoint PathPoint_scapula_R_0: scapula_R (-0.103825 -0.121387 -0.0743455)
    Thelen2003Muscle PECM1: optimal_force=1 max_isometric_force=450.6702 optimal_fiber_length=0.1528857
        tendon_slack_length=0.003185118 pennation_angle_at_optimal=0.29671 max_contraction_velocity=10
        default_activation=0.05 default_fiber_length=0.1 FmaxTendonStrain=0.033 FmaxMuscleStrain=0.6 KshapeActive=0.5
        KshapePassive=4 Af=0.3 Flen=1.8 activation_time_constant=0.01 deactivation_time_constant=0.04
      PathPoint PathPoint_humerus_R: humerus_R (0.0129938 -0.0465843 0.00866994)
      PathPoint PathPoint_humerus_R_0: humerus_R (0.0179512 -0.0449614 -0.00641353)
      PathPoint PathPoint_clavicle_R: clavicle_R (0.00322194 -0.0245338 0.105695)
      PathPoint PathPoint_clavicle_R_0: clavicle_R (0.00317739 -0.00014484 0.0534114)
    Thelen2003Muscle PECM2: optimal_force=1 max_isometric_force=641.3384 optimal_fiber_length=0.1437784
        tendon_slack_length=0.09272664 pennation_angle_at_optimal=0.43633 max_contraction_velocity=10
        default_activation=0.05 default_fiber_length=0.1 FmaxTendonStrain=0.033 FmaxMuscleStrain=0.6 KshapeActive=0.5
        KshapePassive=4 Af=0.3 Flen=1.8 activation_time_constant=0.01 deactivation_time_constant=0.04
      PathPoint PathPoint_humerus_R: humerus_R (0.0141609 -0.0476736 0.00872552)
      PathPoint PathPoint_humerus_R_0: humerus_R (0.0161505 -0.0507747 -0.00763622)
      ConditionalPathPoint ConditionalPathPoint_sternum_1: sternum (-0.0108883 -0.0523654 0.0783464)
          socket_coordinate=/jointset/L5_S1_IVDjnt/L5_S1_FE range=(-99999.9 99999.9)
      ConditionalPathPoint ConditionalPathPoint_sternum_2: sternum (0.0148476 -0.0456805 0.0282047)
          socket_coordinate=/jointset/L5_S1_IVDjnt/L5_S1_FE range=(-99999.9 99999.9)
      PathPoint PathPoint_sternum: sternum (0.0218161 -0.0387404 -0.0226578)
    Thelen2003Muscle PECM3: optimal_force=1 max_isometric_force=485.3372 optimal_fiber_length=0.1439427
        tendon_slack_length=0.1376844 pennation_angle_at_optimal=0.43633 max_contraction_velocity=10
        default_activation=0.05 default_fiber_length=0.1 FmaxTendonStrain=0.033 FmaxMuscleStrain=0.6 KshapeActive=0.5
        KshapePassive=4 Af=0.3 Flen=1.8 activation_time_constant=0.01 deactivation_time_constant=0.04
      PathPoint PathPoint_humerus_R: humerus_R (0.0141053 -0.0486295 0.00833648)
      PathPoint PathPoint_humerus_R_0: humerus_R (0.0138163 -0.0573217 -0.0200854)
      ConditionalPathPoint ConditionalPathPoint_sternum_1: sternum (0.00197968 -0.103617 0.0835695)
          socket_coordinate=/jointset/L5_S1_IVDjnt/L5_S1_FE range=(-99999.9 99999.9)
      ConditionalPathPoint ConditionalPathPoint_sternum_2: sternum (0.0296953 -0.119215 0.0553648)
          socket_coordinate=/jointset/L5_S1_IVDjnt/L5_S1_FE range=(-99999.9 99999.9)
      PathPoint PathPoint_sternum: sternum (0.0507601 -0.134011 -0.014938)
    Thelen2003Muscle CORB: optimal_force=1 max_isometric_force=339.444 optimal_fiber_length=0.103083
        tendon_slack_length=0.1072859 pennation_angle_at_optimal=0 max_contraction_velocity=10 default_activation=0.05
        default_fiber_length=0.1 FmaxTendonStrain=0.033 FmaxMuscleStrain=0.6 KshapeActive=0.5 KshapePassive=4 Af=0.3
        Flen=1.8 activation_time_constant=0.01 deactivation_time_constant=0.04
      PathPoint PathPoint_scapula_R: scapula_R (0.012373 -0.0459813 -0.0277033)
      PathPoint PathPoint_scapula_R_0: scapula_R (0.00478094 -0.0775231 -0.0163274)
      PathPoint PathPoint_humerus_R: humerus_R (0.00825868 -0.167263 -0.00869217)
    Thelen2003Muscle DELT1_l: optimal_force=1 max_isometric_force=1599.64 optimal_fiber_length=0.1048962
        tendon_slack_length=0.09995229 pennation_angle_at_optimal=0.38397 max_contraction_velocity=10
        default_activation=0.05 default_fiber_length=0.1 FmaxTendonStrain=0.033 FmaxMuscleStrain=0.6 KshapeActive=0.5
        KshapePassive=4 Af=0.3 Flen=1.8 activation_time_constant=0.01 deactivation_time_constant=0.04
      PathPoint PathPoint_humerus_L: humerus_L (0.00995932 -0.132083 -0.00650246)
      PathPoint PathPoint_humerus_L_0: humerus_L (0.0180401 -0.122635 -0.00457951)
      PathPoint PathPoint_clavicle_L: clavicle_L (0.028844 -0.0138713 -0.142622)
      PathPoint PathPoint_clavicle_L_0: clavicle_L (-0.0138578 0.0123226 -0.0837889)
    Thelen2003Muscle DELT2_l: optimal_force=1 max_isometric_force=1599.64 optimal_fiber_length=0.1189316
        tendon_slack_length=0.1208071 pennation_angle_at_optimal=0.2618 max_contraction_velocity=10
        default_activation=0.05 default_fiber_length=0.1 FmaxTendonStrain=0.033 FmaxMuscleStrain=0.6 KshapeActive=0.5
        KshapePassive=4 Af=0.3 Flen=1.8 activation_time_constant=0.01 deactivation_time_constant=0.04
      PathPoint PathPoint_humerus_L: humerus_L (0.00512416 -0.15129 -0.00622457)
      PathPoint PathPoint_humerus_L_0: humerus_L (-0.00231198 -0.0598115 -0.0206634)
      PathPoint PathPoint_scapula_L: scapula_L (4.94921e-5 0.00327562 -0.0233263)
      PathPoint PathPoint_scapula_L_0: scapula_L (-0.0106705 -0.000378814 -0.00647664)
    Thelen2003Muscle DELT3_l: optimal_force=1 max_isometric_force=363.832 optimal_fiber_length=0.1457366
        tendon_slack_length=0.04051202 pennation_angle_at_optimal=0.31416 max_contraction_velocity=10
        default_activation=0.05 default_fiber_length=0.1 FmaxTendonStrain=0.033 FmaxMuscleStrain=0.6 KshapeActive=0.5
        KshapePassive=4 Af=0.3 Flen=1.8 activation_time_constant=0.01 deactivation_time_constant=0.04
      PathPoint PathPoint_scapula_L: scapula_L (-0.0551639 0.00135927 0.0262408)
      PathPoint PathPoint_scapula_L_0: scapula_L (-0.0717339 -0.0366001 -0.0128801)
      PathPoint PathPoint_humerus_L: humerus_L (0.00228975 -0.0844986 -0.0116155)
    Thelen2003Muscle SUPSP_l: optimal_force=1 max_isometric_force=682.948 optimal_fiber_length=0.07247915
        tendon_slack_length=0.04197839 pennation_angle_at_optimal=0.12217 max_contraction_velocity=10
        default_activation=0.05 default_fiber_length=0.1 FmaxTendonStrain=0.033 FmaxMuscleStrain=0.6 KshapeActive=0.5
        KshapePassive=4 Af=0.3 Flen=1.8 activation_time_constant=0.01 deactivation_time_constant=0.04
      PathPoint PathPoint_humerus_L: humerus_L (0.00284552 0.0118156 -0.028822)
      PathPoint PathPoint_scapula_L: scapula_L (-0.0189852 0.00141498 0.0132771)
      PathPoint PathPoint_scapula_L_0: scapula_L (-0.0435531 -0.0168461 0.0611624)
    Thelen2003Muscle INFSP_l: optimal_force=1 max_isometric_force=1695.176 optimal_fiber_length=0.07854376
        tendon_slack_length=0.03204169 pennation_angle_at_optimal=0.32289 max_contraction_velocity=10
        default_activation=0.05 default_fiber_length=0.1 FmaxTendonStrain=0.033 FmaxMuscleStrain=0.6 KshapeActive=0.5
        KshapePassive=4 Af=0.3 Flen=1.8 activation_time_constant=0.01 deactivation_time_constant=0.04
      PathPoint PathPoint_humerus_L: humerus_L (-0.00985928 0.00537981 -0.0272103)
      PathPoint PathPoint_scapula_L: scapula_L (-0.0730701 -0.0610113 0.0499432)
    Thelen2003Muscle SUBSC_l: optimal_force=1 max_isometric_force=1928.934 optimal_fiber_length=0.09036796
        tendon_slack_length=0.03415971 pennation_angle_at_optimal=0.34907 max_contraction_velocity=10
        default_activation=0.05 default_fiber_length=0.1 FmaxTendonStrain=0.033 FmaxMuscleStrain=0.6 KshapeActive=0.5
        KshapePassive=4 Af=0.3 Flen=1.8 activation_time_constant=0.01 deactivation_time_constant=0.04
      PathPoint PathPoint_humerus_L: humerus_L (0.0155948 0.00933686 0.0147945)
      PathPoint PathPoint_scapula_L: scapula_L (-0.018124 -0.0581925 0.0256663)
      PathPoint PathPoint_scapula_L_0: scapula_L (-0.071724 -0.0439312 0.0676391)
    Thelen2003Muscle TMIN_l: optimal_force=1 max_isometric_force=495.95 optimal_fiber_length=0.076406
        tendon_slack_length=0.07351887 pennation_angle_at_optimal=0.41888 max_contraction_velocity=10
        default_activation=0.05 default_fiber_length=0.1 FmaxTendonStrain=0.033 FmaxMuscleStrain=0.6 KshapeActive=0.5
        KshapePassive=4 Af=0.3 Flen=1.8 activation_time_constant=0.01 deactivation_time_constant=0.04
      PathPoint PathPoint_humerus_L: humerus_L (-0.00122268 -0.0140498 -0.0239646)
      PathPoint PathPoint_scapula_L: scapula_L (-0.0937677 -0.0890323 0.0494836)
      PathPoint PathPoint_scapula_L_0: scapula_L (-0.0954505 -0.0904807 0.0553439)
    Thelen2003Muscle TMAJ_l: optimal_force=1 max_isometric_force=595.546 optimal_fiber_length=0.1653744
        tendon_slack_length=0.0203663 pennation_angle_at_optimal=0.27925 max_contraction_velocity=10
        default_activation=0.05 default_fiber_length=0.1 FmaxTendonStrain=0.033 FmaxMuscleStrain=0.6 KshapeActive=0.5
        KshapePassive=4 Af=0.3 Flen=1.8 activation_time_constant=0.01 deactivation_time_constant=0.04
      PathPoint PathPoint_humerus_L: humerus_L (0.0110931 -0.0602339 0.0063135)
      PathPoint PathPoint_scapula_L: scapula_L (-0.101597 -0.11497 0.0608908)
      PathPoint PathPoint_scapula_L_0: scapula_L (-0.103825 -0.121387 0.0743455)
    Thelen2003Muscle PECM1_l: optimal_force=1 max_isometric_force=450.6702 optimal_fiber_length=0.1528857
        tendon_slack_length=0.003185118 pennation_angle_at_optimal=0.29671 max_contraction_velocity=10
        default_activation=0.05 default_fiber_length=0.1 FmaxTendonStrain=0.033 FmaxMuscleStrain=0.6 KshapeActive=0.5
        KshapePassive=4 Af=0.3 Flen=1.8 activation_time_constant=0.01 deactivation_time_constant=0.04
      PathPoint PathPoint_humerus_L: humerus_L (0.0129938 -0.0465843 -0.00866994)
      PathPoint PathPoint_humerus_L_0: humerus_L (0.0179512 -0.0449614 0.00641353)
      PathPoint PathPoint_clavicle_L: clavicle_L (0.00322194 -0.0245338 -0.105695)
      PathPoint PathPoint_clavicle_L_0: clavicle_L (0.00317739 -0.00014484 -0.0534114)
    Thelen2003Muscle PECM2_l: optimal_force=1 max_isometric_force=641.3384 optimal_fiber_length=0.1437784
        tendon_slack_length=0.09272664 pennation_angle_at_optimal=0.43633 max_contraction_velocity=10
        default_activation=0.05 default_fiber_length=0.1 FmaxTendonStrain=0.033 FmaxMuscleStrain=0.6 KshapeActive=0.5
        KshapePassive=4 Af=0.3 Flen=1.8 activation_time_constant=0.01 deactivation_time_constant=0.04
      PathPoint PathPoint_humerus_L: humerus_L (0.0141609 -0.0476736 -0.00872552)
      PathPoint PathPoint_humerus_L_0: humerus_L (0.0161505 -0.0507747 0.00763622)
      ConditionalPathPoint ConditionalPathPoint_sternum_1: sternum (-0.0108883 -0.0523654 -0.14844)
          socket_coordinate=/jointset/L5_S1_IVDjnt/L5_S1_FE range=(-99999.9 99999.9)
      ConditionalPathPoint ConditionalPathPoint_sternum_2: sternum (0.0148476 -0.0456805 -0.0982986)
          socket_coordinate=/jointset/L5_S1_IVDjnt/L5_S1_FE range=(-99999.9 99999.9)
      PathPoint PathPoint_sternum: sternum (0.0218161 -0.0387404 -0.0474257)
    Thelen2003Muscle PECM3_l: optimal_force=1 max_isometric_force=485.3372 optimal_fiber_length=0.1439427
        tendon_slack_length=0.1376844 pennation_angle_at_optimal=0.43633 max_contraction_velocity=10
        default_activation=0.05 default_fiber_length=0.1 FmaxTendonStrain=0.033 FmaxMuscleStrain=0.6 KshapeActive=0.5
        KshapePassive=4 Af=0.3 Flen=1.8 activation_time_constant=0.01 deactivation_time_constant=0.04
      PathPoint PathPoint_humerus_L: humerus_L (0.0141053 -0.0486295 -0.00833648)
      PathPoint PathPoint_humerus_L_0: humerus_L (0.0138163 -0.0573217 0.0200854)
      ConditionalPathPoint ConditionalPathPoint_sternum_1: sternum (0.00197968 -0.103617 -0.153663)
          socket_coordinate=/jointset/L5_S1_IVDjnt/L5_S1_FE range=(-99999.9 99999.9)
      ConditionalPathPoint ConditionalPathPoint_sternum_2: sternum (0.0296953 -0.119215 -0.125459)
          socket_coordinate=/jointset/L5_S1_IVDjnt/L5_S1_FE range=(-99999.9 99999.9)
      PathPoint PathPoint_sternum: sternum (0.0507601 -0.134011 -0.0551559)
    Thelen2003Muscle CORB_l: optimal_force=1 max_isometric_force=339.444 optimal_fiber_length=0.103083
        tendon_slack_length=0.1072859 pennation_angle_at_optimal=0 max_contraction_velocity=10 default_activation=0.05
        default_fiber_length=0.1 FmaxTendonStrain=0.033 FmaxMuscleStrain=0.6 KshapeActive=0.5 KshapePassive=4 Af=0.3
        Flen=1.8 activation_time_constant=0.01 deactivation_time_constant=0.04
      PathPoint PathPoint_scapula_L: scapula_L (0.012373 -0.0459813 0.0277033)
      PathPoint PathPoint_scapula_L_0: scapula_L (0.00478094 -0.0775231 0.0163274)
      PathPoint PathPoint_humerus_L: humerus_L (0.00825868 -0.167263 0.00869217)
    Thelen2003Muscle TR1_l: max_isometric_force=224 optimal_fiber_length=0.07826112 tendon_slack_length=0.04717109
        pennation_angle_at_optimal=0
      PathPoint P1: Abdomen (0.00683732 0.0646211 -0.0340324)
      PathPoint P2: rib9_L (0.109439 -0.154377 -0.125012)
    Thelen2003Muscle TR2_l: max_isometric_force=88.2 optimal_fiber_length=0.151036 tendon_slack_length=0.1183796
        pennation_angle_at_optimal=0
      PathPoint P1: lumbar2 (-0.0227664 0.0173896 -0.0240262)
      PathPoint P2: Abdomen (0.00755027 0.0267398 -0.0401588)
      PathWrap: wrap_object=Cylinder9 method=hybrid range=(1 2)
    Thelen2003Muscle TR3_l: max_isometric_force=88.2 optimal_fiber_length=0.1503158 tendon_slack_length=0.07922048
        pennation_angle_at_optimal=0
      PathPoint P1: lumbar3 (-0.0257359 0.024817 -0.0313386)
      PathPoint P2: Abdomen (0.00706823 -0.00557079 -0.0458646)
      PathWrap: wrap_object=Cylinder10 method=hybrid range=(1 2)
    Thelen2003Muscle TR4_l: max_isometric_force=88.2 optimal_fiber_length=0.150803 tendon_slack_length=0.08253405
        pennation_angle_at_optimal=0
      PathPoint P1: lumbar4 (-0.0168273 0.0290044 -0.0282047)
      PathPoint P2: Abdomen (0.00494921 -0.0367672 -0.0449186)
      PathWrap: wrap_object=Cylinder11 method=hybrid range=(1 2)
    Thelen2003Muscle TR5_l: max_isometric_force=266 optimal_fiber_length=0.07144922 tendon_slack_length=0.03229896
        pennation_angle_at_optimal=0
      PathPoint P1: Abdomen (0.00494921 -0.0701919 -0.0449186)
      PathPoint P2: pelvis (-0.0494921 0.0772104 -0.125379)
      PathWrap: wrap_object=Cylinder12 method=hybrid range=(1 2)
    Thelen2003Muscle TR1_r: max_isometric_force=224 optimal_fiber_length=0.07826106 tendon_slack_length=0.04717105
        pennation_angle_at_optimal=0
      PathPoint P1: Abdomen (0.00683732 0.0646211 0.0340324)
      PathPoint P2: rib9_R (0.109439 -0.154377 0.125012)
    Thelen2003Muscle TR2_r: max_isometric_force=88.2 optimal_fiber_length=0.151036 tendon_slack_length=0.1183796
        pennation_angle_at_optimal=0
      PathPoint P1: lumbar2 (-0.0227664 0.0173896 0.0240262)
      PathPoint P2: Abdomen (0.00755027 0.0267398 0.0401588)
      PathWrap: wrap_object=Cylinder4 method=hybrid range=(1 2)
    Thelen2003Muscle TR3_r: max_isometric_force=88.2 optimal_fiber_length=0.1503158 tendon_slack_length=0.07922048
        pennation_angle_at_optimal=0
      PathPoint P1: lumbar3 (-0.0257359 0.024817 0.0313386)
      PathPoint P2: Abdomen (0.00706823 -0.00557079 0.0458646)
      PathWrap: wrap_object=Cylinder5 method=hybrid range=(1 2)
    Thelen2003Muscle TR4_r: max_isometric_force=88.2 optimal_fiber_length=0.1508202 tendon_slack_length=0.08254348
        pennation_angle_at_optimal=0
      PathPoint P1: lumbar4 (-0.0168273 0.0290044 0.0282047)
      PathPoint P2: Abdomen (0.00494921 -0.0367672 0.0444276)
      PathWrap: wrap_object=Cylinder6 method=hybrid range=(1 2)
    Thelen2003Muscle TR5_r: max_isometric_force=266 optimal_fiber_length=0.07144922 tendon_slack_length=0.03229896
        pennation_angle_at_optimal=0
      PathPoint P1: Abdomen (0.00494921 -0.0701919 0.0449186)
      PathPoint P2: pelvis (-0.0494921 0.0772104 0.125379)
      PathWrap: wrap_object=Cylinder7 method=hybrid range=(1 2)
    Thelen2003Muscle ExtIC_IS1_1_R: max_isometric_force=206.6065 optimal_fiber_length=0.04963994
        tendon_slack_length=0.001147305 pennation_angle_at_optimal=0
      PathPoint PathPoint_rib1_R: rib1_R (-0.0100959 0.00658437 0.0177774)
      PathPoint PathPoint_rib2_R: rib2_R (-0.0247858 0.00079838 0.0557097)
    Thelen2003Muscle ExtIC_IS1_3_R: max_isometric_force=206.6065 optimal_fiber_length=0.04402103
        tendon_slack_length=0.001170829 pennation_angle_at_optimal=0
      PathPoint PathPoint_rib1_R: rib1_R (0.00236221 -0.0229564 0.0626429)
      PathPoint PathPoint_rib2_R: rib2_R (0.0126754 -0.0351276 0.0973141)
    Thelen2003Muscle ExtIC_IS1_5_R: max_isometric_force=206.6065 optimal_fiber_length=0.05816532
        tendon_slack_length=0.001101354 pennation_angle_at_optimal=0
      PathPoint PathPoint_rib1_R: rib1_R (0.0286889 -0.0436584 0.0602304)
      PathPoint PathPoint_rib2_R: rib2_R (0.073849 -0.0696336 0.066212)
    Thelen2003Muscle ExtIC_IS1_1_L: max_isometric_force=206.6065 optimal_fiber_length=0.04963978
        tendon_slack_length=0.001147304 pennation_angle_at_optimal=0
      PathPoint PathPoint_rib1_L: rib1_L (-0.0100959 0.00658437 -0.0177774)
      PathPoint PathPoint_rib2_L: rib2_L (-0.0247858 0.00079838 -0.0557097)
    Thelen2003Muscle ExtIC_IS1_3_L: max_isometric_force=206.6065 optimal_fiber_length=0.04402087
        tendon_slack_length=0.001170829 pennation_angle_at_optimal=0
      PathPoint PathPoint_rib1_L: rib1_L (0.00236221 -0.0229564 -0.0626429)
      PathPoint PathPoint_rib2_L: rib2_L (0.0126754 -0.0351276 -0.0973141)
    Thelen2003Muscle ExtIC_IS1_5_L: max_isometric_force=206.6065 optimal_fiber_length=0.05816529
        tendon_slack_length=0.001101354 pennation_angle_at_optimal=0
      PathPoint PathPoint_rib1_L: rib1_L (0.0286889 -0.0436584 -0.0602304)
      PathPoint PathPoint_rib2_L: rib2_L (0.073849 -0.0696336 -0.066212)
    Thelen2003Muscle ExtIC_IS2_1_R: max_isometric_force=208.8433 optimal_fiber_length=0.04253562
        tendon_slack_length=0.001162578 pennation_angle_at_optimal=0
      PathPoint PathPoint_rib2_R: rib2_R (-0.017891 0.00499025 0.0239869)
      PathPoint PathPoint_rib3_R: rib3_R (-0.0315603 0.00296876 0.0436193)
    Thelen2003Muscle ExtIC_IS2_3_R: max_isometric_force=208.8433 optimal_fiber_length=0.04650427
        tendon_slack_length=0.001183913 pennation_angle_at_optimal=0
      PathPoint PathPoint_rib2_R: rib2_R (-0.0135932 -0.0130719 0.0799761)
      PathPoint PathPoint_rib3_R: rib3_R (-0.00477296 -0.0288988 0.104446)
    Thelen2003Muscle ExtIC_IS2_5_R: max_isometric_force=208.8433 optimal_fiber_length=0.05886
        tendon_slack_length=0.001132159 pennation_angle_at_optimal=0
      PathPoint PathPoint_rib2_R: rib2_R (0.0287628 -0.0458296 0.0968885)
      PathPoint PathPoint_rib3_R: rib3_R (0.0668644 -0.0751098 0.110056)
    Thelen2003Muscle ExtIC_IS2_7_R: max_isometric_force=208.8433 optimal_fiber_length=0.06171335
        tendon_slack_length=0.001117483 pennation_angle_at_optimal=0
      PathPoint PathPoint_rib2_R: rib2_R (0.0740263 -0.0697171 0.0660221)
      PathPoint PathPoint_rib3_R: rib3_R (0.117565 -0.0996781 0.050601)
    Thelen2003Muscle ExtIC_IS2_1_L: max_isometric_force=208.8433 optimal_fiber_length=0.04253554
        tendon_slack_length=0.001162577 pennation_angle_at_optimal=0
      PathPoint PathPoint_rib2_L: rib2_L (-0.017891 0.00499025 -0.0239869)
      PathPoint PathPoint_rib3_L: rib3_L (-0.0315603 0.00296876 -0.0436193)
    Thelen2003Muscle ExtIC_IS2_3_L: max_isometric_force=208.8433 optimal_fiber_length=0.04650416
        tendon_slack_length=0.001183913 pennation_angle_at_optimal=0
      PathPoint PathPoint_rib2_L: rib2_L (-0.0135932 -0.0130719 -0.0799761)
      PathPoint PathPoint_rib3_L: rib3_L (-0.00477296 -0.0288988 -0.104446)
    Thelen2003Muscle ExtIC_IS2_5_L: max_isometric_force=208.8433 optimal_fiber_length=0.05885993
        tendon_slack_length=0.001132159 pennation_angle_at_optimal=0
      PathPoint PathPoint_rib2_L: rib2_L (0.0287628 -0.0458296 -0.0968885)
      PathPoint PathPoint_rib3_L: rib3_L (0.0668644 -0.0751098 -0.110056)
    Thelen2003Muscle ExtIC_IS2_7_L: max_isometric_force=208.8433 optimal_fiber_length=0.06171337
        tendon_slack_length=0.001117484 pennation_angle_at_optimal=0
      PathPoint PathPoint_rib2_L: rib2_L (0.0740263 -0.0697171 -0.0660221)
      PathPoint PathPoint_rib3_L: rib3_L (0.117565 -0.0996781 -0.050601)
    Thelen2003Muscle ExtIC_IS3_1_R: max_isometric_force=230.7699 optimal_fiber_length=0.04756917
        tendon_slack_length=0.001154465 pennation_angle_at_optimal=0
      PathPoint PathPoint_rib3_R: rib3_R (-0.0233646 0.00389655 0.0264612)
      PathPoint PathPoint_rib4_R: rib4_R (-0.0359756 -0.00255389 0.0490136)
    Thelen2003Muscle ExtIC_IS3_3_R: max_isometric_force=230.7699 optimal_fiber_length=0.04651227
        tendon_slack_length=0.001181673 pennation_angle_at_optimal=0
      PathPoint PathPoint_rib3_R: rib3_R (-0.0222352 -0.0138766 0.0850176)
      PathPoint PathPoint_rib4_R: rib4_R (-0.0107048 -0.0297438 0.105931)
    Thelen2003Muscle ExtIC_IS3_5_R: max_isometric_force=230.7699 optimal_fiber_length=0.04840718
        tendon_slack_length=0.00116114 pennation_angle_at_optimal=0
      PathPoint PathPoint_rib3_R: rib3_R (0.0298536 -0.0535294 0.119956)
      PathPoint PathPoint_rib4_R: rib4_R (0.0564378 -0.0737131 0.131268)
    Thelen2003Muscle ExtIC_IS3_7_R: max_isometric_force=230.7699 optimal_fiber_length=0.06341244
        tendon_slack_length=0.001127693 pennation_angle_at_optimal=0
      PathPoint PathPoint_rib3_R: rib3_R (0.0783153 -0.0810546 0.10203)
      PathPoint PathPoint_rib4_R: rib4_R (0.11996 -0.112616 0.0909054)
    Thelen2003Muscle ExtIC_IS3_1_L: max_isometric_force=230.7699 optimal_fiber_length=0.04756908
        tendon_slack_length=0.001154465 pennation_angle_at_optimal=0
      PathPoint PathPoint_rib3_L: rib3_L (-0.0233646 0.00389655 -0.0264612)
      PathPoint PathPoint_rib4_L: rib4_L (-0.0359756 -0.00255389 -0.0490136)
    Thelen2003Muscle ExtIC_IS3_3_L: max_isometric_force=230.7699 optimal_fiber_length=0.04651216
        tendon_slack_length=0.001181673 pennation_angle_at_optimal=0
      PathPoint PathPoint_rib3_L: rib3_L (-0.0222352 -0.0138766 -0.0850176)
      PathPoint PathPoint_rib4_L: rib4_L (-0.0107048 -0.0297438 -0.105931)
    Thelen2003Muscle ExtIC_IS3_5_L: max_isometric_force=230.7699 optimal_fiber_length=0.04840711
        tendon_slack_length=0.00116114 pennation_angle_at_optimal=0
      PathPoint PathPoint_rib3_L: rib3_L (0.0298536 -0.0535294 -0.119956)
      PathPoint PathPoint_rib4_L: rib4_L (0.0564378 -0.0737131 -0.131268)
    Thelen2003Muscle ExtIC_IS3_7_L: max_isometric_force=230.7699 optimal_fiber_length=0.06341243
        tendon_slack_length=0.001127693 pennation_angle_at_optimal=0
      PathPoint PathPoint_rib3_L: rib3_L (0.0783153 -0.0810546 -0.10203)
      PathPoint PathPoint_rib4_L: rib4_L (0.11996 -0.112616 -0.0909054)
    Thelen2003Muscle ExtIC_IS4_1_R: max_isometric_force=245.0724 optimal_fiber_length=0.04925986
        tendon_slack_length=0.001147901 pennation_angle_at_optimal=0
      PathPoint PathPoint_rib4_R: rib4_R (-0.0262134 0.000490476 0.027961)
      PathPoint PathPoint_rib5_R: rib5_R (-0.0359927 -0.0072035 0.052054)
    Thelen2003Muscle ExtIC_IS4_3_R: max_isometric_force=245.0724 optimal_fiber_length=0.04691598
        tendon_slack_length=0.001165067 pennation_angle_at_optimal=0
      PathPoint PathPoint_rib4_R: rib4_R (-0.0218881 -0.0213382 0.0934993)
      PathPoint PathPoint_rib5_R: rib5_R (-0.0051057 -0.0357548 0.112385)
    Thelen2003Muscle ExtIC_IS4_5_R: max_isometric_force=245.0724 optimal_fiber_length=0.04805943
        tendon_slack_length=0.001157845 pennation_angle_at_optimal=0
      PathPoint PathPoint_rib4_R: rib4_R (0.0402399 -0.0634597 0.131615)
      PathPoint PathPoint_rib5_R: rib5_R (0.0658371 -0.0812544 0.139168)
    Thelen2003Muscle ExtIC_IS4_7_R: max_isometric_force=245.0724 optimal_fiber_length=0.06243518
        tendon_slack_length=0.001139045 pennation_angle_at_optimal=0
      PathPoint PathPoint_rib4_R: rib4_R (0.095784 -0.0982103 0.113969)
      PathPoint PathPoint_rib5_R: rib5_R (0.131121 -0.128173 0.104081)
    Thelen2003Muscle ExtIC_IS4_1_L: max_isometric_force=245.0724 optimal_fiber_length=0.04925975
        tendon_slack_length=0.001147901 pennation_angle_at_optimal=0
      PathPoint PathPoint_rib4_L: rib4_L (-0.0262134 0.000490476 -0.027961)
      PathPoint PathPoint_rib5_L: rib5_L (-0.0359927 -0.0072035 -0.052054)
    Thelen2003Muscle ExtIC_IS4_3_L: max_isometric_force=245.0724 optimal_fiber_length=0.04691586
        tendon_slack_length=0.001165067 pennation_angle_at_optimal=0
      PathPoint PathPoint_rib4_L: rib4_L (-0.0218881 -0.0213382 -0.0934993)
      PathPoint PathPoint_rib5_L: rib5_L (-0.0051057 -0.0357548 -0.112385)
    Thelen2003Muscle ExtIC_IS4_5_L: max_isometric_force=245.0724 optimal_fiber_length=0.04805935
        tendon_slack_length=0.001157845 pennation_angle_at_optimal=0
      PathPoint PathPoint_rib4_L: rib4_L (0.0402399 -0.0634597 -0.131615)
      PathPoint PathPoint_rib5_L: rib5_L (0.0658371 -0.0812544 -0.139168)
    Thelen2003Muscle ExtIC_IS4_7_L: max_isometric_force=245.0724 optimal_fiber_length=0.06243514
        tendon_slack_length=0.001139045 pennation_angle_at_optimal=0
      PathPoint PathPoint_rib4_L: rib4_L (0.095784 -0.0982103 -0.113969)
      PathPoint PathPoint_rib5_L: rib5_L (0.131121 -0.128173 -0.104081)
    Thelen2003Muscle ExtIC_IS5_1_R: max_isometric_force=251.9708 optimal_fiber_length=0.04902482
        tendon_slack_length=0.001133023 pennation_angle_at_optimal=0
      PathPoint PathPoint_rib5_R: rib5_R (-0.0266094 -0.00272588 0.03012)
      PathPoint PathPoint_rib6_R: rib6_R (-0.036651 -0.00974067 0.0554829)
    Thelen2003Muscle ExtIC_IS5_3_R: max_isometric_force=251.9708 optimal_fiber_length=0.04992783
        tendon_slack_length=0.001142085 pennation_angle_at_optimal=0
      PathPoint PathPoint_rib5_R: rib5_R (-0.0204946 -0.0255133 0.0965817)
      PathPoint PathPoint_rib6_R: rib6_R (-0.00118621 -0.0403431 0.116005)
    Thelen2003Muscle ExtIC_IS5_5_R: max_isometric_force=251.9708 optimal_fiber_length=0.05424489
        tendon_slack_length=0.001143483 pennation_angle_at_optimal=0
      PathPoint PathPoint_rib5_R: rib5_R (0.0483055 -0.0694467 0.138501)
      PathPoint PathPoint_rib6_R: rib6_R (0.0732156 -0.0908954 0.144028)
    Thelen2003Muscle ExtIC_IS5_7_R: max_isometric_force=251.9708 optimal_fiber_length=0.063999
        tendon_slack_length=0.001142077 pennation_angle_at_optimal=0
      PathPoint PathPoint_rib5_R: rib5_R (0.108818 -0.112218 0.123315)
      PathPoint PathPoint_rib6_R: rib6_R (0.135392 -0.142601 0.112946)
    Thelen2003Muscle ExtIC_IS5_1_L: max_isometric_force=251.9708 optimal_fiber_length=0.04902469
        tendon_slack_length=0.001133023 pennation_angle_at_optimal=0
      PathPoint PathPoint_rib5_L: rib5_L (-0.0266094 -0.00272588 -0.03012)
      PathPoint PathPoint_rib6_L: rib6_L (-0.036651 -0.00974067 -0.0554829)
    Thelen2003Muscle ExtIC_IS5_3_L: max_isometric_force=251.9708 optimal_fiber_length=0.0499277
        tendon_slack_length=0.001142085 pennation_angle_at_optimal=0
      PathPoint PathPoint_rib5_L: rib5_L (-0.0204946 -0.0255133 -0.0965817)
      PathPoint PathPoint_rib6_L: rib6_L (-0.00118621 -0.0403431 -0.116005)
    Thelen2003Muscle ExtIC_IS5_5_L: max_isometric_force=251.9708 optimal_fiber_length=0.05424482
        tendon_slack_length=0.001143483 pennation_angle_at_optimal=0
      PathPoint PathPoint_rib5_L: rib5_L (0.0483055 -0.0694467 -0.138501)
      PathPoint PathPoint_rib6_L: rib6_L (0.0732156 -0.0908954 -0.144028)
    Thelen2003Muscle ExtIC_IS5_7_L: max_isometric_force=251.9708 optimal_fiber_length=0.06399898
        tendon_slack_length=0.001142077 pennation_angle_at_optimal=0
      PathPoint PathPoint_rib5_L: rib5_L (0.108818 -0.112218 -0.123315)
      PathPoint PathPoint_rib6_L: rib6_L (0.135392 -0.142601 -0.112946)
    Thelen2003Muscle ExtIC_IS6_1_R: max_isometric_force=245.2557 optimal_fiber_length=0.0456567
        tendon_slack_length=0.001118912 pennation_angle_at_optimal=0
      PathPoint PathPoint_rib6_R: rib6_R (-0.0270294 -0.00390037 0.0308625)
      PathPoint PathPoint_rib7_R: rib7_R (-0.0355552 -0.00949552 0.0553757)
    Thelen2003Muscle ExtIC_IS6_3_R: max_isometric_force=245.2557 optimal_fiber_length=0.04988116
        tendon_slack_length=0.001126503 pennation_angle_at_optimal=0
      PathPoint PathPoint_rib6_R: rib6_R (-0.0201507 -0.0278508 0.0973959)
      PathPoint PathPoint_rib7_R: rib7_R (-0.000192429 -0.043047 0.113942)
    Thelen2003Muscle ExtIC_IS6_5_R: max_isometric_force=245.2557 optimal_fiber_length=0.0513988
        tendon_slack_length=0.001136625 pennation_angle_at_optimal=0
      PathPoint PathPoint_rib6_R: rib6_R (0.0534246 -0.0761172 0.142648)
      PathPoint PathPoint_rib7_R: rib7_R (0.07273 -0.0957409 0.147673)
    Thelen2003Muscle ExtIC_IS6_7_R: max_isometric_force=245.2557 optimal_fiber_length=0.05855761
        tendon_slack_length=0.001138201 pennation_angle_at_optimal=0
      PathPoint PathPoint_rib6_R: rib6_R (0.112822 -0.123873 0.131295)
      PathPoint PathPoint_rib7_R: rib7_R (0.132789 -0.150671 0.12555)
    Thelen2003Muscle ExtIC_IS6_1_L: max_isometric_force=245.2557 optimal_fiber_length=0.04565658
        tendon_slack_length=0.001118912 pennation_angle_at_optimal=0
      PathPoint PathPoint_rib6_L: rib6_L (-0.0270294 -0.00390037 -0.0308625)
      PathPoint PathPoint_rib7_L: rib7_L (-0.0355552 -0.00949552 -0.0553757)
    Thelen2003Muscle ExtIC_IS6_3_L: max_isometric_force=245.2557 optimal_fiber_length=0.04988105
        tendon_slack_length=0.001126503 pennation_angle_at_optimal=0
      PathPoint PathPoint_rib6_L: rib6_L (-0.0201507 -0.0278508 -0.0973959)
      PathPoint PathPoint_rib7_L: rib7_L (-0.000192429 -0.043047 -0.113942)
    Thelen2003Muscle ExtIC_IS6_5_L: max_isometric_force=245.2557 optimal_fiber_length=0.05139874
        tendon_slack_length=0.001136625 pennation_angle_at_optimal=0
      PathPoint PathPoint_rib6_L: rib6_L (0.0534246 -0.0761172 -0.142648)
      PathPoint PathPoint_rib7_L: rib7_L (0.07273 -0.0957409 -0.147673)
    Thelen2003Muscle ExtIC_IS6_7_L: max_isometric_force=245.2557 optimal_fiber_length=0.05855759
        tendon_slack_length=0.001138202 pennation_angle_at_optimal=0
      PathPoint PathPoint_rib6_L: rib6_L (0.112822 -0.123873 -0.131295)
      PathPoint PathPoint_rib7_L: rib7_L (0.132789 -0.150671 -0.12555)
    Thelen2003Muscle ExtIC_IS7_1_R: max_isometric_force=223.9659 optimal_fiber_length=0.05372524
        tendon_slack_length=0.001111943 pennation_angle_at_optimal=0
      PathPoint PathPoint_rib7_R: rib7_R (-0.0267502 -0.00362735 0.031918)
      PathPoint PathPoint_rib8_R: rib8_R (-0.0362727 -0.0150637 0.0645129)
    Thelen2003Muscle ExtIC_IS7_3_R: max_isometric_force=223.9659 optimal_fiber_length=0.05582967
        tendon_slack_length=0.001125695 pennation_angle_at_optimal=0
      PathPoint PathPoint_rib7_R: rib7_R (-0.0118698 -0.0347607 0.103518)
      PathPoint PathPoint_rib8_R: rib8_R (0.0049918 -0.0557166 0.121059)
    Thelen2003Muscle ExtIC_IS7_5_R: max_isometric_force=223.9659 optimal_fiber_length=0.05849116
        tendon_slack_length=0.001132178 pennation_angle_at_optimal=0
      PathPoint PathPoint_rib7_R: rib7_R (0.0515594 -0.0793152 0.142745)
      PathPoint PathPoint_rib8_R: rib8_R (0.0681378 -0.105031 0.152151)
    Thelen2003Muscle ExtIC_IS7_7_R: max_isometric_force=223.9659 optimal_fiber_length=0.05704558
        tendon_slack_length=0.001138819 pennation_angle_at_optimal=0
      PathPoint PathPoint_rib7_R: rib7_R (0.106039 -0.125777 0.143811)
      PathPoint PathPoint_rib8_R: rib8_R (0.115786 -0.151219 0.136221)
    Thelen2003Muscle ExtIC_IS7_1_L: max_isometric_force=223.9659 optimal_fiber_length=0.05372509
        tendon_slack_length=0.001111943 pennation_angle_at_optimal=0
      PathPoint PathPoint_rib7_L: rib7_L (-0.0267502 -0.00362735 -0.031918)
      PathPoint PathPoint_rib8_L: rib8_L (-0.0362727 -0.0150637 -0.0645129)
    Thelen2003Muscle ExtIC_IS7_3_L: max_isometric_force=223.9659 optimal_fiber_length=0.05582958
        tendon_slack_length=0.001125695 pennation_angle_at_optimal=0
      PathPoint PathPoint_rib7_L: rib7_L (-0.0118698 -0.0347607 -0.103518)
      PathPoint PathPoint_rib8_L: rib8_L (0.0049918 -0.0557166 -0.121059)
    Thelen2003Muscle ExtIC_IS7_5_L: max_isometric_force=223.9659 optimal_fiber_length=0.05849109
        tendon_slack_length=0.001132178 pennation_angle_at_optimal=0
      PathPoint PathPoint_rib7_L: rib7_L (0.0515594 -0.0793152 -0.142745)
      PathPoint PathPoint_rib8_L: rib8_L (0.0681378 -0.105031 -0.152151)
    Thelen2003Muscle ExtIC_IS7_7_L: max_isometric_force=223.9659 optimal_fiber_length=0.05704557
        tendon_slack_length=0.001138819 pennation_angle_at_optimal=0
      PathPoint PathPoint_rib7_L: rib7_L (0.106039 -0.125777 -0.143811)
      PathPoint PathPoint_rib8_L: rib8_L (0.115786 -0.151219 -0.136221)
    Thelen2003Muscle ExtIC_IS8_1_R: max_isometric_force=193.1464 optimal_fiber_length=0.06248335
        tendon_slack_length=0.001111521 pennation_angle_at_optimal=0
      PathPoint PathPoint_rib8_R: rib8_R (-0.0273951 -0.00406498 0.0316599)
      PathPoint PathPoint_rib9_R: rib9_R (-0.0365172 -0.0236919 0.0697565)
    Thelen2003Muscle ExtIC_IS8_3_R: max_isometric_force=193.1464 optimal_fiber_length=0.05364008
        tendon_slack_length=0.001130559 pennation_angle_at_optimal=0
      PathPoint PathPoint_rib8_R: rib8_R (-0.010571 -0.0431268 0.10726)
      PathPoint PathPoint_rib9_R: rib9_R (0.00183442 -0.0645977 0.120746)
    Thelen2003Muscle ExtIC_IS8_5_R: max_isometric_force=193.1464 optimal_fiber_length=0.05465378
        tendon_slack_length=0.001133456 pennation_angle_at_optimal=0
      PathPoint PathPoint_rib8_R: rib8_R (0.0442345 -0.0859654 0.14484)
      PathPoint PathPoint_rib9_R: rib9_R (0.0575441 -0.109615 0.151583)
    Thelen2003Muscle ExtIC_IS8_7_R: max_isometric_force=193.1464 optimal_fiber_length=0.04881967
        tendon_slack_length=0.001137415 pennation_angle_at_optimal=0
      PathPoint PathPoint_rib8_R: rib8_R (0.0908045 -0.125213 0.150979)
      PathPoint PathPoint_rib9_R: rib9_R (0.0973389 -0.143745 0.141529)
    Thelen2003Muscle ExtIC_IS8_1_L: max_isometric_force=193.1464 optimal_fiber_length=0.06248322
        tendon_slack_length=0.001111521 pennation_angle_at_optimal=0
      PathPoint PathPoint_rib8_L: rib8_L (-0.0273951 -0.00406498 -0.0316599)
      PathPoint PathPoint_rib9_L: rib9_L (-0.0365172 -0.0236919 -0.0697565)
    Thelen2003Muscle ExtIC_IS8_3_L: max_isometric_force=193.1464 optimal_fiber_length=0.05364001
        tendon_slack_length=0.001130559 pennation_angle_at_optimal=0
      PathPoint PathPoint_rib8_L: rib8_L (-0.010571 -0.0431268 -0.10726)
      PathPoint PathPoint_rib9_L: rib9_L (0.00183442 -0.0645977 -0.120746)
    Thelen2003Muscle ExtIC_IS8_5_L: max_isometric_force=193.1464 optimal_fiber_length=0.05465375
        tendon_slack_length=0.001133456 pennation_angle_at_optimal=0
      PathPoint PathPoint_rib8_L: rib8_L (0.0442345 -0.0859654 -0.14484)
      PathPoint PathPoint_rib9_L: rib9_L (0.0575441 -0.109615 -0.151583)
    Thelen2003Muscle ExtIC_IS8_7_L: max_isometric_force=193.1464 optimal_fiber_length=0.0488197
        tendon_slack_length=0.001137415 pennation_angle_at_optimal=0
      PathPoint PathPoint_rib8_L: rib8_L (0.0908045 -0.125213 -0.150979)
      PathPoint PathPoint_rib9_L: rib9_L (0.0973389 -0.143745 -0.141529)
    Thelen2003Muscle ExtIC_IS9_1_R: max_isometric_force=221.3723 optimal_fiber_length=0.05483492
        tendon_slack_length=0.001113971 pennation_angle_at_optimal=0
      PathPoint PathPoint_rib9_R: rib9_R (-0.0282802 -0.00658409 0.0312003)
      PathPoint PathPoint_rib10_R: rib10_R (-0.0402111 -0.0211518 0.0587245)
    Thelen2003Muscle ExtIC_IS9_3_R: max_isometric_force=221.3723 optimal_fiber_length=0.05426305
        tendon_slack_length=0.001136464 pennation_angle_at_optimal=0
      PathPoint PathPoint_rib9_R: rib9_R (-0.00737474 -0.0565514 0.112521)
      PathPoint PathPoint_rib10_R: rib10_R (0.00421387 -0.0781267 0.122281)
    Thelen2003Muscle ExtIC_IS9_5_R: max_isometric_force=221.3723 optimal_fiber_length=0.06190379
        tendon_slack_length=0.001136619 pennation_angle_at_optimal=0
      PathPoint PathPoint_rib9_R: rib9_R (0.0461414 -0.10053 0.147957)
      PathPoint PathPoint_rib10_R: rib10_R (0.0626983 -0.130151 0.145784)
    Thelen2003Muscle ExtIC_IS9_1_L: max_isometric_force=221.3723 optimal_fiber_length=0.05483481
        tendon_slack_length=0.001113971 pennation_angle_at_optimal=0
      PathPoint PathPoint_rib9_L: rib9_L (-0.0282802 -0.00658409 -0.0312003)
      PathPoint PathPoint_rib10_L: rib10_L (-0.0402111 -0.0211518 -0.0587245)
    Thelen2003Muscle ExtIC_IS9_3_L: max_isometric_force=221.3723 optimal_fiber_length=0.05426302
        tendon_slack_length=0.001136464 pennation_angle_at_optimal=0
      PathPoint PathPoint_rib9_L: rib9_L (-0.00737474 -0.0565514 -0.112521)
      PathPoint PathPoint_rib10_L: rib10_L (0.00421387 -0.0781267 -0.122281)
    Thelen2003Muscle ExtIC_IS9_5_L: max_isometric_force=221.3723 optimal_fiber_length=0.0619038
        tendon_slack_length=0.001136619 pennation_angle_at_optimal=0
      PathPoint PathPoint_rib9_L: rib9_L (0.0461414 -0.10053 -0.147957)
      PathPoint PathPoint_rib10_L: rib10_L (0.0626983 -0.130151 -0.145784)
    Thelen2003Muscle ExtIC_IS10_1_R: max_isometric_force=192.5566 optimal_fiber_length=0.07473847
        tendon_slack_length=0.001144261 pennation_angle_at_optimal=0
      PathPoint PathPoint_rib10_R: rib10_R (-0.0298558 -0.00824108 0.0313793)
      PathPoint PathPoint_rib11_R: rib11_R (-0.0320275 -0.029404 0.0624247)
    Thelen2003Muscle ExtIC_IS10_3_R: max_isometric_force=192.5566 optimal_fiber_length=0.07194195
        tendon_slack_length=0.001147873 pennation_angle_at_optimal=0
      PathPoint PathPoint_rib10_R: rib10_R (-0.0181442 -0.0561899 0.102135)
      PathPoint PathPoint_rib11_R: rib11_R (-0.00204929 -0.0768695 0.106255)
    Thelen2003Muscle ExtIC_IS10_1_L: max_isometric_force=192.5566 optimal_fiber_length=0.07473832
        tendon_slack_length=0.001144261 pennation_angle_at_optimal=0
      PathPoint PathPoint_rib10_L: rib10_L (-0.0298558 -0.00824108 -0.0313793)
      PathPoint PathPoint_rib11_L: rib11_L (-0.0320275 -0.029404 -0.0624247)
    Thelen2003Muscle ExtIC_IS10_3_L: max_isometric_force=192.5566 optimal_fiber_length=0.07194192
        tendon_slack_length=0.001147873 pennation_angle_at_optimal=0
      PathPoint PathPoint_rib10_L: rib10_L (-0.0181442 -0.0561899 -0.102135)
      PathPoint PathPoint_rib11_L: rib11_L (-0.00204929 -0.0768695 -0.106255)
    Thelen2003Muscle ExtIC_IS11_1_R: max_isometric_force=88.7428 optimal_fiber_length=0.06281924
        tendon_slack_length=0.001159252 pennation_angle_at_optimal=0
      PathPoint PathPoint_rib11_R: rib11_R (-0.0224657 -0.0102829 0.0296839)
      PathPoint PathPoint_rib12_R: rib12_R (-0.0254619 -0.031981 0.0447414)
    Thelen2003Muscle ExtIC_IS11_3_R: max_isometric_force=88.7428 optimal_fiber_length=0.06532903
        tendon_slack_length=0.001161828 pennation_angle_at_optimal=0
      PathPoint PathPoint_rib11_R: rib11_R (-0.0238567 -0.048064 0.0821766)
      PathPoint PathPoint_rib12_R: rib12_R (-0.00880734 -0.072241 0.0784021)
    Thelen2003Muscle ExtIC_IS11_1_L: max_isometric_force=88.7428 optimal_fiber_length=0.06281918
        tendon_slack_length=0.001159252 pennation_angle_at_optimal=0
      PathPoint PathPoint_rib11_L: rib11_L (-0.0224657 -0.0102829 -0.0296839)
      PathPoint PathPoint_rib12_L: rib12_L (-0.0254619 -0.031981 -0.0447414)
    Thelen2003Muscle ExtIC_IS11_3_L: max_isometric_force=88.7428 optimal_fiber_length=0.06532906
        tendon_slack_length=0.001161828 pennation_angle_at_optimal=0
      PathPoint PathPoint_rib11_L: rib11_L (-0.0238567 -0.048064 -0.0821766)
      PathPoint PathPoint_rib12_L: rib12_L (-0.00880734 -0.072241 -0.0784021)
    Thelen2003Muscle IntIC_IS1_1_R: max_isometric_force=151.1586 optimal_fiber_length=0.02956877
        tendon_slack_length=0.0009928092 pennation_angle_at_optimal=0
      PathPoint PathPoint_rib1_R: rib1_R (-0.02749 -0.0143563 0.0168072)
      PathPoint PathPoint_rib2_R: rib2_R (-0.00379773 0.0222989 0.0471797)
    Thelen2003Muscle IntIC_IS1_3_R: max_isometric_force=151.1586 optimal_fiber_length=0.03772725
        tendon_slack_length=0.0009598886 pennation_angle_at_optimal=0
      PathPoint PathPoint_rib1_R: rib1_R (-0.0196231 -0.0358691 0.0768997)
      PathPoint PathPoint_rib2_R: rib2_R (0.0283019 -0.0191013 0.0722868)
    Thelen2003Muscle IntIC_IS1_5_R: max_isometric_force=151.1586 optimal_fiber_length=0.08080714
        tendon_slack_length=0.001018291 pennation_angle_at_optimal=0
      PathPoint PathPoint_rib1_R: rib1_R (-0.00447713 -0.0487935 0.0877175)
      PathPoint PathPoint_rib2_R: rib2_R (0.0660854 -0.0342696 0.0392136)
    Thelen2003Muscle IntIC_IS1_1_L: max_isometric_force=151.1586 optimal_fiber_length=0.02956865
        tendon_slack_length=0.0009928077 pennation_angle_at_optimal=0
      PathPoint PathPoint_rib1_L: rib1_L (-0.02749 -0.0143563 -0.0168072)
      PathPoint PathPoint_rib2_L: rib2_L (-0.00379773 0.0222989 -0.0471797)
    Thelen2003Muscle IntIC_IS1_3_L: max_isometric_force=151.1586 optimal_fiber_length=0.03772732
        tendon_slack_length=0.0009598891 pennation_angle_at_optimal=0
      PathPoint PathPoint_rib1_L: rib1_L (-0.0196231 -0.0358691 -0.0768997)
      PathPoint PathPoint_rib2_L: rib2_L (0.0283019 -0.0191013 -0.0722868)
    Thelen2003Muscle IntIC_IS1_5_L: max_isometric_force=151.1586 optimal_fiber_length=0.08080727
        tendon_slack_length=0.001018292 pennation_angle_at_optimal=0
      PathPoint PathPoint_rib1_L: rib1_L (-0.00447713 -0.0487935 -0.0877175)
      PathPoint PathPoint_rib2_L: rib2_L (0.0660854 -0.0342696 -0.0392136)
    Thelen2003Muscle IntIC_IS2_1_R: max_isometric_force=191.2044 optimal_fiber_length=0.02795947
        tendon_slack_length=0.001005126 pennation_angle_at_optimal=0
      PathPoint PathPoint_rib2_R: rib2_R (-0.0345797 -0.0156727 0.0278929)
      PathPoint PathPoint_rib3_R: rib3_R (-0.014174 0.0222247 0.0488795)
    Thelen2003Muscle IntIC_IS2_3_R: max_isometric_force=191.2044 optimal_fiber_length=0.0340313
        tendon_slack_length=0.0009351234 pennation_angle_at_optimal=0
      PathPoint PathPoint_rib2_R: rib2_R (-0.0185457 -0.0464276 0.103686)
      PathPoint PathPoint_rib3_R: rib3_R (0.0286007 -0.0188822 0.0965222)
    Thelen2003Muscle IntIC_IS2_5_R: max_isometric_force=191.2044 optimal_fiber_length=0.05193338
        tendon_slack_length=0.001050456 pennation_angle_at_optimal=0
      PathPoint PathPoint_rib2_R: rib2_R (0.0725583 -0.10336 0.0988082)
      PathPoint PathPoint_rib3_R: rib3_R (0.0943211 -0.0544138 0.0533859)
    Thelen2003Muscle IntIC_IS2_7_R: max_isometric_force=191.2044 optimal_fiber_length=0.04543515
        tendon_slack_length=0.001081176 pennation_angle_at_optimal=0
      PathPoint PathPoint_rib2_R: rib2_R (0.111969 -0.122107 0.0230767)
      PathPoint PathPoint_rib3_R: rib3_R (0.108781 -0.0645605 -0.00152506)
    Thelen2003Muscle IntIC_IS2_1_L: max_isometric_force=191.2044 optimal_fiber_length=0.02795931
        tendon_slack_length=0.001005124 pennation_angle_at_optimal=0
      PathPoint PathPoint_rib2_L: rib2_L (-0.0345797 -0.0156727 -0.0278929)
      PathPoint PathPoint_rib3_L: rib3_L (-0.014174 0.0222247 -0.0488795)
    Thelen2003Muscle IntIC_IS2_3_L: max_isometric_force=191.2044 optimal_fiber_length=0.0340313
        tendon_slack_length=0.0009351236 pennation_angle_at_optimal=0
      PathPoint PathPoint_rib2_L: rib2_L (-0.0185457 -0.0464276 -0.103686)
      PathPoint PathPoint_rib3_L: rib3_L (0.0286007 -0.0188822 -0.0965222)
    Thelen2003Muscle IntIC_IS2_5_L: max_isometric_force=191.2044 optimal_fiber_length=0.0519335
        tendon_slack_length=0.001050457 pennation_angle_at_optimal=0
      PathPoint PathPoint_rib2_L: rib2_L (0.0725583 -0.10336 -0.0988082)
      PathPoint PathPoint_rib3_L: rib3_L (0.0943211 -0.0544138 -0.0533859)
    Thelen2003Muscle IntIC_IS2_7_L: max_isometric_force=191.2044 optimal_fiber_length=0.04543522
        tendon_slack_length=0.001081176 pennation_angle_at_optimal=0
      PathPoint PathPoint_rib2_L: rib2_L (0.111969 -0.122107 -0.0230767)
      PathPoint PathPoint_rib3_L: rib3_L (0.108781 -0.0645605 0.00152506)
    Thelen2003Muscle IntIC_IS3_1_R: max_isometric_force=243.6 optimal_fiber_length=0.03072057
        tendon_slack_length=0.001038516 pennation_angle_at_optimal=0
      PathPoint PathPoint_rib3_R: rib3_R (-0.0377092 -0.02174 0.0296334)
      PathPoint PathPoint_rib4_R: rib4_R (-0.0214003 0.0232455 0.0509334)
    Thelen2003Muscle IntIC_IS3_3_R: max_isometric_force=243.6 optimal_fiber_length=0.0286585
        tendon_slack_length=0.0009369188 pennation_angle_at_optimal=0
      PathPoint PathPoint_rib3_R: rib3_R (-0.0188616 -0.0543502 0.110648)
      PathPoint PathPoint_rib4_R: rib4_R (0.0206271 -0.0171544 0.111964)
    Thelen2003Muscle IntIC_IS3_5_R: max_isometric_force=243.6 optimal_fiber_length=0.04392893
        tendon_slack_length=0.001013741 pennation_angle_at_optimal=0
      PathPoint PathPoint_rib3_R: rib3_R (0.0591907 -0.1049 0.129283)
      PathPoint PathPoint_rib4_R: rib4_R (0.0961208 -0.061983 0.0949285)
    Thelen2003Muscle IntIC_IS3_7_R: max_isometric_force=243.6 optimal_fiber_length=0.05442981
        tendon_slack_length=0.001078135 pennation_angle_at_optimal=0
      PathPoint PathPoint_rib3_R: rib3_R (0.125366 -0.143825 0.0652192)
      PathPoint PathPoint_rib4_R: rib4_R (0.134473 -0.0801161 0.0258699)
    Thelen2003Muscle IntIC_IS3_1_L: max_isometric_force=243.6 optimal_fiber_length=0.0307204
        tendon_slack_length=0.001038515 pennation_angle_at_optimal=0
      PathPoint PathPoint_rib3_L: rib3_L (-0.0377092 -0.02174 -0.0296334)
      PathPoint PathPoint_rib4_L: rib4_L (-0.0214003 0.0232455 -0.0509334)
    Thelen2003Muscle IntIC_IS3_3_L: max_isometric_force=243.6 optimal_fiber_length=0.02865843
        tendon_slack_length=0.0009369184 pennation_angle_at_optimal=0
      PathPoint PathPoint_rib3_L: rib3_L (-0.0188616 -0.0543502 -0.110648)
      PathPoint PathPoint_rib4_L: rib4_L (0.0206271 -0.0171544 -0.111964)
    Thelen2003Muscle IntIC_IS3_5_L: max_isometric_force=243.6 optimal_fiber_length=0.04392902
        tendon_slack_length=0.001013741 pennation_angle_at_optimal=0
      PathPoint PathPoint_rib3_L: rib3_L (0.0591907 -0.1049 -0.129283)
      PathPoint PathPoint_rib4_L: rib4_L (0.0961208 -0.061983 -0.0949285)
    Thelen2003Muscle IntIC_IS3_7_L: max_isometric_force=243.6 optimal_fiber_length=0.05442989
        tendon_slack_length=0.001078135 pennation_angle_at_optimal=0
      PathPoint PathPoint_rib3_L: rib3_L (0.125366 -0.143825 -0.0652192)
      PathPoint PathPoint_rib4_L: rib4_L (0.134473 -0.0801161 -0.0258699)
    Thelen2003Muscle IntIC_IS4_1_R: max_isometric_force=276.2115 optimal_fiber_length=0.03217367
        tendon_slack_length=0.00106446 pennation_angle_at_optimal=0
      PathPoint PathPoint_rib4_R: rib4_R (-0.0377539 -0.0285798 0.0314422)
      PathPoint PathPoint_rib5_R: rib5_R (-0.0254951 0.0219714 0.0528238)
    Thelen2003Muscle IntIC_IS4_3_R: max_isometric_force=276.2115 optimal_fiber_length=0.02952528
        tendon_slack_length=0.0009705418 pennation_angle_at_optimal=0
      PathPoint PathPoint_rib4_R: rib4_R (-0.0134261 -0.0634053 0.116056)
      PathPoint PathPoint_rib5_R: rib5_R (0.0235279 -0.0196578 0.121328)
    Thelen2003Muscle IntIC_IS4_5_R: max_isometric_force=276.2115 optimal_fiber_length=0.04127759
        tendon_slack_length=0.001013185 pennation_angle_at_optimal=0
      PathPoint PathPoint_rib4_R: rib4_R (0.0755393 -0.121904 0.135902)
      PathPoint PathPoint_rib5_R: rib5_R (0.113929 -0.0766088 0.107113)
    Thelen2003Muscle IntIC_IS4_7_R: max_isometric_force=276.2115 optimal_fiber_length=0.03836844
        tendon_slack_length=0.001094196 pennation_angle_at_optimal=0
      PathPoint PathPoint_rib4_R: rib4_R (0.146598 -0.161629 0.0437886)
      PathPoint PathPoint_rib5_R: rib5_R (0.154087 -0.0967118 0.0346502)
    Thelen2003Muscle IntIC_IS4_1_L: max_isometric_force=276.2115 optimal_fiber_length=0.0321735
        tendon_slack_length=0.00106446 pennation_angle_at_optimal=0
      PathPoint PathPoint_rib4_L: rib4_L (-0.0377539 -0.0285798 -0.0314422)
      PathPoint PathPoint_rib5_L: rib5_L (-0.0254951 0.0219714 -0.0528238)
    Thelen2003Muscle IntIC_IS4_3_L: max_isometric_force=276.2115 optimal_fiber_length=0.02952517
        tendon_slack_length=0.0009705412 pennation_angle_at_optimal=0
      PathPoint PathPoint_rib4_L: rib4_L (-0.0134261 -0.0634053 -0.116056)
      PathPoint PathPoint_rib5_L: rib5_L (0.0235279 -0.0196578 -0.121328)
    Thelen2003Muscle IntIC_IS4_5_L: max_isometric_force=276.2115 optimal_fiber_length=0.04127763
        tendon_slack_length=0.001013186 pennation_angle_at_optimal=0
      PathPoint PathPoint_rib4_L: rib4_L (0.0755393 -0.121904 -0.135902)
      PathPoint PathPoint_rib5_L: rib5_L (0.113929 -0.0766088 -0.107113)
    Thelen2003Muscle IntIC_IS4_7_L: max_isometric_force=276.2115 optimal_fiber_length=0.03836847
        tendon_slack_length=0.001094197 pennation_angle_at_optimal=0
      PathPoint PathPoint_rib4_L: rib4_L (0.146598 -0.161629 -0.0437886)
      PathPoint PathPoint_rib5_L: rib5_L (0.154087 -0.0967118 -0.0346502)
    Thelen2003Muscle IntIC_IS5_1_R: max_isometric_force=306.572 optimal_fiber_length=0.03390116
        tendon_slack_length=0.001088181 pennation_angle_at_optimal=0
      PathPoint PathPoint_rib5_R: rib5_R (-0.0354641 -0.0332362 0.0303305)
      PathPoint PathPoint_rib6_R: rib6_R (-0.027785 0.0217055 0.0541386)
    Thelen2003Muscle IntIC_IS5_3_R: max_isometric_force=306.572 optimal_fiber_length=0.03326559
        tendon_slack_length=0.001017741 pennation_angle_at_optimal=0
      PathPoint PathPoint_rib5_R: rib5_R (-0.00686843 -0.0714284 0.117635)
      PathPoint PathPoint_rib6_R: rib6_R (0.0272872 -0.0214191 0.129076)
    Thelen2003Muscle IntIC_IS5_5_R: max_isometric_force=306.572 optimal_fiber_length=0.04134285
        tendon_slack_length=0.001018702 pennation_angle_at_optimal=0
      PathPoint PathPoint_rib5_R: rib5_R (0.0828965 -0.13494 0.14033)
      PathPoint PathPoint_rib6_R: rib6_R (0.12343 -0.0873876 0.119426)
    Thelen2003Muscle IntIC_IS5_7_R: max_isometric_force=306.572 optimal_fiber_length=0.03694171
        tendon_slack_length=0.0011126 pennation_angle_at_optimal=0
      PathPoint PathPoint_rib5_R: rib5_R (0.156562 -0.17314 0.0424905)
      PathPoint PathPoint_rib6_R: rib6_R (0.166199 -0.10585 0.0413388)
    Thelen2003Muscle IntIC_IS5_1_L: max_isometric_force=306.572 optimal_fiber_length=0.03390099
        tendon_slack_length=0.00108818 pennation_angle_at_optimal=0
      PathPoint PathPoint_rib5_L: rib5_L (-0.0354641 -0.0332362 -0.0303305)
      PathPoint PathPoint_rib6_L: rib6_L (-0.027785 0.0217055 -0.0541386)
    Thelen2003Muscle IntIC_IS5_3_L: max_isometric_force=306.572 optimal_fiber_length=0.03326547
        tendon_slack_length=0.00101774 pennation_angle_at_optimal=0
      PathPoint PathPoint_rib5_L: rib5_L (-0.00686843 -0.0714284 -0.117635)
      PathPoint PathPoint_rib6_L: rib6_L (0.0272872 -0.0214191 -0.129076)
    Thelen2003Muscle IntIC_IS5_5_L: max_isometric_force=306.572 optimal_fiber_length=0.04134286
        tendon_slack_length=0.001018702 pennation_angle_at_optimal=0
      PathPoint PathPoint_rib5_L: rib5_L (0.0828965 -0.13494 -0.14033)
      PathPoint PathPoint_rib6_L: rib6_L (0.12343 -0.0873876 -0.119426)
    Thelen2003Muscle IntIC_IS5_7_L: max_isometric_force=306.572 optimal_fiber_length=0.03694173
        tendon_slack_length=0.0011126 pennation_angle_at_optimal=0
      PathPoint PathPoint_rib5_L: rib5_L (0.156562 -0.17314 -0.0424905)
      PathPoint PathPoint_rib6_L: rib6_L (0.166199 -0.10585 -0.0413388)
    Thelen2003Muscle IntIC_IS6_1_R: max_isometric_force=336.3512 optimal_fiber_length=0.03145749
        tendon_slack_length=0.00110967 pennation_angle_at_optimal=0
      PathPoint PathPoint_rib6_R: rib6_R (-0.0325747 -0.0332238 0.0319268)
      PathPoint PathPoint_rib7_R: rib7_R (-0.0302194 0.0210707 0.051327)
    Thelen2003Muscle IntIC_IS6_3_R: max_isometric_force=336.3512 optimal_fiber_length=0.03383133
        tendon_slack_length=0.001050021 pennation_angle_at_optimal=0
      PathPoint PathPoint_rib6_R: rib6_R (-0.00304098 -0.0747088 0.116296)
      PathPoint PathPoint_rib7_R: rib7_R (0.0264556 -0.024596 0.13052)
    Thelen2003Muscle IntIC_IS6_5_R: max_isometric_force=336.3512 optimal_fiber_length=0.0409961
        tendon_slack_length=0.001032767 pennation_angle_at_optimal=0
      PathPoint PathPoint_rib6_R: rib6_R (0.0918177 -0.147393 0.146415)
      PathPoint PathPoint_rib7_R: rib7_R (0.129404 -0.103411 0.123799)
    Thelen2003Muscle IntIC_IS6_7_R: max_isometric_force=336.3512 optimal_fiber_length=0.02227885
        tendon_slack_length=0.00111802 pennation_angle_at_optimal=0
      PathPoint PathPoint_rib6_R: rib6_R (0.160652 -0.164001 0.0378052)
      PathPoint PathPoint_rib7_R: rib7_R (0.170992 -0.112238 0.0395339)
    Thelen2003Muscle IntIC_IS6_1_L: max_isometric_force=336.3512 optimal_fiber_length=0.03145734
        tendon_slack_length=0.00110967 pennation_angle_at_optimal=0
      PathPoint PathPoint_rib6_L: rib6_L (-0.0325747 -0.0332238 -0.0319268)
      PathPoint PathPoint_rib7_L: rib7_L (-0.0302194 0.0210707 -0.051327)
    Thelen2003Muscle IntIC_IS6_3_L: max_isometric_force=336.3512 optimal_fiber_length=0.03383118
        tendon_slack_length=0.001050021 pennation_angle_at_optimal=0
      PathPoint PathPoint_rib6_L: rib6_L (-0.00304098 -0.0747088 -0.116296)
      PathPoint PathPoint_rib7_L: rib7_L (0.0264556 -0.024596 -0.13052)
    Thelen2003Muscle IntIC_IS6_5_L: max_isometric_force=336.3512 optimal_fiber_length=0.0409961
        tendon_slack_length=0.001032767 pennation_angle_at_optimal=0
      PathPoint PathPoint_rib6_L: rib6_L (0.0918177 -0.147393 -0.146415)
      PathPoint PathPoint_rib7_L: rib7_L (0.129404 -0.103411 -0.123799)
    Thelen2003Muscle IntIC_IS6_7_L: max_isometric_force=336.3512 optimal_fiber_length=0.02227884
        tendon_slack_length=0.00111802 pennation_angle_at_optimal=0
      PathPoint PathPoint_rib6_L: rib6_L (0.160652 -0.164001 -0.0378052)
      PathPoint PathPoint_rib7_L: rib7_L (0.170992 -0.112238 -0.0395339)
    Thelen2003Muscle IntIC_IS7_1_R: max_isometric_force=248.0252 optimal_fiber_length=0.03399711
        tendon_slack_length=0.001117473 pennation_angle_at_optimal=0
      PathPoint PathPoint_rib7_R: rib7_R (-0.0296652 -0.034595 0.0305013)
      PathPoint PathPoint_rib8_R: rib8_R (-0.0326271 0.022425 0.0521426)
    Thelen2003Muscle IntIC_IS7_3_R: max_isometric_force=248.0252 optimal_fiber_length=0.03708305
        tendon_slack_length=0.001069942 pennation_angle_at_optimal=0
      PathPoint PathPoint_rib7_R: rib7_R (-0.0271695 -0.0607836 0.0892102)
      PathPoint PathPoint_rib8_R: rib8_R (-0.00243854 -0.00935374 0.111318)
    Thelen2003Muscle IntIC_IS7_5_R: max_isometric_force=248.0252 optimal_fiber_length=0.03826914
        tendon_slack_length=0.001043238 pennation_angle_at_optimal=0
      PathPoint PathPoint_rib7_R: rib7_R (0.0385887 -0.113886 0.142168)
      PathPoint PathPoint_rib8_R: rib8_R (0.073643 -0.0641036 0.148651)
    Thelen2003Muscle IntIC_IS7_7_R: max_isometric_force=248.0252 optimal_fiber_length=0.04103741
        tendon_slack_length=0.001044102 pennation_angle_at_optimal=0
      PathPoint PathPoint_rib7_R: rib7_R (0.0996741 -0.166809 0.145162)
      PathPoint PathPoint_rib8_R: rib8_R (0.134457 -0.119643 0.12734)
    Thelen2003Muscle IntIC_IS7_1_L: max_isometric_force=248.0252 optimal_fiber_length=0.03399697
        tendon_slack_length=0.001117473 pennation_angle_at_optimal=0
      PathPoint PathPoint_rib7_L: rib7_L (-0.0296652 -0.034595 -0.0305013)
      PathPoint PathPoint_rib8_L: rib8_L (-0.0326271 0.022425 -0.0521426)
    Thelen2003Muscle IntIC_IS7_3_L: max_isometric_force=248.0252 optimal_fiber_length=0.03708288
        tendon_slack_length=0.001069942 pennation_angle_at_optimal=0
      PathPoint PathPoint_rib7_L: rib7_L (-0.0271695 -0.0607836 -0.0892102)
      PathPoint PathPoint_rib8_L: rib8_L (-0.00243854 -0.00935374 -0.111318)
    Thelen2003Muscle IntIC_IS7_5_L: max_isometric_force=248.0252 optimal_fiber_length=0.03826903
        tendon_slack_length=0.001043238 pennation_angle_at_optimal=0
      PathPoint PathPoint_rib7_L: rib7_L (0.0385887 -0.113886 -0.142168)
      PathPoint PathPoint_rib8_L: rib8_L (0.073643 -0.0641036 -0.148651)
    Thelen2003Muscle IntIC_IS7_7_L: max_isometric_force=248.0252 optimal_fiber_length=0.04103739
        tendon_slack_length=0.001044103 pennation_angle_at_optimal=0
      PathPoint PathPoint_rib7_L: rib7_L (0.0996741 -0.166809 -0.145162)
      PathPoint PathPoint_rib8_L: rib8_L (0.134457 -0.119643 -0.12734)
    Thelen2003Muscle IntIC_IS8_1_R: max_isometric_force=234.741 optimal_fiber_length=0.03415084
        tendon_slack_length=0.001112373 pennation_angle_at_optimal=0
      PathPoint PathPoint_rib8_R: rib8_R (-0.0285491 -0.0356634 0.0313069)
      PathPoint PathPoint_rib9_R: rib9_R (-0.0357941 0.0191843 0.0521742)
    Thelen2003Muscle IntIC_IS8_3_R: max_isometric_force=234.741 optimal_fiber_length=0.03670697
        tendon_slack_length=0.001074246 pennation_angle_at_optimal=0
      PathPoint PathPoint_rib8_R: rib8_R (-0.0270875 -0.066514 0.0899417)
      PathPoint PathPoint_rib9_R: rib9_R (-0.00505581 -0.0183847 0.112184)
    Thelen2003Muscle IntIC_IS8_5_R: max_isometric_force=234.741 optimal_fiber_length=0.03680302
        tendon_slack_length=0.001053904 pennation_angle_at_optimal=0
      PathPoint PathPoint_rib8_R: rib8_R (0.0331773 -0.119541 0.142211)
      PathPoint PathPoint_rib9_R: rib9_R (0.0638605 -0.0722043 0.151188)
    Thelen2003Muscle IntIC_IS8_7_R: max_isometric_force=234.741 optimal_fiber_length=0.03239405
        tendon_slack_length=0.001052727 pennation_angle_at_optimal=0
      PathPoint PathPoint_rib8_R: rib8_R (0.0877692 -0.164352 0.148248)
      PathPoint PathPoint_rib9_R: rib9_R (0.114573 -0.120482 0.137421)
    Thelen2003Muscle IntIC_IS8_1_L: max_isometric_force=234.741 optimal_fiber_length=0.0341507
        tendon_slack_length=0.001112373 pennation_angle_at_optimal=0
      PathPoint PathPoint_rib8_L: rib8_L (-0.0285491 -0.0356634 -0.0313069)
      PathPoint PathPoint_rib9_L: rib9_L (-0.0357941 0.0191843 -0.0521742)
    Thelen2003Muscle IntIC_IS8_3_L: max_isometric_force=234.741 optimal_fiber_length=0.03670679
        tendon_slack_length=0.001074246 pennation_angle_at_optimal=0
      PathPoint PathPoint_rib8_L: rib8_L (-0.0270875 -0.066514 -0.0899417)
      PathPoint PathPoint_rib9_L: rib9_L (-0.00505581 -0.0183847 -0.112184)
    Thelen2003Muscle IntIC_IS8_5_L: max_isometric_force=234.741 optimal_fiber_length=0.03680289
        tendon_slack_length=0.001053904 pennation_angle_at_optimal=0
      PathPoint PathPoint_rib8_L: rib8_L (0.0331773 -0.119541 -0.142211)
      PathPoint PathPoint_rib9_L: rib9_L (0.0638605 -0.0722043 -0.151188)
    Thelen2003Muscle IntIC_IS8_7_L: max_isometric_force=234.741 optimal_fiber_length=0.03239403
        tendon_slack_length=0.001052727 pennation_angle_at_optimal=0
      PathPoint PathPoint_rib8_L: rib8_L (0.0877692 -0.164352 -0.148248)
      PathPoint PathPoint_rib9_L: rib9_L (0.114573 -0.120482 -0.137421)
    Thelen2003Muscle IntIC_IS9_1_R: max_isometric_force=276.6656 optimal_fiber_length=0.03129249
        tendon_slack_length=0.001103458 pennation_angle_at_optimal=0
      PathPoint PathPoint_rib9_R: rib9_R (-0.0297856 -0.038115 0.0338632)
      PathPoint PathPoint_rib10_R: rib10_R (-0.0377001 0.0149159 0.0510533)
    Thelen2003Muscle IntIC_IS9_3_R: max_isometric_force=276.6656 optimal_fiber_length=0.03698348
        tendon_slack_length=0.001067852 pennation_angle_at_optimal=0
      PathPoint PathPoint_rib9_R: rib9_R (-0.0128965 -0.0914396 0.109926)
      PathPoint PathPoint_rib10_R: rib10_R (0.0127224 -0.0439066 0.126771)
    Thelen2003Muscle IntIC_IS9_5_R: max_isometric_force=276.6656 optimal_fiber_length=0.03875799
        tendon_slack_length=0.001047251 pennation_angle_at_optimal=0
      PathPoint PathPoint_rib9_R: rib9_R (0.0547462 -0.152613 0.149412)
      PathPoint PathPoint_rib10_R: rib10_R (0.0894923 -0.106765 0.144774)
    Thelen2003Muscle IntIC_IS9_1_L: max_isometric_force=276.6656 optimal_fiber_length=0.03129233
        tendon_slack_length=0.001103458 pennation_angle_at_optimal=0
      PathPoint PathPoint_rib9_L: rib9_L (-0.0297856 -0.038115 -0.0338632)
      PathPoint PathPoint_rib10_L: rib10_L (-0.0377001 0.0149159 -0.0510533)
    Thelen2003Muscle IntIC_IS9_3_L: max_isometric_force=276.6656 optimal_fiber_length=0.03698331
        tendon_slack_length=0.001067852 pennation_angle_at_optimal=0
      PathPoint PathPoint_rib9_L: rib9_L (-0.0128965 -0.0914396 -0.109926)
      PathPoint PathPoint_rib10_L: rib10_L (0.0127224 -0.0439066 -0.126771)
    Thelen2003Muscle IntIC_IS9_5_L: max_isometric_force=276.6656 optimal_fiber_length=0.03875792
        tendon_slack_length=0.001047251 pennation_angle_at_optimal=0
      PathPoint PathPoint_rib9_L: rib9_L (0.0547462 -0.152613 -0.149412)
      PathPoint PathPoint_rib10_L: rib10_L (0.0894923 -0.106765 -0.144774)
    Thelen2003Muscle IntIC_IS10_1_R: max_isometric_force=304.2285 optimal_fiber_length=0.0507097
        tendon_slack_length=0.001066184 pennation_angle_at_optimal=0
      PathPoint PathPoint_rib10_R: rib10_R (-0.01467 -0.0560208 0.0294397)
      PathPoint PathPoint_rib11_R: rib11_R (-0.0479195 0.025816 0.0569009)
    Thelen2003Muscle IntIC_IS10_3_R: max_isometric_force=304.2285 optimal_fiber_length=0.04737983
        tendon_slack_length=0.001072332 pennation_angle_at_optimal=0
      PathPoint PathPoint_rib10_R: rib10_R (0.0162356 -0.134673 0.115156)
      PathPoint PathPoint_rib11_R: rib11_R (0.0383546 -0.0694347 0.145724)
    Thelen2003Muscle IntIC_IS10_1_L: max_isometric_force=304.2285 optimal_fiber_length=0.05070951
        tendon_slack_length=0.001066184 pennation_angle_at_optimal=0
      PathPoint PathPoint_rib10_L: rib10_L (-0.01467 -0.0560208 -0.0294397)
      PathPoint PathPoint_rib11_L: rib11_L (-0.0479195 0.025816 -0.0569009)
    Thelen2003Muscle IntIC_IS10_3_L: max_isometric_force=304.2285 optimal_fiber_length=0.04737955
        tendon_slack_length=0.001072331 pennation_angle_at_optimal=0
      PathPoint PathPoint_rib10_L: rib10_L (0.0162356 -0.134673 -0.115156)
      PathPoint PathPoint_rib11_L: rib11_L (0.0383546 -0.0694347 -0.145724)
    Thelen2003Muscle IntIC_IS11_1_R: max_isometric_force=174.5228 optimal_fiber_length=0.04191399
        tendon_slack_length=0.001048772 pennation_angle_at_optimal=0
      PathPoint PathPoint_rib11_R: rib11_R (-0.0125506 -0.049166 0.0255168)
      PathPoint PathPoint_rib12_R: rib12_R (-0.036021 0.0131519 0.0494278)
    Thelen2003Muscle IntIC_IS11_3_R: max_isometric_force=174.5228 optimal_fiber_length=0.0442269
        tendon_slack_length=0.001078017 pennation_angle_at_optimal=0
      PathPoint PathPoint_rib11_R: rib11_R (-0.00598435 -0.106944 0.0818912)
      PathPoint PathPoint_rib12_R: rib12_R (0.00913667 -0.0574969 0.114287)
    Thelen2003Muscle IntIC_IS11_1_L: max_isometric_force=174.5228 optimal_fiber_length=0.04191377
        tendon_slack_length=0.001048771 pennation_angle_at_optimal=0
      PathPoint PathPoint_rib11_L: rib11_L (-0.0125506 -0.049166 -0.0255168)
      PathPoint PathPoint_rib12_L: rib12_L (-0.036021 0.0131519 -0.0494278)
    Thelen2003Muscle IntIC_IS11_3_L: max_isometric_force=174.5228 optimal_fiber_length=0.04422662
        tendon_slack_length=0.001078016 pennation_angle_at_optimal=0
      PathPoint PathPoint_rib11_L: rib11_L (-0.00598435 -0.106944 -0.0818912)
      PathPoint PathPoint_rib12_L: rib12_L (0.00913667 -0.0574969 -0.114287)
    PointToPointActuator [values shared by the 20 below unless stated]: min_control=-1 max_control=1 bodyB=sternum
        points_are_global=false optimal_force=1000
    PointToPointActuator rib1Ract: bodyA=rib1_R pointA=(0.04860772 -0.0443099 0.0386399) pointB=(0 0 0)
    PointToPointActuator rib2Ract: bodyA=rib2_R pointA=(0.092961 -0.0697812 0.03507933)
        pointB=(0.0220396 -0.03477063 -0.02168952)
    PointToPointActuator rib3Ract: bodyA=rib3_R pointA=(0.1165631 -0.08787243 0.04809467)
        pointB=(0.03737203 -0.06672585 -0.02008857)
    PointToPointActuator rib4Ract: bodyA=rib4_R pointA=(0.1364458 -0.1074937 0.05863423)
        pointB=(0.04682804 -0.09772983 -0.01534953)
    PointToPointActuator rib5Ract: bodyA=rib5_R pointA=(0.1506818 -0.123359 0.06808561)
        pointB=(0.05128078 -0.1202819 -0.01429997)
    PointToPointActuator rib6Ract: bodyA=rib6_R pointA=(0.1546948 -0.1364165 0.0779441)
        pointB=(0.05435936 -0.1408036 -0.02196418)
    PointToPointActuator rib7Ract: bodyA=rib7_R pointA=(0.1491181 -0.1417718 0.09425189)
        pointB=(0.05692147 -0.1516709 -0.03055664)
    PointToPointActuator rib8Ract: bodyA=rib8_R bodyB=rib7_R pointA=(0.132602 -0.1516935 0.1108272)
        pointB=(0.1491181 -0.1417718 0.09425189)
    PointToPointActuator rib9Ract: bodyA=rib9_R bodyB=rib8_R pointA=(0.1105576 -0.1385323 0.1196321)
        pointB=(0.132602 -0.1516935 0.1108272)
    PointToPointActuator rib10Ract: bodyA=rib10_R bodyB=rib9_R pointA=(0.07498362 -0.1261227 0.1281834)
        pointB=(0.1105576 -0.1385323 0.1196321)
    PointToPointActuator rib1Lact: bodyA=rib1_L pointA=(0.04860772 -0.0443099 -0.0386399) pointB=(0 0 -0.0670986)
    PointToPointActuator rib2Lact: bodyA=rib2_L pointA=(0.092961 -0.0697812 -0.03507933)
        pointB=(0.0220396 -0.03477063 -0.04540907)
    PointToPointActuator rib3Lact: bodyA=rib3_L pointA=(0.1165631 -0.08787243 -0.04809467)
        pointB=(0.03737203 -0.06672585 -0.04701003)
    PointToPointActuator rib4Lact: bodyA=rib4_L pointA=(0.1364458 -0.1074937 -0.05863423)
        pointB=(0.04682804 -0.09772983 -0.05174906)
    PointToPointActuator rib5Lact: bodyA=rib5_L pointA=(0.1506818 -0.123359 -0.06808561)
        pointB=(0.05128078 -0.1202819 -0.05279862)
    PointToPointActuator rib6Lact: bodyA=rib6_L pointA=(0.1546948 -0.1364165 -0.0779441)
        pointB=(0.05435936 -0.1408036 -0.04513442)
    PointToPointActuator rib7Lact: bodyA=rib7_L pointA=(0.1491181 -0.1417718 -0.09425189)
        pointB=(0.05692147 -0.1516709 -0.03654195)
    PointToPointActuator rib8Lact: bodyA=rib8_L bodyB=rib7_L pointA=(0.132602 -0.1516935 -0.1108272)
        pointB=(0.1491181 -0.1417718 -0.09425189)
    PointToPointActuator rib9Lact: bodyA=rib9_L bodyB=rib8_L pointA=(0.1105576 -0.1385323 -0.1196321)
        pointB=(0.132602 -0.1516935 -0.1108272)
    PointToPointActuator rib10Lact: bodyA=rib10_L bodyB=rib9_L pointA=(0.07498362 -0.1261227 -0.1281834)
        pointB=(0.1105576 -0.1385323 -0.1196321)
    FunctionBasedBushingForce [values shared by the 17 below unless stated]: rotational_damping=(0 0 0)
        translational_damping=(0 0 0) moment_visual_scale=1 force_visual_scale=1 visual_aspect_ratio=1
        f_x_delta_x_function=Constant(value=0) f_y_delta_y_function=Constant(value=0)
        f_z_delta_z_function=Constant(value=0)
    FunctionBasedBushingForce L5S1Passive: socket_frame1=sacrum_offset socket_frame2=/bodyset/lumbar5
        m_y_theta_y_function=LinearFunction(coefficients=773.77 0)
      PhysicalOffsetFrame sacrum_offset: socket_parent=/bodyset/sacrum translation=(-0.098 0.071 0)
          orientation=(0 0 -0.36652)
      m_x_theta_x_function: PiecewiseLinearFunction: x=(-0.01745 -0.01571 -0.01396 -0.01222 -0.01047 -0.00873 -0.00698 -0.00524 -0.00349 -0.00175 0 0.00175 0.00349 0.00524 0.00698 0.00873 0.01047 0.01222 0.01396 0.01571 0.01745)
          y=(-6.34 -5.69 -5.05 -4.41 -3.77 -3.14 -2.51 -1.88 -1.25 -0.62 0 0.62 1.25 1.88 2.51 3.14 3.77 4.41 5.05 5.69 6.34)
      m_z_theta_z_function: PiecewiseLinearFunction: x=(-0.04363 -0.03927 -0.03491 -0.03054 -0.02618 -0.02182 -0.01745 -0.01309 -0.00873 -0.00436 0 0.00244 0.00489 0.00733 0.00977 0.01222 0.01466 0.0171 0.01955 0.02199 0.02443)
          y=(-3.60074 -3.1733 -2.76516 -2.37441 -1.9993 -1.63828 -1.28995 -0.953038 -0.626409 -0.309037 0 0.232941 0.467742 0.704442 0.943076 1.18368 1.42631 1.67098 1.91775 2.16665 2.41773)
    FunctionBasedBushingForce L4L5Passive: socket_frame1=lumbar5_offset socket_frame2=/bodyset/lumbar4
        m_y_theta_y_function=LinearFunction(coefficients=647.79 0)
      PhysicalOffsetFrame lumbar5_offset: socket_parent=/bodyset/lumbar5 translation=(0 0.039581 0)
          orientation=(0 0 0.31416)
      m_x_theta_x_function: PiecewiseLinearFunction: x=(-0.02304 -0.02073 -0.01843 -0.01613 -0.01382 -0.01152 -0.00922 -0.00691 -0.00461 -0.0023 0 0.0023 0.00461 0.00691 0.00922 0.01152 0.01382 0.01613 0.01843 0.02073 0.02304)
          y=(-7.79 -7 -6.21 -5.42 -4.64 -3.86 -3.08 -2.3 -1.53 -0.77 0 0.77 1.53 2.3 3.08 3.86 4.64 5.42 6.21 7 7.79)
      m_z_theta_z_function: PiecewiseLinearFunction: x=(-0.09425 -0.08482 -0.0754 -0.06597 -0.05655 -0.04712 -0.0377 -0.02827 -0.01885 -0.00942 0 0.00528 0.01056 0.01583 0.02111 0.02639 0.03167 0.03695 0.04222 0.0475 0.05278)
          y=(-11.7841 -10.0389 -8.48431 -7.08829 -5.82427 -4.6701 -3.60735 -2.6207 -1.69737 -0.826754 0 0.843093 1.71184 2.60826 3.53452 4.49297 5.48613 6.51673 7.58771 8.70225 9.86375)
    FunctionBasedBushingForce L3L4Passive: socket_frame1=lumbar4_offset socket_frame2=/bodyset/lumbar3
        m_y_theta_y_function=LinearFunction(coefficients=466.13 0)
      PhysicalOffsetFrame lumbar4_offset: socket_parent=/bodyset/lumbar4 translation=(0 0.036802 0)
          orientation=(0 0 0.20944)
      m_x_theta_x_function: PiecewiseLinearFunction: x=(-0.03107 -0.02796 -0.02485 -0.02175 -0.01864 -0.01553 -0.01243 -0.00932 -0.00621 -0.00311 0 0.00311 0.00621 0.00932 0.01243 0.01553 0.01864 0.02175 0.02485 0.02796 0.03107)
          y=(-9.84 -8.83 -7.83 -6.83 -5.84 -4.85 -3.87 -2.89 -1.92 -0.96 0 0.96 1.92 2.89 3.87 4.85 5.84 6.83 7.83 8.83 9.84)
      m_z_theta_z_function: PiecewiseLinearFunction: x=(-0.13526 0 0.07575) y=(-20.606 0 23.3256)
    FunctionBasedBushingForce L2L3Passive: socket_frame1=lumbar3_offset socket_frame2=/bodyset/lumbar2
        m_y_theta_y_function=LinearFunction(coefficients=501.34 0)
      PhysicalOffsetFrame lumbar3_offset: socket_parent=/bodyset/lumbar3 translation=(0 0.036764 0)
          orientation=(0 0 0.12217)
      m_x_theta_x_function: PiecewiseLinearFunction: x=(-0.03208 -0.02887 -0.02566 -0.02246 -0.01925 -0.01604 -0.01283 -0.00962 -0.00642 -0.00321 0 0.00321 0.00642 0.00962 0.01283 0.01604 0.01925 0.02246 0.02566 0.02887 0.03208)
          y=(-8.4 -7.54 -6.68 -5.83 -4.98 -4.14 -3.3 -2.47 -1.64 -0.82 0 0.82 1.64 2.47 3.3 4.14 4.98 5.83 6.68 7.54 8.4)
      m_z_theta_z_function: PiecewiseLinearFunction: x=(-0.15708 0 0.08796) y=(-19.1559 0 19.5756)
    FunctionBasedBushingForce L1L2Passive: socket_frame1=lumbar2_offset socket_frame2=/bodyset/lumbar1
        m_y_theta_y_function=LinearFunction(coefficients=443.22 0)
      PhysicalOffsetFrame lumbar2_offset: socket_parent=/bodyset/lumbar2 translation=(0 0.034054 0)
          orientation=(0 0 0.10472)
      m_x_theta_x_function: PiecewiseLinearFunction: x=(-0.02405 -0.02165 -0.01924 -0.01684 -0.01443 -0.01203 -0.00962 -0.00722 -0.00481 -0.00241 0 0.00241 0.00481 0.00722 0.00962 0.01203 0.01443 0.01684 0.01924 0.02165 0.02405)
          y=(-8.57 -7.7 -6.83 -5.96 -5.1 -4.24 -3.39 -2.54 -1.69 -0.84 0 0.84 1.69 2.54 3.39 4.24 5.1 5.96 6.83 7.7 8.57)
      m_z_theta_z_function: PiecewiseLinearFunction: x=(-0.19199 0 0.10751) y=(-48.6109 0 15.6387)
    FunctionBasedBushingForce T12L1Passive: socket_frame1=lumbar1_offset socket_frame2=/bodyset/thoracic12
        m_x_theta_x_function=LinearFunction(coefficients=525.28 0)
      PhysicalOffsetFrame lumbar1_offset: socket_parent=/bodyset/lumbar1 translation=(0 0.035497 0)
          orientation=(0 0 -0.034907)
      m_y_theta_y_function: PiecewiseLinearFunction: x=(-0.0185 -0.01665 -0.0148 -0.01295 -0.0111 -0.00925 -0.0074 -0.00555 -0.0037 -0.00185 0 0.00185 0.0037 0.00555 0.0074 0.00925 0.0111 0.01295 0.0148 0.01665 0.0185)
          y=(-5.95795 -5.29609 -4.65157 -4.02327 -3.41017 -2.81127 -2.22567 -1.65252 -1.09101 -0.540405 0 0.540405 1.09101 1.65252 2.22567 2.81127 3.41017 4.02327 4.65157 5.29609 5.95795)
      m_z_theta_z_function: PiecewiseLinearFunction: x=(-0.10036 0 0.0562) y=(-42.502 0 11)
    FunctionBasedBushingForce T11T12Passive: socket_frame1=thoracic12_offset socket_frame2=/bodyset/thoracic11
        m_x_theta_x_function=LinearFunction(coefficients=502.73 0)
        m_y_theta_y_function=LinearFunction(coefficients=317.49 0)
      PhysicalOffsetFrame thoracic12_offset: socket_parent=/bodyset/thoracic12 translation=(0 0.033837 0)
          orientation=(0 0 -0.069813)
      m_z_theta_z_function: PiecewiseLinearFunction: x=(-0.10036 0 0.0562) y=(-42.502 0 11)
    FunctionBasedBushingForce T10T11Passive: socket_frame1=thoracic11_offset socket_frame2=/bodyset/thoracic10
        m_x_theta_x_function=LinearFunction(coefficients=355.96 0)
        m_y_theta_y_function=LinearFunction(coefficients=229.72 0)
      PhysicalOffsetFrame thoracic11_offset: socket_parent=/bodyset/thoracic11 translation=(0 0.029544 0)
          orientation=(0 0 -0.087266)
      m_z_theta_z_function: PiecewiseLinearFunction: x=(-0.07418 0 0.04154) y=(-51.5438 0 24.6155)
    FunctionBasedBushingForce T9T10Passive: socket_frame1=thoracic10_offset socket_frame2=/bodyset/thoracic9
        m_x_theta_x_function=LinearFunction(coefficients=348.51 0)
        m_y_theta_y_function=LinearFunction(coefficients=127.04 0)
      PhysicalOffsetFrame thoracic10_offset: socket_parent=/bodyset/thoracic10 translation=(0 0.029 0)
          orientation=(0 0 -0.069813)
      m_z_theta_z_function: PiecewiseLinearFunction: x=(-0.05061 0 0.00283 0.00567 0.0085 0.01134 0.01417 0.01701 0.01984 0.02268 0.02551 0.02834)
          y=(-24.4337 0 0.218574 0.463727 0.741777 1.06055 1.42972 1.86129 2.37008 2.97447 3.69718 4.56635)
    FunctionBasedBushingForce T8T9Passive: socket_frame1=thoracic9_offset socket_frame2=/bodyset/thoracic8
        m_x_theta_x_function=LinearFunction(coefficients=481.51 0)
        m_y_theta_y_function=LinearFunction(coefficients=244.73 0)
      PhysicalOffsetFrame thoracic9_offset: socket_parent=/bodyset/thoracic9 translation=(0 0.025135 0)
          orientation=(0 0 -0.087266)
      m_z_theta_z_function: PiecewiseLinearFunction: x=(-0.05061 0 0.00283 0.00567 0.0085 0.01134 0.01417 0.01701 0.01984 0.02268 0.02551 0.02834)
          y=(-25.5037 0 0.406369 0.879685 1.44095 2.11777 2.9464 3.97447 5.26455 6.89887 8.98542 11.6661)
    FunctionBasedBushingForce T7T8Passive: socket_frame1=thoracic8_offset socket_frame2=/bodyset/thoracic7
        m_x_theta_x_function=LinearFunction(coefficients=531.66 0)
        m_y_theta_y_function=LinearFunction(coefficients=188.33 0)
      PhysicalOffsetFrame thoracic8_offset: socket_parent=/bodyset/thoracic8 translation=(0 0.024615 0)
          orientation=(0 0 -0.10472)
      m_z_theta_z_function: PiecewiseLinearFunction: x=(-0.05061 0 0.00283 0.00567 0.0085 0.01134 0.01417 0.01701 0.01984 0.02268 0.02551 0.02834)
          y=(-58.6724 0 0.38146 0.811437 1.3009 1.86328 2.51506 3.27645 4.17222 5.23274 6.49523 8.00533)
    FunctionBasedBushingForce T6T7Passive: socket_frame1=thoracic7_offset socket_frame2=/bodyset/thoracic6
        m_x_theta_x_function=LinearFunction(coefficients=397.73 0)
        m_y_theta_y_function=LinearFunction(coefficients=227.24 0)
      PhysicalOffsetFrame thoracic7_offset: socket_parent=/bodyset/thoracic7 translation=(0 0.025934 0)
          orientation=(0 0 -0.10472)
      m_z_theta_z_function: PiecewiseLinearFunction: x=(-0.04232 0 0.0237) y=(-27.3952 0 6.1771)
    FunctionBasedBushingForce T5T6Passive: socket_frame1=thoracic6_offset socket_frame2=/bodyset/thoracic5
        m_y_theta_y_function=LinearFunction(coefficients=358.02 0)
      PhysicalOffsetFrame thoracic6_offset: socket_parent=/bodyset/thoracic6 translation=(0 0.025672 0)
          orientation=(0 0 -0.10472)
      m_x_theta_x_function: PiecewiseLinearFunction: x=(-0.01553 -0.01398 -0.01243 -0.01087 -0.00932 -0.00777 -0.00621 -0.00466 -0.00311 -0.00155 0 0.00155 0.00311 0.00466 0.00621 0.00777 0.00932 0.01087 0.01243 0.01398 0.01553)
          y=(-7.7 -6.22 -5 -4 -3.16 -2.44 -1.83 -1.29 -0.82 -0.39 0 0.39 0.82 1.29 1.83 2.44 3.16 4 5 6.22 7.7)
      m_z_theta_z_function: PiecewiseLinearFunction: x=(-0.03403 0 0.00191 0.00381 0.00572 0.00762 0.00953 0.01144 0.01334 0.01525 0.01715 0.01906)
          y=(-24.8819 0 0.160813 0.372424 0.6582 1.05226 1.60443 2.38744 3.50749 5.11964 7.45029 10.83)
    FunctionBasedBushingForce T4T5Passive: socket_frame1=thoracic5_offset socket_frame2=/bodyset/thoracic4
        m_y_theta_y_function=LinearFunction(coefficients=288.6 0)
      PhysicalOffsetFrame thoracic5_offset: socket_parent=/bodyset/thoracic5 translation=(0 0.026267 0)
          orientation=(0 0 -0.10472)
      m_x_theta_x_function: PiecewiseLinearFunction: x=(-0.01745 -0.01571 -0.01396 -0.01222 -0.01047 -0.00873 -0.00698 -0.00524 -0.00349 -0.00175 0 0.00175 0.00349 0.00524 0.00698 0.00873 0.01047 0.01222 0.01396 0.01571 0.01745)
          y=(-7.37 -6.24 -5.24 -4.34 -3.54 -2.82 -2.16 -1.56 -1 -0.48 0 0.48 1 1.56 2.16 2.82 3.54 4.34 5.24 6.24 7.37)
      m_z_theta_z_function: PiecewiseLinearFunction: x=(-0.03403 0 0.00191 0.00381 0.00572 0.00762 0.00953 0.01144 0.01334 0.01525 0.01715 0.01906)
          y=(-34.7146 0 0.137233 0.28991 0.461479 0.656156 0.879099 1.13662 1.43643 1.78797 2.20279 2.69502)
    FunctionBasedBushingForce T3T4Passive: socket_frame1=thoracic4_offset socket_frame2=/bodyset/thoracic3
        m_x_theta_x_function=LinearFunction(coefficients=332.53 0)
        m_y_theta_y_function=LinearFunction(coefficients=368.93 0)
      PhysicalOffsetFrame thoracic4_offset: socket_parent=/bodyset/thoracic4 translation=(0 0.024475 0)
          orientation=(0 0 -0.069813)
      m_z_theta_z_function: PiecewiseLinearFunction: x=(-0.03403 0 0.00191 0.00381 0.00572 0.00762 0.00953 0.01144 0.01334 0.01525 0.01715 0.01906)
          y=(-22.9433 0 0.145053 0.330831 0.574853 0.902181 1.34866 1.96554 2.82615 4.03534 5.7431 8.16393)
    FunctionBasedBushingForce T2T3Passive: socket_frame1=thoracic3_offset socket_frame2=/bodyset/thoracic2
        m_x_theta_x_function=LinearFunction(coefficients=381.51 0)
        m_y_theta_y_function=LinearFunction(coefficients=504.34 0)
      PhysicalOffsetFrame thoracic3_offset: socket_parent=/bodyset/thoracic3 translation=(0 0.02221 0)
          orientation=(0 0 -0.05236)
      m_z_theta_z_function: PiecewiseLinearFunction: x=(-0.03403 0 0.00191 0.00381 0.00572 0.00762 0.00953 0.01144 0.01334 0.01525 0.01715 0.01906)
          y=(-20.7678 0 0.170566 0.382551 0.650855 0.995742 1.44476 2.03538 2.81854 3.86352 5.2645 7.14955)
    FunctionBasedBushingForce T1T2Passive: socket_frame1=thoracic2_offset socket_frame2=/bodyset/thoracic1
        m_y_theta_y_function=LinearFunction(coefficients=152.26 0)
      PhysicalOffsetFrame thoracic2_offset: socket_parent=/bodyset/thoracic2 translation=(0 0.020271 0)
          orientation=(0 0 -0.017453)
      m_x_theta_x_function: PiecewiseLinearFunction: x=(-0.02688 -0.02419 -0.0215 -0.01881 -0.01613 -0.01344 -0.01075 -0.00806 -0.00538 -0.00269 0 0.00269 0.00538 0.00806 0.01075 0.01344 0.01613 0.01881 0.0215 0.02419 0.02688)
          y=(-7.14 -5.54 -4.3 -3.32 -2.55 -1.93 -1.42 -0.99 -0.62 -0.29 0 0.29 0.62 0.99 1.42 1.93 2.55 3.32 4.3 5.54 7.14)
      m_z_theta_z_function: PiecewiseLinearFunction: x=(-0.03403 0 0.00191 0.00381 0.00572 0.00762 0.00953 0.01144 0.01334 0.01525 0.01715 0.01906)
          y=(-11.5903 0 0.0140747 0.0301901 0.0488071 0.0704907 0.0959337 0.125985 0.161686 0.204311 0.255427 0.316949)
    ObjectGroup Pectoralis: members=(PECM1 PECM2 PECM3 PECM1_l PECM2_l PECM3_l)
    ObjectGroup Rectus_Abdominus: members=(rect_abd_l rect_abd_r)
    ObjectGroup Serratus_Anterior: members=(SerrAnt1_1_R SerrAnt2_1_R SerrAnt2_2_R SerrAnt3_1_R SerrAnt4_1_R SerrAnt5_1_R SerrAnt6_1_R SerrAnt7_1_R SerrAnt8_1_R SerrAnt9_1_R SerrAnt1_1_L SerrAnt2_1_L SerrAnt2_2_L SerrAnt3_1_L SerrAnt4_1_L SerrAnt5_1_L SerrAnt6_1_L SerrAnt7_1_L SerrAnt8_1_L SerrAnt9_1_L)
    ObjectGroup Latissimus_Dorsi: members=(LD_L1_r LD_L2_r LD_L3_r LD_L4_r LD_L5_r LD_T12_r LD_T11_r LD_T10_r LD_T9_r LD_T8_r LD_T7_r LD_R12_r LD_R11_r LD_Il_r LD_L1_l LD_L2_l LD_L3_l LD_L4_l LD_L5_l LD_T12_l LD_T11_l LD_T10_l LD_T9_l LD_T8_l LD_T7_l LD_R12_l LD_R11_l LD_Il_l)
    ObjectGroup Trapezius: members=(trap_cl trap_acr_scap trap_acr_T1 trap_acr_T2 trap_acr_T3 trap_inf_T4 trap_inf_T5 trap_inf_T6 trap_inf_T7 trap_inf_T8 trap_inf_T9 trap_inf_T10 trap_inf_T11 trap_inf_T12 trap_cl_L trap_acr_scap_L trap_acr_T1_L trap_acr_T2_L trap_acr_T3_L trap_inf_T4_L trap_inf_T5_L trap_inf_T6_L trap_inf_T7_L trap_inf_T8_L trap_inf_T9_L trap_inf_T10_L trap_inf_T11_L trap_inf_T12_L)
    ObjectGroup External_Oblique: members=(E0_R5_r E0_R6_r E0_R7_r E0_R8_r E0_R9_r E0_R10_r E0_R11_r E0_R12_r E0_R5_l E0_R6_l E0_R7_l E0_R8_l E0_R9_l E0_R10_l E0_R11_l E0_R12_l)
    ObjectGroup Internal_Oblique: members=(IO1_r IO2_r IO3_r IO4_r IO5_r IO6_r IO1_l IO2_l IO3_l IO4_l IO5_l IO6_l)
    ObjectGroup SacroSpinalis: members=(IL_L1_r IL_L2_r IL_L3_r IL_L4_r IL_L1_l IL_L2_l IL_L3_l IL_L4_l IL_R5_r IL_R6_r IL_R7_r IL_R8_r IL_R9_r IL_R10_r IL_R11_r IL_R12_r IL_R5_l IL_R6_l IL_R7_l IL_R8_l IL_R9_l IL_R10_l IL_R11_l IL_R12_l LTpT_T1_r LTpT_T2_r LTpT_T3_r LTpT_T4_r LTpT_T5_r LTpT_T6_r LTpT_T7_r LTpT_T8_r LTpT_T9_r LTpT_T10_r LTpT_T11_r LTpT_T12_r LTpT_R4_r LTpT_R5_r LTpT_R6_r LTpT_R7_r LTpT_R8_r LTpT_R9_r LTpT_R10_r LTpT_R11_r LTpT_R12_r LTpT_T1_l LTpT_T2_l LTpT_T3_l LTpT_T4_l LTpT_T5_l LTpT_T6_l LTpT_T7_l LTpT_T8_l LTpT_T9_l LTpT_T10_l LTpT_T11_l LTpT_T12_l LTpT_R4_l LTpT_R5_l LTpT_R6_l LTpT_R7_l LTpT_R8_l LTpT_R9_l LTpT_R10_l LTpT_R11_l LTpT_R12_l LTpL_L5_r LTpL_L4_r LTpL_L3_r LTpL_L2_r LTpL_L1_r LTpL_L5_l LTpL_L4_l LTpL_L3_l LTpL_L2_l LTpL_L1_l)
    ObjectGroup TransversoSpinalis: members=(MF_m1s_r MF_m1t_1_r MF_m1t_2_r MF_m1t_3_r MF_m2s_r MF_m2t_1_r MF_m2t_2_r MF_m2t_3_r MF_m3s_r MF_m3t_1_r MF_m3t_2_r MF_m3t_3_r MF_m4s_r MF_m4t_1_r MF_m4t_2_r MF_m4t_3_r MF_m5s_r MF_m5t_1_r MF_m5t_2_r MF_m5t_3_r MF_m1_laminar_r MF_m2_laminar_r MF_m3_laminar_r MF_m4_laminar_r MF_m5_laminar_r MF_m1s_l MF_m1t_1_l MF_m1t_2_l MF_m1t_3_l MF_m2s_l MF_m2t_1_l MF_m2t_2_l MF_m2t_3_l MF_m3s_l MF_m3t_1_l MF_m3t_2_l MF_m3t_3_l MF_m4s_l MF_m4t_1_l MF_m4t_2_l MF_m4t_3_l MF_m5s_l MF_m5t_1_l MF_m5t_2_l MF_m5t_3_l MF_m1_laminar_l MF_m2_laminar_l MF_m3_laminar_l MF_m4_laminar_l MF_m5_laminar_l supmult-T1-C4 supmult-T1-C5 supmult-T2-C6 deepmult-T1-C5 deepmult-T1-C6 deepmult-T2-C7 deepmult-T2-T1 multifidus_L2_T12 multifidus_L1_T11 multifidus_T12_T10 multifidus_T11_T9 multifidus_T10_T8 multifidus_T9_T7 multifidus_T8_T6 multifidus_T7_T5 multifidus_T6_T4 multifidus_T5_T3 multifidus_T4_T2 multifidus_T3_T1 supmult-T1-C4_L supmult-T1-C5_L supmult-T2-C6_L deepmult-T1-C5_L deepmult-T1-C6_L deepmult-T2-C7_L deepmult-T2-T1_L multifidus_L2_T12_L multifidus_L1_T11_L multifidus_T12_T10_L multifidus_T11_T9_L multifidus_T10_T8_L multifidus_T9_T7_L multifidus_T8_T6_L multifidus_T7_T5_L multifidus_T6_T4_L multifidus_T5_T3_L multifidus_T4_T2_L multifidus_T3_T1_L)
    ObjectGroup Psoas_Major: members=(Ps_L1_VB_r Ps_L1_TP_r Ps_L1_L2_IVD_r Ps_L2_TP_r Ps_L2_L3_IVD_r Ps_L3_TP_r Ps_L3_L4_IVD_r Ps_L4_TP_r Ps_L4_L5_IVD_r Ps_L5_TP_r Ps_L5_VB_r Ps_L1_VB_l Ps_L1_TP_l Ps_L1_L2_IVD_l Ps_L2_TP_l Ps_L2_L3_IVD_l Ps_L3_TP_l Ps_L3_L4_IVD_l Ps_L4_TP_l Ps_L4_L5_IVD_l Ps_L5_TP_l Ps_L5_VB_l)
    ObjectGroup Quadratus_Laborum: members=(QL_post_I_1-L3_r QL_post_I_2-L4_r QL_post_I_2-L3_r QL_post_I_2-L2_r QL_post_I_3-L1_r QL_post_I_3-L2_r QL_post_I_3-L3_r QL_post_I_1-L3_l QL_post_I_2-L4_l QL_post_I_2-L3_l QL_post_I_2-L2_l QL_post_I_3-L1_l QL_post_I_3-L2_l QL_post_I_3-L3_l QL_mid_L3-12_3_r QL_mid_L3-12_2_r QL_mid_L3-12_1_r QL_mid_L2-12_1_r QL_mid_L4-12_3_r QL_mid_L3-12_3_l QL_mid_L3-12_2_l QL_mid_L3-12_1_l QL_mid_L2-12_1_l QL_mid_L4-12_3_l QL_ant_I_2-T12_r QL_ant_I_3-T12_r QL_ant_I_2-12_1_r QL_ant_I_3-12_1_r QL_ant_I_3-12_2_r QL_ant_I_3-12_3_r QL_ant_I_2-T12_l QL_ant_I_3-T12_l QL_ant_I_2-12_1_l QL_ant_I_3-12_1_l QL_ant_I_3-12_2_l QL_ant_I_3-12_3_l)
    ObjectGroup Neck: members=(stern_mast cleid_mast cleid_occ scalenus_ant scalenus_med scalenus_post long_col_c1thx long_col_c5thx splen_cap_skl_T1 splen_cap_skl_T2 splen_cerv_c3_T3 splen_cerv_c3_T4 splen_cerv_c3_T5 splen_cerv_c3_T6 semi_cap_sklthx semi_cerv_c3thx levator_scap longissi_cerv_c4thx iliocost_cerv_c5rib stern_mast_L cleid_mast_L cleid_occ_L scalenus_ant_L scalenus_med_L scalenus_post_L long_col_c1thx_L long_col_c5thx_L splen_cap_skl_T1_L splen_cap_skl_T2_L splen_cerv_c3_T3_L splen_cerv_c3_T4_L splen_cerv_c3_T5_L splen_cerv_c3_T6_L semi_cap_sklthx_L semi_cerv_c3thx_L levator_scap_L longissi_cerv_c4thx_L iliocost_cerv_c5rib_L)
    ObjectGroup Shoulder: members=(DELT1 DELT2 DELT3 SUPSP INFSP SUBSC TMIN TMAJ CORB DELT1_l DELT2_l DELT3_l SUPSP_l INFSP_l SUBSC_l TMIN_l TMAJ_l CORB_l)
    ObjectGroup Transversus_Abdominus: members=(TR1_l TR2_l TR3_l TR4_l TR5_l TR1_r TR2_r TR3_r TR4_r TR5_r)
    ObjectGroup Ext_IS1_R: members=(ExtIC_IS1_1_R ExtIC_IS1_3_R ExtIC_IS1_5_R)
    ObjectGroup Ext_IS1_L: members=(ExtIC_IS1_1_L ExtIC_IS1_3_L ExtIC_IS1_5_L)
    ObjectGroup Ext_IS2_R: members=(ExtIC_IS2_1_R ExtIC_IS2_3_R ExtIC_IS2_5_R ExtIC_IS2_7_R)
    ObjectGroup Ext_IS2_L: members=(ExtIC_IS2_1_L ExtIC_IS2_3_L ExtIC_IS2_5_L ExtIC_IS2_7_L)
    ObjectGroup Ext_IS3_R: members=(ExtIC_IS3_1_R ExtIC_IS3_3_R ExtIC_IS3_5_R ExtIC_IS3_7_R)
    ObjectGroup Ext_IS3_L: members=(ExtIC_IS3_1_L ExtIC_IS3_3_L ExtIC_IS3_5_L ExtIC_IS3_7_L)
    ObjectGroup Ext_IS4_R: members=(ExtIC_IS4_1_R ExtIC_IS4_3_R ExtIC_IS4_5_R ExtIC_IS4_7_R)
    ObjectGroup Ext_IS4_L: members=(ExtIC_IS4_1_L ExtIC_IS4_3_L ExtIC_IS4_5_L ExtIC_IS4_7_L)
    ObjectGroup Ext_IS5_R: members=(ExtIC_IS5_1_R ExtIC_IS5_3_R ExtIC_IS5_5_R ExtIC_IS5_7_R)
    ObjectGroup Ext_IS5_L: members=(ExtIC_IS5_1_L ExtIC_IS5_3_L ExtIC_IS5_5_L ExtIC_IS5_7_L)
    ObjectGroup Ext_IS6_R: members=(ExtIC_IS6_1_R ExtIC_IS6_3_R ExtIC_IS6_5_R ExtIC_IS6_7_R)
    ObjectGroup Ext_IS6_L: members=(ExtIC_IS6_1_L ExtIC_IS6_3_L ExtIC_IS6_5_L ExtIC_IS6_7_L)
    ObjectGroup Ext_IS7_R: members=(ExtIC_IS7_1_R ExtIC_IS7_3_R ExtIC_IS7_5_R ExtIC_IS7_7_R)
    ObjectGroup Ext_IS7_L: members=(ExtIC_IS7_1_L ExtIC_IS7_3_L ExtIC_IS7_5_L ExtIC_IS7_7_L)
    ObjectGroup Ext_IS8_R: members=(ExtIC_IS8_1_R ExtIC_IS8_3_R ExtIC_IS8_5_R ExtIC_IS8_7_R)
    ObjectGroup Ext_IS8_L: members=(ExtIC_IS8_1_L ExtIC_IS8_3_L ExtIC_IS8_5_L ExtIC_IS8_7_L)
    ObjectGroup Ext_IS9_R: members=(ExtIC_IS9_1_R ExtIC_IS9_3_R ExtIC_IS9_5_R)
    ObjectGroup Ext_IS9_L: members=(ExtIC_IS9_1_L ExtIC_IS9_3_L ExtIC_IS9_5_L)
    ObjectGroup Ext_IS10_R: members=(ExtIC_IS10_1_R ExtIC_IS10_3_R)
    ObjectGroup Ext_IS10_L: members=(ExtIC_IS10_1_L ExtIC_IS10_3_L)
    ObjectGroup Ext_IS11_R: members=(ExtIC_IS11_1_R ExtIC_IS11_3_R)
    ObjectGroup Ext_IS11_L: members=(ExtIC_IS11_1_L ExtIC_IS11_3_L)
    ObjectGroup Int_IS1_R: members=(IntIC_IS1_1_R IntIC_IS1_3_R IntIC_IS1_5_R)
    ObjectGroup Int_IS1_L: members=(IntIC_IS1_1_L IntIC_IS1_3_L IntIC_IS1_5_L)
    ObjectGroup Int_IS2_R: members=(IntIC_IS2_1_R IntIC_IS2_3_R IntIC_IS2_5_R IntIC_IS2_7_R)
    ObjectGroup Int_IS2_L: members=(IntIC_IS2_1_L IntIC_IS2_3_L IntIC_IS2_5_L IntIC_IS2_7_L)
    ObjectGroup Int_IS3_R: members=(IntIC_IS3_1_R IntIC_IS3_3_R IntIC_IS3_5_R IntIC_IS3_7_R)
    ObjectGroup Int_IS3_L: members=(IntIC_IS3_1_L IntIC_IS3_3_L IntIC_IS3_5_L IntIC_IS3_7_L)
    ObjectGroup Int_IS4_R: members=(IntIC_IS4_1_R IntIC_IS4_3_R IntIC_IS4_5_R IntIC_IS4_7_R)
    ObjectGroup Int_IS4_L: members=(IntIC_IS4_1_L IntIC_IS4_3_L IntIC_IS4_5_L IntIC_IS4_7_L)
    ObjectGroup Int_IS5_R: members=(IntIC_IS5_1_R IntIC_IS5_3_R IntIC_IS5_5_R IntIC_IS5_7_R)
    ObjectGroup Int_IS5_L: members=(IntIC_IS5_1_L IntIC_IS5_3_L IntIC_IS5_5_L IntIC_IS5_7_L)
    ObjectGroup Int_IS6_R: members=(IntIC_IS6_1_R IntIC_IS6_3_R IntIC_IS6_5_R IntIC_IS6_7_R)
    ObjectGroup Int_IS6_L: members=(IntIC_IS6_1_L IntIC_IS6_3_L IntIC_IS6_5_L IntIC_IS6_7_L)
    ObjectGroup Int_IS7_R: members=(IntIC_IS7_1_R IntIC_IS7_3_R IntIC_IS7_5_R IntIC_IS7_7_R)
    ObjectGroup Int_IS7_L: members=(IntIC_IS7_1_L IntIC_IS7_3_L IntIC_IS7_5_L IntIC_IS7_7_L)
    ObjectGroup Int_IS8_R: members=(IntIC_IS8_1_R IntIC_IS8_3_R IntIC_IS8_5_R IntIC_IS8_7_R)
    ObjectGroup Int_IS8_L: members=(IntIC_IS8_1_L IntIC_IS8_3_L IntIC_IS8_5_L IntIC_IS8_7_L)
    ObjectGroup Int_IS9_R: members=(IntIC_IS9_1_R IntIC_IS9_3_R IntIC_IS9_5_R)
    ObjectGroup Int_IS9_L: members=(IntIC_IS9_1_L IntIC_IS9_3_L IntIC_IS9_5_L)
    ObjectGroup Int_IS10_R: members=(IntIC_IS10_1_R IntIC_IS10_3_R)
    ObjectGroup Int_IS10_L: members=(IntIC_IS10_1_L IntIC_IS10_3_L)
    ObjectGroup Int_IS11_R: members=(IntIC_IS11_1_R IntIC_IS11_3_R)
    ObjectGroup Int_IS11_L: members=(IntIC_IS11_1_L IntIC_IS11_3_L)
  MarkerSet:
    Marker R_LAT_FEM: femur_r (-0.00411649 -0.415014 0.0688382)
    Marker R_CALC: talus_r (-0.0528202 -0.00645396 0.0153369)
    Marker R_LAT_MAL: talus_r (-0.0010643 0.0245542 0.0547838)
    Marker R_MED_MAL: talus_r (0.00748809 0.0436392 -0.0351589)
    Marker R_1ST: toes_r (0.0100933 0.051838 -0.0394052)
    Marker R_5TH: toes_r (-0.0220285 0.0309375 0.0705896)
    Marker L_LAT_FEM: femur_l (-0.0152386 -0.416485 -0.0579338)
    Marker L_LAT_MAL: talus_l (-0.00661592 0.0334382 -0.0481521)
    Marker L_MED_MAL: talus_l (0.00752819 0.0499422 0.0424551)
    Marker L_1ST: toes_l (0.00602787 0.0514371 0.0357134)
    Marker L_5TH: toes_l (-0.0282866 0.0247882 -0.066963)
    Marker L_CALC: talus_l (-0.0561437 -0.0181485 0.00102843)
    Marker L_GT: femur_l (-0.0548742 -0.0117046 -0.0986993)
    Marker L_TH_PP: femur_l (-0.0146724 -0.112544 -0.112802)
    Marker L_TH_DP: femur_l (-0.0223056 -0.191659 -0.108772)
    Marker L_TH_DA: femur_l (0.0482343 -0.183984 -0.0924117)
    Marker L_TH_PA: femur_l (0.0398164 -0.0824419 -0.0914833)
    Marker R_GT: femur_r (-0.0237261 0.00295288 0.103727)
    Marker R_TH_PA: femur_r (0.00750053 -0.0963392 0.114373)
    Marker R_TH_DA: femur_r (0.0387912 -0.173652 0.0995832)
    Marker R_TH_PP: femur_r (-0.050955 -0.0892452 0.114167)
    Marker R_TH_DP: femur_r (-0.0318214 -0.183046 0.113314)
    Marker R_SH_PA: tibia_r (-0.00183653 -0.259237 0.0826931)
    Marker R_SH_PP: tibia_r (-0.0675241 -0.250709 0.0746999)
    Marker R_SH_DP: tibia_r (-0.0569346 -0.324729 0.0615132)
    Marker R_SH_DA: tibia_r (0.0211538 -0.316589 0.0667622)
    Marker L_SH_DP: tibia_l (-0.07458 -0.326671 -0.038817)
    Marker L_SH_PP: tibia_l (-0.0765154 -0.255096 -0.0486421)
    Marker L_SH_PA: tibia_l (0.00149771 -0.258038 -0.0733167)
    Marker L_SH_DA: tibia_l (-0.0150216 -0.315289 -0.0635027)
    Marker R_PSIS: pelvis (-0.183832 0.0474434 0.0676916)
    Marker L_PSIS: pelvis (-0.191635 0.0405669 -0.0636591)
    Marker C7: head_neck (-0.0558652 -0.015082 0.00557004)
    Marker R_ACRO: humerus_R (-0.0174963 0.0418261 -0.0250865)
    Marker L_ACRO: humerus_L (-0.0183509 0.0371692 0.0108367)
    Marker R_LAT_HUM: humerus_R (0.0101107 -0.322226 0.0279902)
    Marker R_RAD: hand_R (0.0361548 0.00410163 -0.000963821)
    Marker R_ULNA: hand_R (-0.0254471 0.000388755 -0.0175308)
    Marker R_FARM_PA: radius_R (0.0840493 -0.0632905 -0.00207045)
    Marker R_FARM_PP: ulna_R (0.0301289 -0.0679345 0.0725235)
    Marker R_FARM_DP: ulna_R (0.0359877 -0.127545 0.0599837)
    Marker R_FARM_DA: radius_R (0.0719936 -0.137743 -0.00613261)
    Marker R_ARM_PA: humerus_R (0.00260586 -0.174705 0.0564594)
    Marker R_ARM_PP: humerus_R (-0.0632132 -0.172911 0.0380848)
    Marker R_ARM_DP: humerus_R (-0.0375652 -0.243298 0.0275199)
    Marker R_ARM_DA: humerus_R (0.0169968 -0.21073 0.0496043)
    Marker L_LAT_HUM: humerus_L (0.00604623 -0.321829 -0.023608)
    Marker L_ULNA: hand_L (-0.018797 0.00448675 0.0134662)
    Marker L_RAD: hand_L (0.0371321 0.00292463 -0.00434658)
    Marker L_ARM_PP: humerus_L (-0.0495195 -0.144006 -0.0586417)
    Marker L_ARM_PA: humerus_L (0.022566 -0.120975 -0.0428646)
    Marker L_ARM_DA: humerus_L (0.0237236 -0.181289 -0.0398524)
    Marker L_ARM_DP: humerus_L (-0.0319667 -0.21544 -0.041497)
    Marker L_FARM_PP: ulna_L (0.00135514 -0.0397112 -0.054139)
    Marker L_FARM_PA: radius_L (0.0767689 -0.0320789 -0.00585646)
    Marker L_FARM_DA: radius_L (0.0621278 -0.0846219 -0.0189017)
    Marker L_FARM_DP: ulna_L (-0.0011287 -0.11209 -0.058756)
    Marker PV_UR: pelvis (-0.20236 0.0250101 0.0394692)
    Marker PV_UL: pelvis (-0.198785 0.0320497 -0.0444964)
    Marker PV_LL: pelvis (-0.241219 -0.0279476 -0.0362399)
    Marker PV_LR: pelvis (-0.22907 -0.0169763 0.062013)
    Marker R_HAND: hand_R (0.000854807 -0.0881006 0.0214701)
    Marker L_HAND: hand_L (0.00343822 -0.0769572 -0.0233291)
    Marker LB_UR: lumbar1 (-0.0813581 0.0590821 0.0530217)
    Marker LB_UL: lumbar1 (-0.081453 0.057918 -0.0434523)
    Marker LB_LR: lumbar1 (-0.0992166 -0.00967983 0.0510417)
    Marker LB_LL: lumbar1 (-0.10106 -0.0144653 -0.0442255)
    Marker R_SCAP: clavicle_R (-0.153611 -0.0106348 0.104225)
    Marker L_SCAP: clavicle_L (-0.161354 -0.0250414 -0.0806598)
